# Natural gas, production mixture, at extraction

Dataset: openLCA process, unit process
Category: 21: Mining, Quarrying, and Oil and Gas Extraction/2111: Oil and Gas Extraction
Geography: United States
Time period: 2014-01-01 to 2014-12-31
Allocation method: no allocation
Data quality: US EPA - Process Pedigree Matrix (4;1)
Generated by: Franklin Associates, A Division of ERG
Owner: NAPCOR
Published in: NAPCOR, 2024, Polyethylene Terephthalate
isCopyrightProtected: false
restrictionsDescription: These U.S. LCI Database Project data ("Data") are provided by the National Renewable Energy Laboratory ("NREL"), operated by the Alliance for Sustainable Energy, LLC ("Alliance") for the US Department of Energy ("DOE") under Contract No. DE-AC36-08GO28308. The United States Government (the "Government") retains and the user acknowledges that the Government retains a non-exclusive, paid-up, irrevocable, worldwide license to publish or reproduce the published form of these data, or allow others to do so, for Government purposes.
Access to and use of these Data shall impose the following obligations on the user, as set forth in this Agreement. The user is granted the right, without any fee or cost, to use, copy, modify, alter, enhance and distribute these Data for any purpose whatsoever, provided that this entire notice appears in all copies of the Data. Any modification, alteration or enhancement of these data shall be identified and documented by the user. Further, the user agrees to credit the DOE/NREL/Alliance in any publication that results from the use of these Data. The names DOE/NREL/Alliance, however, may not be used in any advertising or publicity to endorse or promote any products or commercial entities unless specific written permission is obtained from DOE/NREL/Alliance. The user also understands that DOE/NREL/Alliance is not obligated to provide the user with any support, consulting, training or assistance of any kind with regard to the use of these Data or to provide the user with any updates, revisions or new versions of these Data.
YOU AGREE TO INDEMNIFY THE GOVERNMENT AND DOE/NREL/ALLIANCE, AND ITS SUBSIDIARIES, AFFILIATES, OFFICERS, AGENTS, AND EMPLOYEES AGAINST ANY CLAIM OR DEMAND, INCLUDING REASONABLE ATTORNEYS' FEES, RELATED TO YOUR USE OF THESE DATA. THESE DATA ARE PROVIDED BY DOE/NREL/ALLIANCE "AS IS" AND ANY EXPRESS OR IMPLIED WARRANTIES, INCLUDING BUT NOT LIMITED TO, THE IMPLIED WARRANTIES OF MERCHANTABILITY AND FITNESS FOR A PARTICULAR PURPOSE ARE DISCLAIMED. IN NO EVENT SHALL THE GOVERNMENT OR DOE/NREL/ALLIANCE BE LIABLE FOR ANY SPECIAL, INDIRECT OR CONSEQUENTIAL DAMAGES OR ANY DAMAGES WHATSOEVER, INCLUDING BUT NOT LIMITED TO CLAIMS ASSOCIATED WITH THE LOSS OF DATA OR PROFITS, WHICH MAY RESULT FROM AN ACTION IN CONTRACT, NEGLIGENCE OR OTHER TORTIOUS CLAIM THAT ARISES OUT OF OR IN CONNECTION WITH THE ACCESS, USE OR PERFORMANCE OF THESE DATA.

## General comment
This unit process combines the U.S. natural gas production sources based on their percentage share in the U.S. natural gas mix. The mix is made up of onshore conventional, offshore conventional, associated natural gas, Barnett Shale, Marcellus Shale, and coalbed methane natural gas. The process is for 1kg of natural gas to consumer. The natural gas mix is based on 2014 data from US Energy Information Administration (EIA).

## Technology
Natural gas extraction by percentage source including conventional extraction and unconventional extraction methods. Conventional natural gas is extracted using vertical well bores and using minimal stimulation. Unconventional natural gas extraction is used where permeability and porosity are so low that extraction requires a horizontal well bore followed by multistage hydraulic fracturing. Natural gas extraction is characterized by six types of extraction, namely onshore conventional, offshore conventional, associated natural gas, Barnett Shale, Marcellus Shale, and coalbed methane natural gas.

## Geography
This process is representative of the U.S. natural gas production mix.

## Time period
This process is representative of the 2014 aggregate natural gas production mix based on percentages from EIA, 2017.

## Reference product
- Natural gas, production mixture, at extraction: 1 kg

## Inputs from technosphere
- Natural gas, at extraction: 0.042 kg; provider Natural gas, coal bed methane, at extraction
- Natural gas, at extraction: 0.132 kg; provider Natural gas, conventional onshore associated, at extraction
- Natural gas, at extraction: 0.171 kg; provider Natural gas, Marcellus Shale, at extraction
- Natural gas, at extraction: 0.274 kg; provider Natural gas, Barnett Shale, at extraction
- Natural gas, at extraction: 0.269 kg; provider Natural gas, conventional onshore, at extraction
- Natural gas, at extraction: 0.113 kg; provider Natural gas, conventional offshore, at extraction

## Inventory method
Attributional; Data sets for the six natural gas extraction sources were linked to represent the U.S. natural gas mix. Compatible with TRACI.

## Modelling constants
Secondary data were used to determine the U.S. mix of natural gas.

## Completeness
TREATMENT OF MISSING ENVIRONMENTAL DATA: Elementary flows are cut-off at less than 1% based on environmental relevance.
TREATMENT OF MISSING TECHNOSPHERE DATA: Miscellaneous materials and additives, capital equipment, facilities and infrastructure, space conditioning, and support personnel requirements are not included in this system process. No gaps have been identified in this dataset.
MASS BALANCE: The mass balance was calculated by a straight comparison of inputs and outputs

## Data treatment
This dataset was used to model the aggregate natural gas extraction production mix process based on percentages from EIA, 2017.

## Data collection
Data collected from EIA 2017.

## Sampling procedure
BOUNDARY CONDITIONS
The system boundary includes upstream burdens from incoming natural gas extraction sources and represents a consolidation of six extraction sources into one production mix. The following are excluded from the unit process boundary: miscellaneous materials and additives, capital equipment, facilities and infrastructure, space conditioning, and support personnel requirements.

DATA COLLECTION
Secondary data were collected from EIA, 2023.

UNCERTAINTY ESTIMATION
No uncertainty analysis was carried out due to the lack of uncertainty data or probability distributions for key parameters, which are often only available as single point estimates from NETL.

## Intended application
Situation C1 - Accounting, with system-external interactions - The intended application is a purely descriptive accounting / documentation of the analysed system including existing interactions with other systems in the LCI model. These data are an update to a previously published dataset which is a generic unit process model. A full inventory of environmental flows are included; thus this unit process can be used for a full range of LCIA impact categories. The target audience of this model includes LCA practitioners, industry, and the general public. For use as an average dataset accepted by the North American plastics/chemical industry. An inventory of environmental emission flows are included to the extent that the producers provided; thus this unit process can be used for a full range of LCIA impact categories. The original study results were analyzed using the TRACI LCIA factors.

## Project
This project was funded by NAPCOR and is currently in progress. These data are an update to a previously published dataset which is a generic unit process data.

## Review 
Internal review of data entry proofreading, mass balance verification and data documentation.

## Sources
- NAPCOR, 2024, Polyethylene Terephthalate
