# Ethanol, denatured, corn stover, biochemical

Dataset: openLCA process, unit process
Category: 31-33: Manufacturing/3251: Basic Chemical Manufacturing
Geography: Northern America
Time period: 2008-12-31 to 2008-12-31
Allocation method: no allocation
Generated by: Daniel Inman
Published in: Hsu, D.
isCopyrightProtected: false
restrictionsDescription: All information can be accessed by everybody.

## Technology
current

## Geography
North America

## Time period
2009

## Reference product
- Ethanol, denatured, corn stover, biochemical [RNA]: 26100 kg

## Inputs from technosphere
- Sulphite, at plant: 0.333 kg
  boiler chemicals assumed to be divided up evenly between HCl, NaOH, and sulphite. http://www.accepta.com/water_treatment_chemicals/boiler-water-treatment.asp
- Sulfuric acid, at plant [RNA]: 3340 kg
- Gasoline, at refinery: 464 l; provider Petroleum refining, at refinery
  About a 0.6% impurity content in product stream (water, CO2, alcohols)
- Corn steep liquor [RNA]: 1300 kg
- Ethanol fermentation plant: 2.97e-5 Item(s)
  plant lifetime is 20 years. only need 1 hr. 90000 tons of ethanol is about 31 Mgal/yr in the econinvent process.
- Sodium hydroxide; chlor-alkali electrolysis; at plant: 0.333 kg; provider Chlorine; chlor-alkali electrolysis; at plant
  boiler chemicals assumed to be divided up evenly between HCl, NaOH, and sulphite. http://www.accepta.com/water_treatment_chemicals/boiler-water-treatment.asp. Proxy: Sodium hydroxide, 50% in H2O, production mix, at plant/RER with US electricity U
- Enzyme, Cellulase, Novozyme Celluclast [RER]: 570 kg
  calculated based on regression fit of several aspen sensitivity runs.
- Phosphorous fertilizer, production mix, at plant [RNA]: 163 kg
  Proxy: Diammonium phosphate, as N, at regional storehouse/RER with US electricity U
- Chemicals inorganic, at plant: 1.9 kg
  cooling tower chemicals. assumed all were inorganic.
- Energy, output: 70560 MJ
  from electricity
- Electricity, AC, 120 V: 70560 MJ; provider Electricity; at user; consumption mix - US - US
  Proxy: Electricity, medium voltage, at grid/US with US electricity U
- Chemicals organic, at plant: 24.9 kg
  waste water chemicals. assumed 50% organic.
- Hydrochloric acid, without water, in 30% solution state, at plant [RNA]: 0.333 kg
  (same comment as for Sulphite, at plant)
- Combustion, wet wood residue, AP-42 [RNA]: 615570 MJ
  HHV is from GREET for corn stover. From http://www1.eere.energy.gov/biomass/docs/energy_analysis.ppt#346,8,Feedstock Potential, 37% of feed energy is in non-ethanol producing reactants.
- Quicklime, at plant [RNA]: 2440 kg
  Proxy: Lime, hydrated, packed, at plant/CH with US electricity U
- Corn stover, at conversion plant [RNA]: 98000 kg; = 98.0*1000; provider Corn stover, at conversion plant, 2022

## Inputs from nature
- Water [resource, water, subterranean]: 197000 kg
  calculated based on regression fit of several aspen sensitivity runs.
- Nitrogen [resource, air]: 240000 kg
  calculated based on regression fit of several aspen sensitivity runs.
- Water [resource, water, subterranean]: 6270 kg
  Water brought in with enzyme stream. calculated based on regression fit of several aspen sensitivity runs.
- Oxygen [resource, air]: 71100 kg
  calculated based on regression fit of several aspen sensitivity runs.

## Waste to treatment
- Disposal, inert waste, 5% water, to inert material landfill: 10500 kg
  gypsum waste. calculated based on regression fit of several aspen sensitivity runs.

## Emissions to nature
- Nitrogen [emission, air]: 241000 kg
  calculated based on regression fit of several aspen sensitivity runs.
- Sulfur dioxide [emission, air]: 100 kg
- Methyl lactate [emission, air]: 16.4 kg
  lactic acid. calculated based on regression fit of several aspen sensitivity runs.
- Methane [emission, air]: 4.08 kg
  calculated based on regression fit of several aspen sensitivity runs.
- Carbon dioxide [emission, air]: 91500 kg
  calculated based on regression fit of several aspen sensitivity runs.
- Organic compounds [emission, air]: 1420 kg
  furfural, glyceral, sccacid, csl, xylose, solslds, lgnsol, HMF, arabanose, galactose, glucoolig, cellob, xylolig, extract, protein. calculated based on regression fit of several aspen sensitivity runs.
- Carbon monoxide [emission, air]: 63.1 kg
  calculated based on regression fit of several aspen sensitivity runs.
- Nitrogen dioxide [emission, air]: 63.1 kg
  calculated based on regression fit of several aspen sensitivity runs.
- Orthophosphate [emission, air]: 147 kg
  diammonium phosphate. calculated based on regression fit of several aspen sensitivity runs.
- Water [emission, water]: 1 kg
  calculated based on regression fit of several aspen sensitivity runs.
- Sulfuric acid [emission, air]: 1.55 kg
- Acetic acid [emission, air]: 108 kg
  calculated based on regression fit of several aspen sensitivity runs.
- Oxygen [emission, air]: 18100 kg
  calculated based on regression fit of several aspen sensitivity runs.

## Sources
- Hess, J.
- Hsu, D.
