# Ethanol, denatured, switchgrass, biochemical

Dataset: openLCA process, unit process
Category: 31-33: Manufacturing/3251: Basic Chemical Manufacturing
Geography: Northern America
Time period: 2008-12-31 to 2008-12-31
Allocation method: no allocation
Generated by: Daniel Inman
Published in: Hsu, D.
isCopyrightProtected: false
restrictionsDescription: All information can be accessed by everybody.

## Technology
modern

## Geography
North America

## Time period
2009

## Reference product
- Ethanol, denatured, switchgrass, biochemical [RNA]: 26100 kg

## Inputs from technosphere
- Gasoline, at refinery: 464 l; provider Petroleum refining, at refinery
  About a 0.6% impurity content in product stream (water, CO2, alcohols)
- Energy, output: 70560 MJ
  from electricity
- Phosphorous fertilizer, production mix, at plant [RNA]: 163 kg
  proxy: Diammonium phosphate, as N, at regional storehouse/RER with US electricity U
- Combustion, wet wood residue, AP-42 [RNA]: 616000 MJ
  HHV is from GREET for corn stover. From http://www1.eere.energy.gov/biomass/docs/energy_analysis.ppt#346,8,Feedstock Potential, 37% of feed energy is in non-ethanol producing reactants.
- Sodium hydroxide; chlor-alkali electrolysis; at plant: 0.333 kg; provider Chlorine; chlor-alkali electrolysis; at plant
  boiler chemicals http://www.accepta.com/water_treatment_chemicals/boiler-water-treatment.asp. proxy: Sodium hydroxide, 50% in H2O, production mix, at plant/RER with US electricity U
- Chemicals organic, at plant: 24.9 kg
  waste water chemicals. assumed 50% organic.
- Hydrochloric acid, without water, in 30% solution state, at plant [RNA]: 0.333 kg
  boiler chemicals http://www.accepta.com/water_treatment_chemicals/boiler-water-treatment.asp
- Chemicals inorganic, at plant: 1.9 kg
  cooling tower chemicals. assumed all were inorganic.
- Sulphite, at plant: 0.333 kg
  (same comment as for Hydrochloric acid, without water, in 30% solution state, at plant)
- Enzyme, Cellulase, Novozyme Celluclast [RER]: 567 kg
  calculated based on regression fit of several aspen sensitivity runs.
- Corn steep liquor [RNA]: 1300 kg
- Ethanol fermentation plant: 2.97e-5 Item(s)
  plant lifetime is 20 years. only need 1 hr. 90000 tons of ethanol is about 31 Mgal/yr in ecoinvent process.
- Quicklime, at plant [RNA]: 2440 kg
  proxy: Lime, hydrated, packed, at plant/CH with US electricity U
- Sulfuric acid, at plant [RNA]: 3340 kg
- Electricity, AC, 120 V: 70560 MJ; provider Electricity; at user; consumption mix - US - US
  calculated based on regression fit of several aspen sensitivity runs. Proxy: Electricity, medium voltage, at grid/US with US electricity U
- Switchgrass, at conversion plant [RNA]: 98000 kg; = 98.0*1000; provider Switchgrass, at conversion plant, 2022

## Inputs from nature
- Water [resource, water, subterranean]: 200000 kg
  calculated based on regression fit of several aspen sensitivity runs.
- Nitrogen [resource, air]: 246000 kg
  calculated based on regression fit of several aspen sensitivity runs.
- Water [resource, water, subterranean]: 6240 kg
  Water brought in with enzyme stream. calculated based on regression fit of several aspen sensitivity runs.
- Oxygen [resource, air]: 72600 kg
  calculated based on regression fit of several aspen sensitivity runs.

## Waste to treatment
- Disposal, inert waste, 5% water, to inert material landfill: 9610 kg
  gypsum waste. calculated based on regression fit of several aspen sensitivity runs.

## Emissions to nature
- Organic compounds [emission, air]: 1420 kg
  furfural, glyceral, sccacid, csl, xylose, solslds, lgnsol, HMF, arabanose, galactose, glucoolig, cellob, xylolig, extract, protein. calculated based on regression fit of several aspen sensitivity runs.
- Oxygen [emission, air]: 18500 kg
  calculated based on regression fit of several aspen sensitivity runs.
- Methyl lactate [emission, air]: 16.5 kg
  lactic acid. calculated based on regression fit of several aspen sensitivity runs.
- Acetic acid [emission, air]: 108 kg
  calculated based on regression fit of several aspen sensitivity runs.
- Sulfur dioxide [emission, air]: 100 kg
- Carbon dioxide [emission, air]: 93100 kg
  calculated based on regression fit of several aspen sensitivity runs.
- Orthophosphate [emission, air]: 147 kg
  diammonium phosphate. calculated based on regression fit of several aspen sensitivity runs.
- Water [emission, water]: 239000 kg
  calculated based on regression fit of several aspen sensitivity runs.
- Carbon monoxide [emission, air]: 64.6 kg
  calculated based on regression fit of several aspen sensitivity runs.
- Nitrogen [emission, air]: 246000 kg
  calculated based on regression fit of several aspen sensitivity runs.
- Sulfuric acid [emission, air]: 1.55 kg
- Methane [emission, air]: 4.15 kg
  calculated based on regression fit of several aspen sensitivity runs.
- Nitrogen dioxide [emission, air]: 64.6 kg
  calculated based on regression fit of several aspen sensitivity runs.

## Sources
- Hess, J.
- Hsu, D.
