# Transport, barge, average fuel mix

Dataset: openLCA process, unit process
Category: 48-49: Transportation and Warehousing/4832: Inland Water Transportation
Geography: United States
Time period: 2019-01-01 to 2019-12-31
Allocation method: no allocation
Data quality: US EPA - Process Pedigree Matrix (4;5)
Generated by: Franklin Associates, A Division of ERG
Owner: Franklin Associates, A Division of ERG
Published in: Oak Ridge National Laboratory, 2022
isCopyrightProtected: false
restrictionsDescription: "These U.S. LCI Database Project data (""Data"") are provided by the National Renewable Energy Laboratory (""NREL""), operated by the Alliance for Sustainable Energy, LLC (""Alliance"") for the US Department of Energy (""DOE"") under Contract No. DE-AC36-08GO28308. The United States Government (the ""Government"") retains and the user acknowledges that the Government retains a non-exclusive, paid-up, irrevocable, worldwide license to publish or reproduce the published form of these data, or allow others to do so, for Government purposes.
Access to and use of these Data shall impose the following obligations on the user, as set forth in this Agreement. The user is granted the right, without any fee or cost, to use, copy, modify, alter, enhance and distribute these Data for any purpose whatsoever, provided that this entire notice appears in all copies of the Data. Any modification, alteration or enhancement of these data shall be identified and documented by the user. Further, the user agrees to credit the DOE/NREL/Alliance in any publication that results from the use of these Data. The names DOE/NREL/Alliance, however, may not be used in any advertising or publicity to endorse or promote any products or commercial entities unless specific written permission is obtained from DOE/NREL/Alliance. The user also understands that DOE/NREL/Alliance is not obligated to provide the user with any support, consulting, training or assistance of any kind with regard to the use of these Data or to provide the user with any updates, revisions or new versions of these Data.
YOU AGREE TO INDEMNIFY THE GOVERNMENT AND DOE/NREL/ALLIANCE, AND ITS SUBSIDIARIES, AFFILIATES, OFFICERS, AGENTS, AND EMPLOYEES AGAINST ANY CLAIM OR DEMAND, INCLUDING REASONABLE ATTORNEYS' FEES, RELATED TO YOUR USE OF THESE DATA. THESE DATA ARE PROVIDED BY DOE/NREL/ALLIANCE ""AS IS"" AND ANY EXPRESS OR IMPLIED WARRANTIES, INCLUDING BUT NOT LIMITED TO, THE IMPLIED WARRANTIES OF MERCHANTABILITY AND FITNESS FOR A PARTICULAR PURPOSE ARE DISCLAIMED. IN NO EVENT SHALL THE GOVERNMENT OR DOE/NREL/ALLIANCE BE LIABLE FOR ANY SPECIAL, INDIRECT OR CONSEQUENTIAL DAMAGES OR ANY DAMAGES WHATSOEVER, INCLUDING BUT NOT LIMITED TO CLAIMS ASSOCIATED WITH THE LOSS OF DATA OR PROFITS, WHICH MAY RESULT FROM AN ACTION IN CONTRACT, NEGLIGENCE OR OTHER TORTIOUS CLAIM THAT ARISES OUT OF OR IN CONNECTION WITH THE ACCESS, USE OR PERFORMANCE OF THESE DATA."

## General comment
This cradle-to-gate unit process is for the transport of 1 tonne of freight 1 kilometer via a barge. This dataset represents an average barge fuel mix of 22% residual fuel oil and 78% diesel.

## Technology
Most (78%) barges in the US rely on diesel as a fuel source, the remaining barges rely on residual fuel oil or other fuel sources. This model only considers diesel and residual fuel oil.

## Geography
This process is representative of a US barge fuel mix.

## Time period
This unit process is representative of 2019 data.

## Reference product
- Transport, barge, average fuel mix [RNA]: 1 t*km

## Inputs from technosphere
- Transport, barge, diesel powered [RNA]: 0.78 t*km
- Transport, barge, residual fuel oil powered [RNA]: 0.22 t*km

## Inventory method
Cradle-to-gate

## Modelling constants
The percentage split in this process is based off data reported in the Transportation Energy Databook and industry websites.

## Completeness
TREATMENT OF MISSING ENVIRONMENTAL DATA: N/A

TREATMENT OF MISSING TECHNOSPHERE DATA: N/A

MASS BALANCE: Complete

## Data selection
Data for diesel use in barges was sourced from the Transportation Energy Databook and the residual fuel oil split was confirmed by qualitative data from industry websites.

## Data treatment
The data source provided a fuel split of 78% for diesel and 9% for residual fuel oil. It was unclear what fuel accounted for the remaining percentage so it was assumed to be diesel, this was verified with qualitative data from industry websites.

## Data collection
The data collected represents the 2019 diesel/residual fuel oil split.

## Sampling procedure
DATA COLLECTION: Data was collected from the Transportation Energy Databook

## Intended application
The intended application for this process is for accounting purposes as described in Goal Situation C1 from the ILCD Handbook's Detailed Guidance. LCA studies with this intended application offer "purely descriptive documentation of the system under analysis (e.g., a product, sector or country), without being interested in any potential consequences on other parts of the economy.” The studies categorized under Goal Situation C1 do consider existing benefits outside the analyzed system such as recycling. These data are an update to a previously published dataset.

## Project
USLCI curator updates

## Sources
- Oak Ridge National Laboratory, 2022
