# Petroleum refining, at refinery

Dataset: openLCA process, unit process
Category: 31-33: Manufacturing/3241: Petroleum and Coal Products Manufacturing
Geography: United States
Time period: 2009-01-01 to 2023-12-31
Allocation method: physical allocation
Data quality: US EPA - Process Pedigree Matrix (4;1)
Generated by: Franklin Associates, A Division of ERG
Published in: Franklin Associates (2020). Cradle-to-Gate Life Cycle Analysis of Olefins
isCopyrightProtected: false
restrictionsDescription: These U.S. LCI Database Project data ("Data") are provided by the National Renewable Energy Laboratory ("NREL"), operated by the Alliance for Sustainable Energy, LLC ("Alliance") for the US Department of Energy ("DOE") under Contract No. DE-AC36-08GO28308. The United States Government (the "Government") retains and the user acknowledges that the Government retains a non-exclusive, paid-up, irrevocable, worldwide license to publish or reproduce the published form of these data, or allow others to do so, for Government purposes.
Access to and use of these Data shall impose the following obligations on the user, as set forth in this Agreement. The user is granted the right, without any fee or cost, to use, copy, modify, alter, enhance and distribute these Data for any purpose whatsoever, provided that this entire notice appears in all copies of the Data. Any modification, alteration or enhancement of these data shall be identified and documented by the user. Further, the user agrees to credit the DOE/NREL/Alliance in any publication that results from the use of these Data. The names DOE/NREL/Alliance, however, may not be used in any advertising or publicity to endorse or promote any products or commercial entities unless specific written permission is obtained from DOE/NREL/Alliance. The user also understands that DOE/NREL/Alliance is not obligated to provide the user with any support, consulting, training or assistance of any kind with regard to the use of these Data or to provide the user with any updates, revisions or new versions of these Data.
YOU AGREE TO INDEMNIFY THE GOVERNMENT AND DOE/NREL/ALLIANCE, AND ITS SUBSIDIARIES, AFFILIATES, OFFICERS, AGENTS, AND EMPLOYEES AGAINST ANY CLAIM OR DEMAND, INCLUDING REASONABLE ATTORNEYS' FEES, RELATED TO YOUR USE OF THESE DATA. THESE DATA ARE PROVIDED BY DOE/NREL/ALLIANCE "AS IS" AND ANY EXPRESS OR IMPLIED WARRANTIES, INCLUDING BUT NOT LIMITED TO, THE IMPLIED WARRANTIES OF MERCHANTABILITY AND FITNESS FOR A PARTICULAR PURPOSE ARE DISCLAIMED. IN NO EVENT SHALL THE GOVERNMENT OR DOE/NREL/ALLIANCE BE LIABLE FOR ANY SPECIAL, INDIRECT OR CONSEQUENTIAL DAMAGES OR ANY DAMAGES WHATSOEVER, INCLUDING BUT NOT LIMITED TO CLAIMS ASSOCIATED WITH THE LOSS OF DATA OR PROFITS, WHICH MAY RESULT FROM AN ACTION IN CONTRACT, NEGLIGENCE OR OTHER TORTIOUS CLAIM THAT ARISES OUT OF OR IN CONNECTION WITH THE ACCESS, USE OR PERFORMANCE OF THESE DATA.

## General comment
This gate-to-gate unit process is for net production of 1 kilogram of general refinery product as well as data allocated to specific refinery products. The data are allocated to specific refinery products based on the percent by mass of each product in the refinery output. The refinery process key inputs include crude petroleum, electricity, and natural gas. Key outputs include refinery products (include gasoline, distillate/diesel oil, LPG, residual oil, kerosene/jet fuel, and other (still gas, petroleum, coke, asphalt, and petrochemical feedstocks)) and emissions to air, water, and soil. The emission data for the process is adapted from inventory data compiled by the National Energy Technology Lab. Emissions data, representing releases to air and water, cover 153 U.S. refineries. Crude oil consumption was calculated based on reported operating capacities by refinery and reported utilization from EIA. Total production of U.S. refining products and annual fuel and material consumption by region is reported by the EIA.

## Technology
The refining process begins in a distilling column, where liquid oil is heated to a vapor and lifted upward to be distilled again into separate substances. Distilling exploits the characteristic of the chemicals in crude oil to boil at different temperatures, a phenomenon that engineers chart along distillation curves. A distilling column contains a set of trays that allow heated vapors to rise and collect at different levels, separating out the various liquids derived from crude oil. Since the top of the column is cooler than the bottom, the liquids vaporize and rise, then they condense again, collecting onto their respective trays. Butane and other light products rise to the top of the column, while straight-run gasoline, naphtha, kerosene, diesel, and heavy gas oil gather on the trays, leaving straight run residue at the base of the column. Liquids are considered “heavy” or “light” based on their specific gravity, which is determined based on its weight and density compared to that of water.

The term cracking comes from the process of breaking up long hydrocarbon molecules into smaller, more useful molecules. The cracking process converts heavy straight run liquids into lighter liquids, such as gasoline. There are multiple versions of the cracking process, and refiners use the process extensively. Cracking is a highly controlled process, so cracking units exist separate from distillation columns. The most common type of cracking is “cat cracking,” named for the use of catalysts, substances added to a chemical reaction to speed up the process. The products from the cracking process may then go to a reformer to create gasoline or other fuels. For this analysis, no further processes are considered beyond the cracker as naphtha is the common refinery feed sent to steam crackers (olefins plants).

## Geography
This process is representative of petroleum refining in the U.S.

## Time period
Petroleum refining emissions are representative of 2014 data, crude oil consumption is representative of 2016 data, water consumption is representative of 2009 data, solid waste data is representative of 1996, and transport data is representative of 2017. Total production of U.S. refining products is representative of 2023 data.

## Reference product
- Diesel, at refinery: 0.252345 l
  Mass (0.2188 kg/kg output) used for allocation. Conversion to volume used 1.153 L/kg (from a 7.24lb/gal as density factor).

## By-products
- Petroleum coke, at refinery [RNA]: 0.0595942 kg
  Mass (0.0596 kg/kg output) used for allocation.
- Bitumen, at refinery: 0.0371748 kg
  Mass (0.0372 kg/kg output) used for allocation.
- Petroleum refining coproduct, at refinery [RNA]: 0.0514537 kg
  Mass (0.0515 kg/kg output) used for allocation. For internal offgas or material use.
- Liquefied petroleum gas, at refinery [RNA]: 0.0490832 l
  100% propane. Mass (0.0266 kg/kg output) used for allocation. Conversion to volume used 1.84 L/kg (from a 4.52 lb/gal as density factor).
- Kerosene, at refinery [RNA]: 0.112458 l
  Mass (0.0910 kg/kg output) used for allocation. Conversion to volume used 1.236 L/kg (from 6.75 lb/gal as density factor).
- Gasoline, at refinery: 0.570087 l
  Mass (0.4213 kg/kg output) used for allocation. Conversion to volume used 1.353 L/kg (from 6.47 lb/gal as density factor).
- Residual fuel oil, at refinery [RNA]: 0.0518261 l
  Mass (0.0489 kg/kg output) used for allocation. Conversion to volume used 1.059 L/kg (from 7.88 lb/gal as density factor).
- Refinery gas, at refinery [RNA]: 0.0611691 m3
  Mass (0.0451 kg/kg output) used for allocation. Conversion to volume used 1.356 m3/kg (from a density factor of 0.046 lb/ft3 for natural gas).

## Inputs from technosphere
- Residual fuel oil, at refinery [RNA]: 3.9e-8 m3; provider Petroleum refining, at refinery
- Hydrogen, at plant: 0.00459 kg; provider Hydrogen, liquid, synthesis gas, at plant
  Hydrogen gas
- Natural gas, production mixture, at processing: 0.00472 kg
  Includes natural gas used as hydrogen feed and other hydrocarbons where natural gas was used as a proxy.
- Transport, ocean freighter, diesel powered [US]: 3.098 t*km
- Transport, train, diesel powered [RNA]: 0.145 t*km
- Transport, barge, diesel powered [RNA]: 0.016 t*km
- Liquefied petroleum gas, at refinery [RNA]: 3.4e-5 m3; provider Petroleum refining, at refinery
- Methyl tert-butyl, at plant: 0.00014 kg
- Ethanol, 85%, at blending terminal [RNA]: 0.00318 kg; provider Ethanol, 85%, at blending terminal, 2022
- Sulfuric acid, at plant [RNA]: 0.00139 kg
- Electricity, AC, 120 V: 0.19728 MJ; provider Electricity; at user; consumption mix - US - US
- Hydrogen fluoride, at plant: 4.2e-6 kg
- Bituminous coal, combusted in industrial boiler [RNA]: 0.00018 kg
- Natural gas, combusted in industrial boiler [RNA]: 0.0209 m3
  Includes natural gas used as a fuel source. Conversion assumed 0.829kg=1m3 natural gas
- Crude oil, production mixture, at extraction [RNA]: 0.954 kg
  This weight reflects material loss at processing. MATERIAL USE.
- Transport, pipeline, unspecified petroleum products [RNA]: 0.588 t*km

## Inputs from nature
- Water [resource, water]: 1.68 l

## Waste to treatment
- Disposal, solid waste, process, to sanitary landfill: 0.00517 kg

## Emissions to nature
- 1,2,3,4,7,8-Hexachlorodibenzo-p-dioxin [emission, air]: 3.3e-16 kg
- 2-Methylnaphthalene [emission, water]: 2.2e-11 kg
- Selenium [emission, water]: 1.8e-9 kg
- Silver [emission, water]: 6.5e-13 kg
- Tetrachloroethylene [emission, water]: 7.9e-11 kg
- Acenaphthene [emission, water]: 7.6e-13 kg
- Mercury [emission, air]: 7.9e-10 kg
- Naphthalene [emission, air]: 1.4e-7 kg
- Particulate matter, ≤ 2.5μm [emission, air]: 2.2e-5 kg
- Indeno[1,2,3-cd]pyrene [emission, air]: 1.5e-11 kg
- 1,3-Butadiene [emission, water]: 5.3e-11 kg
- CFC-13 [emission, air]: 2.17973e-11 kg
- Acetamide [emission, air]: 8.5e-13 kg
- Polychlorinated biphenyls [emission, air]: 5.7e-15 kg
- 1,2,4-Trichlorobenzene [emission, air]: 9.1e-12 kg
- Acetonitrile [emission, water]: 3.8e-10 kg
- Cresol [emission, air]: 2.5e-8 kg
- 2-Nitropropane [emission, air]: 8.6e-11 kg
- p-Phenylenediamine [emission, air]: 3.9e-11 kg
- Sulfur [emission, water]: 1.9e-11 kg
- Hydrogen sulfide [emission, water]: 1.3e-8 kg
- Diethanolamine [emission, air]: 5.5e-8 kg
- Methyl tert-butyl ether [emission, air]: 3.1e-8 kg
  Proxy for t-Butyl methyl ether
- Carbon monoxide [emission, air]: 6.1e-5 kg
- Polycyclic aromatic hydrocarbons [emission, water]: 6.5e-10 kg; = 6.5E-10+9.3E-19
- Selenium compounds [emission, water]: 1.8e-9 kg
- Silver compounds [emission, water]: 5.4e-15 kg
- Diethanolamine [emission, water]: 5.8e-10 kg
- 1,2,3,4,6,7,8,9-Octachlorodibenzofuran [emission, air]: 1.6e-15 kg
- Hydrazine [emission, air]: 4.3e-13 kg
- Cresol [emission, water]: 1e-9 kg
- 3,3'-Dichlorobenzidine [emission, air]: 9.1e-12 kg
- Chromium(VI) [emission, air]: 4.8e-10 kg
- o-Xylene [emission, water]: 2.1e-10 kg
- Hexachloroethane [emission, air]: 9.1e-12 kg
- Chloroethane [emission, air]: 3.98e-12 kg; = 1.8E-13+3.8E-12
- Total suspended solids [emission, water]: 1.7e-5 kg
- o-Xylene [emission, air]: 6e-10 kg
- 1,2,3,4,6,7,8-Heptachlorodibenzofuran [emission, air]: 5.5e-15 kg
- Phenanthrene [emission, air]: 7.5e-9 kg
- Hydrochloric acid [emission, air]: 2.4e-7 kg
- Chrysene [emission, air]: 9e-11 kg
- p-Xylene [emission, water]: 2e-11 kg
- Isophorone [emission, air]: 1.3e-11 kg
- Nitrogen [emission, water]: 4.3e-7 kg
- Anthracene [emission, water]: 6.5e-11 kg
- Hydrofluoric acid [emission, air]: 2.8e-8 kg
- 1,2,3,4,7,8-Hexachlorodibenzofuran [emission, air]: 1.9e-15 kg
- Dibutyl phthalate [emission, air]: 2.6e-10 kg
- 1,2,3,4,7,8-Hexachlorodibenzofuran [emission, water]: 3.3e-16 kg
- Sulfuric acid [emission, air]: 2.4e-6 kg
- Hexane [emission, water]: 7.4e-10 kg
- N,N-Dimethylformamide [emission, air]: 3.7e-12 kg
- o-Cresol [emission, air]: 3.5e-16 kg
- Nickel [emission, air]: 1.6e-8 kg
- Hydrogen sulfide [emission, air]: 7.3e-7 kg
- Chloroform [emission, air]: 5.1e-9 kg
- Xylene [emission, water]: 5.1e-9 kg
- tert-Butanol [emission, water]: 6.5e-12 kg
  Proxy for t-Butyl alcohol
- Zinc compounds [emission, air]: 2.8e-8 kg
- o-Toluidine [emission, air]: 1.8e-11 kg
- 1,1,2,2-Tetrachloroethane [emission, air]: 3.1e-11 kg
- Ammonia [emission, air]: 3.3e-6 kg
- Benzofluoranthene [emission, air]: 5.1e-12 kg
- Ethylene glycol [emission, air]: 1.5e-8 kg
- Benzo[k]fluoranthene [emission, air]: 1.1e-12 kg
- Nickel [emission, water]: 4.6e-11 kg
- Catechol [emission, air]: 1.2e-10 kg
- Benzo[a]pyrene [emission, water]: 3.1e-11 kg
- 2,4-Dinitrotoluene [emission, air]: 9.1e-12 kg
- Ethane, 1,2-dibromo-1,1,2-trifluoro- [emission, air]: 2.7e-9 kg
- Lead compounds [emission, water]: 1.1e-9 kg
- 1,2,3,6,7,8-Hexachlorodibenzo-p-dioxin [emission, air]: 4.9e-16 kg
- Chlorine [emission, air]: 3.9e-8 kg
- Asbestos [emission, air]: 7.5e-13 kg
- 1,2,3,7,8,9-Hexachlorodibenzofuran [emission, air]: 1.2e-15 kg
- Manganese [emission, air]: 5.4e-9 kg
- Ethanol, 2-(2-propoxyethoxy)- [emission, air]: 4.5e-11 kg
- Nickel compounds [emission, water]: 5.5e-9 kg
- Methanol [emission, water]: 3.7e-8 kg
- m-Xylene [emission, water]: 2.1e-11 kg
- N-Nitrosodimethylamine [emission, air]: 9.1e-12 kg
- Anthracene [emission, air]: 4.1e-11 kg
- 2-Methylnaphthalene [emission, air]: 2.8e-10 kg
- HCFC-22 [emission, air]: 1.1e-8 kg
- 1,2-Dichloroethane [emission, air]: 1.1e-9 kg
- Sulfur dioxide [emission, air]: 3.9e-5 kg
- Cyclohexane [emission, air]: 2.8e-7 kg
- Chrysene [emission, water]: 1.8e-11 kg
- Carbon tetrachloride [emission, air]: 1.36233e-12 kg
- Toluene [emission, air]: 1.1e-6 kg
- Nitrous oxide [emission, air]: 1.9e-6 kg
- Biphenyl [emission, air]: 9.4e-9 kg
- Glycol ethers [emission, air]: 1.1e-8 kg
- Beryllium [emission, air]: 5.9e-11 kg
- Silver compounds [emission, air]: 6e-9 kg
- Perylene [emission, air]: 5.8e-15 kg
- Volatile organic compounds [emission, air]: 7e-5 kg
- Dibenz[a,h]anthracene [emission, air]: 1.2e-11 kg
- Sulfide [emission, water]: 1.86306e-10 kg
- Hexachlorobenzene [emission, air]: 9.1e-12 kg
- Lead [emission, water]: 1.6e-11 kg
- Chemical Oxygen Demand [emission, water]: 2.7e-5 kg
- Ethylene dibromide [emission, air]: 4.26875e-12 kg
- 2,4-Dinitrophenol [emission, air]: 9.1e-12 kg
- Copper [emission, water]: 1.4e-10 kg
- Bis(2-chloroethyl) ether [emission, air]: 9.1e-12 kg
- Chromium(VI) [emission, water]: 7.6e-10 kg
- Zinc compounds [emission, water]: 2.7e-8 kg
- Chromium(III) [emission, air]: 2.8e-9 kg
- Manganese compounds [emission, water]: 9.3e-10 kg
- 3-Methylcholanthrene [emission, air]: 2.9e-14 kg
- Methyl tert-butyl ether [emission, water]: 5.4e-13 kg
- 1,2-Dichloropropane [emission, air]: 5.9e-12 kg
- Ethylbenzene [emission, air]: 2e-7 kg
- Styrene [emission, air]: 1.3e-8 kg
- Dichlorobenzene [emission, air]: 2.4e-11 kg
  Proxy for Benzene, 1,4-dichloro-
- Toluene [emission, water]: 2.5e-9 kg
- Pyrene [emission, water]: 1.8e-11 kg
- Ammonia [emission, water]: 2e-7 kg
- Oils, unspecified [emission, water]: 1.5e-6 kg
- Chlorobenzene [emission, air]: 3.5e-10 kg
- 1,2,3,4,6,7,8-Heptachlorodibenzofuran [emission, water]: 4.1e-16 kg
- Dibenz[a,h]anthracene [emission, water]: 1.8e-11 kg
- Benzidine [emission, air]: 9.7e-11 kg
- Arsenic [emission, air]: 5.7e-10 kg
- 1-Methylnaphthalene [emission, air]: 1.7e-10 kg
- 2,3,7,8-Tetrachlorodibenzo-p-dioxin [emission, water]: 1.7e-17 kg
- Vanadium compounds [emission, water]: 1.7e-8 kg
- tert-Butanol [emission, air]: 2e-10 kg
  Proxy for t-Butyl alcohol
- Dibromomethane [emission, air]: 3.7e-9 kg
  Proxy for Methane, bromo-, Halon 1001
- Propylene [emission, air]: 1e-6 kg
- Fluoranthene [emission, air]: 6.9e-10 kg
- Cobalt [emission, air]: 6.1e-10 kg
- Cumene [emission, air]: 1.1e-7 kg
- Naphthalene [emission, water]: 1e-9 kg
- 4-Dimethylaminoazobenzene [emission, air]: 5.2e-12 kg
- Carbonyl sulfide [emission, air]: 2e-7 kg
- Dicyclopentadiene [emission, air]: 1.7e-9 kg
- Epichlorohydrin [emission, air]: 6.5e-9 kg
- 2,4,6-Trichlorophenol [emission, air]: 1e-11 kg
- N-Methyl-2-pyrrolidone [emission, water]: 1.5e-11 kg
- Quinoline [emission, air]: 1.7e-11 kg
- Benzo[e]pyrene [emission, air]: 5e-14 kg
- Copper compounds [emission, water]: 3.9e-10 kg
- Hexachlorobutadiene [emission, air]: 9.1e-12 kg
- Mercury [emission, water]: 1.4e-12 kg
- Benzene [emission, air]: 6.4e-7 kg
- Methyl isobutyl ketone [emission, air]: 2e-7 kg
  Proxy for 4-Methyl-2-pentanone
- Benzo[ghi]perylene [emission, water]: 8.8e-11 kg
- Biological Oxygen Demand [emission, water]: 1.1e-5 kg
- Chromium(III) [emission, water]: 2.8e-10 kg
- Chromium compounds [emission, water]: 2.5e-10 kg
- 2,2,4-Trimethylpentane [emission, air]: 1.8e-7 kg
- Vanadium [emission, water]: 5.35608e-11 kg
- Pyrene [emission, air]: 9.1e-10 kg
- 2,3,7,8-Tetrachlorodibenzofuran [emission, air]: 1.2e-15 kg
- 3,3'-Dimethoxybenzidine [emission, air]: 6.3e-11 kg
- Benz[a]acridine [emission, air]: 7.2e-14 kg
- 1,2,3,4,6,7,8,9-Octachlorodibenzo-p-dioxin [emission, air]: 2.2e-15 kg
- Ozone [emission, air]: 3.7e-8 kg
- Carbon disulfide [emission, air]: 4e-8 kg
- Isoprene [emission, water]: 5.4e-10 kg
- Acenaphthene [emission, air]: 1.8e-12 kg
- Benzo(b)fluoranthene [emission, air]: 4.4e-12 kg
- Cyanamide [emission, air]: 7e-7 kg
- 1,2,3,7,8-Pentachlorodibenzo-p-dioxin [emission, air]: 3.2e-16 kg
- 1,2,3,7,8-Pentachlorodibenzofuran [emission, air]: 1.4e-15 kg
- Benzo[ghi]perylene [emission, air]: 1.6e-9 kg
- Manganese [emission, water]: 4.1e-9 kg
- Aniline [emission, air]: 9.2e-10 kg
- Nitrate compounds [emission, water]: 1.2e-5 kg
- m-Cresol [emission, air]: 3.8e-11 kg
- 2,3,4,6,7,8-Hexachlorodibenzofuran [emission, air]: 1.9e-15 kg
- 1,2,3,7,8,9-Hexachlorodibenzo-p-dioxin [emission, air]: 4.1e-16 kg
- Methane [emission, air]: 3.6e-5 kg
- Acenaphthylene [emission, water]: 7.6e-13 kg
- Ethylene [emission, water]: 3.5e-10 kg
- Hydrofluoric acid [emission, water]: 6e-12 kg
- 1-Butanol [emission, air]: 7.4e-10 kg
- Benzo[k]fluoranthene [emission, water]: 7.6e-13 kg
- 2,3,4,6,7,8-Hexachlorodibenzofuran [emission, water]: 5.3e-17 kg
- Dibenzofuran [emission, air]: 2.8e-11 kg
- Hexane [emission, air]: 1.3e-6 kg
- 2,4,5-Trichlorophenol [emission, air]: 9.1e-12 kg
- Vanadium compounds [emission, air]: 2.3e-9 kg
- Acetophenone [emission, air]: 6.1e-10 kg
- Hydrogen cyanide [emission, air]: 2.2e-6 kg
- Lead [emission, air]: 2.3e-9 kg
- 1,2,4-Trimethylbenzene [emission, water]: 6.9e-10 kg
- 1,1,2-Trichloroethane [emission, air]: 9.2e-12 kg
- Cumene [emission, water]: 4.1e-10 kg
- 3,3'-Dimethylbenzidine [emission, air]: 4.4e-11 kg
- 1,3-Dichloropropene [emission, air]: 1.2e-11 kg
- Nitrobenzene [emission, air]: 1.7e-10 kg
- 1,2,3,7,8,9-Hexachlorodibenzo-p-dioxin [emission, water]: 4.8e-17 kg
- Vanadium [emission, air]: 1.1e-11 kg
- Ethylene glycol [emission, water]: 2.5e-8 kg
- Barium [emission, air]: 4.3e-12 kg
- 2,3,7,8-Tetrachlorodibenzofuran [emission, water]: 3.5e-17 kg
- Antimony [emission, air]: 6.7e-9 kg
- 2-Methoxyethanol [emission, air]: 2.5e-10 kg
- Antimony compounds [emission, water]: 2.2e-9 kg
- p-Xylene [emission, air]: 4.8e-10 kg
- Styrene [emission, water]: 3.9e-10 kg
- 1,2,3,6,7,8-Hexachlorodibenzofuran [emission, air]: 2e-15 kg
- 2-Ethoxyethanol [emission, water]: 2.1e-10 kg
- Mercury compounds [emission, water]: 4.2e-11 kg
- Trichloroethylene [emission, air]: 5.2e-9 kg
- 2,3,4,7,8-Pentachlorodibenzofuran [emission, water]: 7.7e-17 kg
- 1,2,3,7,8-Pentachlorodibenzo-p-dioxin [emission, water]: 4e-17 kg
- Glycidol [emission, air]: 3.5e-11 kg
- Carbon dioxide [emission, air]: 0.22 kg
- Ethylbenzene [emission, water]: 9.8e-10 kg
- 1,2,4-Trimethylbenzene [emission, air]: 2.1e-7 kg
- Isoprene [emission, air]: 4.8e-9 kg
- Particulate matter, ≤ 10μm [emission, air]: 3.5e-6 kg
- 1,1,1-Trichloroethane [emission, air]: 9.1e-10 kg
- Hexachlorocyclopentadiene [emission, air]: 9.1e-12 kg
- 2,4-Dimethylphenol [emission, air]: 1.8e-10 kg
- Barium compounds [emission, water]: 2.9e-9 kg
- Acrolein [emission, air]: 6.4e-9 kg
- Methyl isobutyl ketone [emission, water]: 2.3e-11 kg
- Propylene oxide [emission, air]: 3.4e-11 kg
- Molybdenum trioxide [emission, air]: 1.2e-9 kg
- Cyanamide [emission, water]: 4.3e-10 kg
- Chlorofluorocarbons [emission, air]: 4.4e-10 kg
- Benz[a]anthracene [emission, water]: 3.1e-11 kg
- 1,1-Dichloroethane [emission, air]: 5e-12 kg
- 2,4-Dimethylphenol [emission, water]: 1.5e-10 kg
- Pentachlorophenol [emission, air]: 2e-11 kg
- Propylene [emission, water]: 3.7e-10 kg
- Formaldehyde [emission, air]: 3.5e-7 kg
- Diisobutyl ketone [emission, air]: 4e-9 kg
- Phenol [emission, air]: 8.2e-8 kg
- Barium compounds [emission, air]: 1.9e-10 kg
- Molybdenum trioxide [emission, water]: 2.2e-9 kg
- Acetonitrile [emission, air]: 7.5e-9 kg
- 1,2,3,4,6,7,8-Heptachlorodibenzo-p-dioxin [emission, air]: 1.5e-15 kg
- Aromatic hydrocarbons [emission, air]: 1.2e-8 kg
- Acrylonitrile [emission, air]: 2e-11 kg
- Total Organic Carbon [emission, water]: 7.1e-6 kg
- Phenol, 2-methoxy-4-methyl- [emission, air]: 3.1e-11 kg
- Carbon disulfide [emission, water]: 1.1e-9 kg
- Cadmium [emission, air]: 7.7e-10 kg
- Fluorene [emission, water]: 7.6e-13 kg
- 1,2,3,6,7,8-Hexachlorodibenzo-p-dioxin [emission, water]: 5.1e-17 kg
- Polycyclic organic matter [emission, air]: 5.57743e-11 kg
- Acetaldehyde [emission, air]: 2.6e-8 kg
- Copper [emission, air]: 2.3e-10 kg
- Vinyl acetate [emission, air]: 8.3e-11 kg
- Phenanthrene [emission, water]: 9.2e-11 kg
- Chromium [emission, water]: 3.5e-10 kg
- Ethylene [emission, air]: 6.1e-7 kg
- Copper compounds [emission, air]: 1.2e-9 kg
- Acenaphthylene [emission, air]: 2.6e-12 kg
- Tetrachloroethylene [emission, air]: 2.4e-8 kg
- 2,3,4,7,8-Pentachlorodibenzofuran [emission, air]: 1.7e-15 kg
- Total dissolved solids [emission, water]: 0.00019 kg
- Selenium [emission, air]: 5.8e-10 kg
- Benzo[a]pyrene [emission, air]: 1.1e-8 kg
- Phosphorus [emission, air]: 1.1e-9 kg
- Xylene [emission, air]: 9e-7 kg
- 2,3,7,8-Tetrachlorodibenzo-p-dioxin [emission, air]: 4e-16 kg
- Phenol [emission, water]: 1.1e-8 kg; = 5.5E-9+5.5E-9
- Cyclohexane [emission, water]: 3.7e-10 kg
- Methanol [emission, air]: 5.6e-7 kg
- Cadmium compounds [emission, water]: 1.1e-12 kg
- 1,2,3,4,7,8,9-Heptachlorodibenzofuran [emission, air]: 1.3e-15 kg
- Fluorene [emission, air]: 1.2e-11 kg
- 1,4-Dioxane [emission, air]: 1.2e-11 kg
- N-Methyl-2-pyrrolidone [emission, air]: 3.9e-9 kg
- Chlorine [emission, water]: 2.5e-10 kg
- Cobalt compounds [emission, water]: 6.7e-10 kg
- Chloromethane [emission, air]: 1.8e-8 kg
  Proxy for Methane, dichloro-, HCC-30

## Allocation factors
- causal, Diesel, at refinery, for Chromium compounds: 0
- causal, Diesel, at refinery, for Hydrofluoric acid: 0
- causal, Kerosene, at refinery, for Tetrachloroethylene: 0
- causal, Gasoline, at refinery, for Chromium(VI): 0
- causal, Kerosene, at refinery, for Ethylene: 0
- causal, Residual fuel oil, at refinery, for N-Methyl-2-pyrrolidone: 0
- causal, Liquefied petroleum gas, at refinery, for Asbestos: 0
- causal, Liquefied petroleum gas, at refinery, for 2,4,6-Trichlorophenol: 0
- causal, Residual fuel oil, at refinery, for Transport, pipeline, unspecified petroleum products: 0
- causal, Residual fuel oil, at refinery, for Hydrogen cyanide: 0
- causal, Petroleum refining coproduct, at refinery, for Total Organic Carbon: 0
- causal, Diesel, at refinery, for Ethylene glycol: 0
- causal, Residual fuel oil, at refinery, for Arsenic: 0
- causal, Diesel, at refinery, for Ethanol, 85%, at blending terminal: 0
- causal, Petroleum coke, at refinery, for Particulate matter, ≤ 10μm: 0
- causal, Gasoline, at refinery, for Catechol: 0
- causal, Liquefied petroleum gas, at refinery, for Copper: 0
- causal, Gasoline, at refinery, for Xylene: 0
- causal, Kerosene, at refinery, for Methanol: 0
- causal, Gasoline, at refinery, for N,N-Dimethylformamide: 0
- causal, Refinery gas, at refinery, for Antimony compounds: 0
- causal, Bitumen, at refinery, for Lead: 0
- causal, Kerosene, at refinery, for HCFC-22: 0
- causal, Bitumen, at refinery, for 1,2,3,4,7,8,9-Heptachlorodibenzofuran: 0
- causal, Liquefied petroleum gas, at refinery, for 1,2,3,4,7,8,9-Heptachlorodibenzofuran: 0
- causal, Diesel, at refinery, for Tetrachloroethylene: 0
- causal, Petroleum refining coproduct, at refinery, for Hydrofluoric acid: 0
- causal, Petroleum refining coproduct, at refinery, for 1,4-Dioxane: 0
- causal, Petroleum refining coproduct, at refinery, for Ethylene glycol: 0
- causal, Kerosene, at refinery, for Transport, ocean freighter, diesel powered: 0
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
## Inventory method
Attributional; gate to gate process. Compatible with TRACI.

## Modelling constants
Secondary emissions data from EPA datasets including data from 153 U.S. refineries.

## Completeness
TREATMENT OF MISSING ENVIRONMENTAL DATA: Elementary flows are cut-off at less than 1% based on environmental relevance.
TREATMENT OF MISSING TECHNOSPHERE DATA: Miscellaneous materials and additives, capital equipment, facilities and infrastructure, space conditioning, and support personnel requirements are not included in this system process. No gaps have been identified in this dataset.
MASS BALANCE: The mass balance was calculated by a straight comparison of inputs and outputs

## Data selection
Petroleum refining data include data compiled from EPA datasets including NEI, Discharge Monitoring Report (DMR), Toxic Release Inventory (TRI) and the Greenhouse Gas Reporting Program (GHGRP). Other data come from the EIA, NETL, and Oak Ridge. The data sets used were the most current and most geographically and technologically relevant data sets available during the data collection phase of the project.

## Data treatment
Reported emissions from petroleum refineries in 2014 were compiled from EPA datasets including NEI, Discharge Monitoring Report (DMR), Toxic Release Inventory (TRI) and the Greenhouse Gas Reporting Program (GHGRP). Emissions data, representing releases to air, water, and soil covers 153 U.S. refineries. Crude oil consumption was calculated based on reported operating capacities by refinery and reported utilization from the EIA, 2016. Total production of U.S. refining products is reported by the EIA, 2023. EIA also reports annual fuel and material consumption by region.

Water consumption data used here is an average with the range given as 1.18 to 2.24 cubic meters per 1,000 kg of refined oil. The lower amounts are inclined to come from newer refineries.

For solid wastes created at refinery data from (Oak Ridge, 1996) were used, which provides the solid waste on a basis of crude oil input. The amount of crude oil required to produce 1,000 kg of refined oil was updated in the calculation.

## Data collection
Primary data is from 1996-2023.

## Sampling procedure
BOUNDARY CONDITIONS
The system boundary includes upstream burdens from incoming materials, incoming fuel use, incoming transportation of materials, petroleum refining, and process waste management. The following are excluded from the unit process boundary: miscellaneous materials and additives, capital equipment, facilities and infrastructure, space conditioning, and support personnel requirements.

DATA COLLECTION
Secondary data were collected from EPA, EIA, NETL, and Oak Ridge datasets

UNCERTAINTY ESTIMATION
No uncertainty analysis was carried out due to the lack of uncertainty data or probability distributions for key parameters, which are often only available as single point estimates from NETL.

## Intended application
The intended application for this process is for accounting purposes as described in Goal Situation C1 from the ILCD Handbook's Detailed Guidance. LCA studies with this intended application offer "purely descriptive documentation of the system under analysis (e.g., a product, sector or country), without being interested in any potential consequences on other parts of the economy.” The studies categorized under Goal Situation C1 do consider existing benefits outside the analyzed system such as recycling. A full inventory of environmental flows are included; thus this unit process can be used for a full range of LCIA impact categories. The target audience of this model includes LCA practitioners, industry, and the general public. For use as an average dataset accepted by the North American plastics/chemical industry. An inventory of environmental emission flows are included to the extent that the producers provided; thus this unit process can be used for a full range of LCIA impact categories. The original study results were analyzed using the TRACI LCIA factors.

## Project
This project was funded by and submitted to the American Chemistry Council. These data are a background dataset used in the Cradle-to-Gate Life Cycle Analysis of Olefins report. Submitted to the American Chemistry Council (ACC). 2020.

## Review 
Internal review of data entry proofreading, mass balance verification and data documentation.

## Sources
- Franklin Associates (2020). Cradle-to-Gate Life Cycle Analysis of Olefins
