# Natural soda ash (Sodium carbonate), at plant

Dataset: openLCA process, unit process
Category: 21: Mining, Quarrying, and Oil and Gas Extraction/2123: Nonmetallic Mineral Mining and Quarrying
Geography: United States
Time period: 2012-12-30 to 2012-12-30
Allocation method: no allocation
Generated by: Cara Watson
Published in: Sustainable Solutions Corporation. (2015). IMA-NA Soda Ash Life Cycle Assessment
isCopyrightProtected: false
restrictionsDescription: All information can be accessed by everybody.

## General comment
The monohydrate process is the dominant process to produce soda ash but a weighted average of all natural soda ash production is accounted for. The collected datasets were weighted based on total annual production. Complete inventory data and metadata are available in full in the final report and appendices, IMA-NA Soda Ash Life Cycle Assessment. This report has been extensively reviewed within Sustainable Solutions Corporation by Tad Radzinski, Jim Mellentine and Cara Watson, as well as IMA-NA soda ash producers. This report has undergone a full critical review by Dennis S. Kostick, Lyle Nehls and Andrew Swanson. Quantities may vary slightly between the reference to main source and this module due to rounding. Important note: although most of the data in the US LCI database has undergone some sort of review, the database as a whole has not yet undergone a formal validation process. Please email comments to lci@nrel.gov.

Includes material and energy requirements and environmental emissions for one tonne of soda ash production from trona extracted from dry and solution mining. Soda ash is produced using either of two processes - the monohydrate process or the sesquicarbonate process. The monohydrate process is the dominant process The mined ore is screened and crushed, then the crushed ore is calcined to decompose the sodium sesquicarbonate in the trona ore, releasing carbon dioxide and water and leaving anhydrous sodium carbonate and insoluble impurities. The calcined trona is dissolved in water where the insoluble material settles out, leaving a sodium carbonate solution which is filtered and sent to multistage evaporative crystallizers. The settled and filtered insolubles are sent to tailings waste ponds. The crystallizers produce soda ash as monohydrate crystals which are recovered in centrifuges and then dried to remove the water, producing granular dense soda ash. The sesquicarbonate process dissolves trona in water and that solution is settled to remove insolubles and filtered to a clean solution. That solution is then sent to multistage crystallizers where sesquicarbonate crystals are formed. The sesquicarbonate crystals are recovered in centrifuges and sent to a calciner, where water and carbon dioxide are driven off by heat to form medium density granular soda ash. Several of the US soda ash producers make a portion of their soda ash by dissolving trona in water below the surface, bringing the solution to the surface through wells, and then recovering the sodium carbonate on the surface. One facility recovers trona from a shallow mixed salt deposits by injecting lake water into the formation and recovering via wells as a saturated brine.

## Technology
There are multiple processes for the prodcution of soda ash: (1) the monohydrate process, (2) the sesquicarbonate process, (3) ELDM process, and (4) solution process. These technologies are represented in this average mix.

## Geography
US

## Reference product
- Natural soda ash (Sodium carbonate), at plant [US]: 1000 kg

## Inputs from technosphere
- Portland cement, at plant: 2.18e-5, 0.616 kg (2 entries)
- Biocides, for paper production, unspecified, at plant: 0.0013336 kg
- Water, at user: 0.0006441 kg
- Diethanolamine, at plant: 0.044724 kg
- Propylene oxide, at plant [RNA]: 7.37e-5, 0.26 kg (2 entries)
- Iron and steel, production mix [RNA]: 0.000105, 2.2861 kg (2 entries)
- Expanded perlite, at plant: 0.6 kg
- Transport, combination truck, average fuel mix: 33.7, 0.0105 t*km (2 entries)
- Diesel, combusted in industrial equipment [RNA]: 0.00112, 0.28277 l (2 entries)
- Quicklime, at plant [RNA]: 12.4, 8.49 kg (2 entries)
- Copper, at regional storage: 0.0021591 kg
- Silicone product, at plant: 0.0006441 kg
- Natural gas, production mixture, to energy use: 58.05 m3; provider Natural gas, processed, for energy use, at plant
- Carbon dioxide, liquid, at plant: 0.10614 kg
- Diesel, at refinery: 0.0255 l; provider Petroleum refining, at refinery
- Residual fuel oil, at refinery [RNA]: 0.061324 l; provider Petroleum refining, at refinery
- Polyvinyl chloride resin, suspension grade PVC; at plant [RNA]: 0.0010251 kg
- Urea, at regional storehouse: 0.0557 kg
- Gasoline, combusted in equipment [RNA]: 0.061702 l
- Polyol ether, for rigid foam polyurethane production, at plant [RNA]: 0.029211 kg
- Sodium silicate, spray powder 80%, at plant: 6.8946e-5 kg
- Activated carbon, at plant: 0.205 kg
- Sodium chloride, at plant [RNA]: 0.000925 kg
- Electricity, AC, 120 V: 435.6 MJ; provider Electricity; at user; consumption mix - US - US
- Transport, train, diesel powered: 0.357 t*km
- Gravel, unspecified, at mine: 0.0357 kg
- Chlorine; chlor-alkali electrolysis; at plant: 0.0364 kg
- Polystyrene, general purpose, GPPS, at plant [RNA]: 0.0016647 kg; provider Polystyrene, general purpose, GPPS, resin; at plant
- Liquefied petroleum gas, combusted in industrial boiler [RNA]: 0.001412 l
- Lignite coal, at surface mine [RNA]: 149.69 kg
- Transport, barge, average fuel mix: 0.0945 t*km
- Sodium perborate, monohydrate, powder, at plant: 7.5e-5 kg
- Dipropylene glycol monomethyl ether, at plant: 0.00115 kg
- Polyethylene, high density, HDPE, virgin resin, at plant: 0.018098 kg
- Guar, at plant: 0.0481 kg
- Methylene diphenyl diisocyanate, MDI, resin, at plant [RNA]: 0.043817 kg; provider Methylene diphenyl diisocyanate, MDI; at plant, mass alloc
- Process-specific burdens, residual material landfill: 57.9 kg
- Acrylonitrile-butadiene-styrene, ABS, copolymer resin, at plant [RNA]: 0.027987 kg

## Inputs from nature
- Natural gas [resource, air, subterranean]: 5968.59 MJ
- Water [resource, water, fresh water body, river]: 4126.1 kg

## Waste to treatment
- Disposal, hazardous waste, 25% water, to hazardous waste incineration: 0.107 kg
- Disposal, tailings, unspecified [Northern America]: 160 kg
- Disposal, waste, to inert landfill [Northern America]: 57.9 kg
- Disposal, hazardous waste [Denmark]: 0.107 kg
- Disposal, non-sulfidic tailings, off-site: 160 kg
- Disposal, hard coal ash, 0% water, to residual material landfill: 6.75 kg
- Disposal, fly ash, unspecified treatment [Northern America]: 6.75 kg

## Emissions to nature
- Metals [emission, air]: 8.93e-6 kg
- Nitrous oxide [emission, air]: 0.00277 kg
- Ethylbenzene [emission, air]: 0.000548 kg
- Methyl ethyl ketone [emission, air]: 0.000913 kg
- Fluoride [emission, air]: 0.000979 kg
- Hydrogen sulfide [emission, air]: 0.000221 kg
- Acrolein [emission, air]: 0.000274 kg
- Styrene [emission, air]: 0.000822 kg
- Water [emission, water]: 893.58 kg
- Particulate matter [emission, air]: 0.0012, 0.073, 0.0288, 0.187 kg (4 entries)
- Nitrogen oxides [emission, air]: 0.672 kg
- 1,3-Butadiene [emission, air]: 0.0032 kg
- Lead [emission, air]: 3.14e-6 kg
- Volatile organic compounds [emission, air]: 0.3 kg
- Toluene [emission, air]: 0.00256 kg
- Sulfuric acid [emission, air]: 0.00571 kg
- Carbon dioxide [emission, air]: 565 kg
- Carbon monoxide [emission, air]: 0.592 kg
- Sulfur dioxide [emission, air]: 0.643 kg
- Xylene [emission, air]: 0.00242 kg
- Hexane [emission, air]: 0.00137 kg
- Benzene [emission, air]: 0.00475 kg
- Methane [emission, air]: 0.0179 kg

## Sampling procedure
Data are from primary sources. The data collected for this module represent all 5 producers and 5 plants in the U.S.

## Review 
The peer review board for this dataset:

Dennis S. Kostick
Formerly Mineral Commodiry Specialist dor Soda Ash
US Geological Survey

Lyle Nehls
Former Director of Technology
FMC Alkali Chemicals

Andrew Swanson
Managing Director
IHS Chemical Consulting

## Sources
- Sustainable Solutions Corporation. (2015). IMA-NA Soda Ash Life Cycle Assessment
