# Acrylonitrile-butadiene-styrene, ABS, copolymer resin, at plant

Dataset: openLCA process, unit process
Category: 31-33: Manufacturing/3252: Resin, Synthetic Rubber, and Artificial and Synthetic Fibers and Filaments Manufacturing
Geography: Northern America
Time period: 2015-01-01 to 2016-12-31
Allocation method: no allocation
Data quality: US EPA - Process Pedigree Matrix (4;1)
Generated by: Franklin Associates, A Division of ERG
Owner: American Chemistry Council
Published in: American Chemistry Council, 2022, ABS
isCopyrightProtected: false
restrictionsDescription: These U.S. LCI Database Project data ("Data") are provided by the National Renewable Energy Laboratory ("NREL"), operated by the Alliance for Sustainable Energy, LLC ("Alliance") for the US Department of Energy ("DOE") under Contract No. DE-AC36-08GO28308. The United States Government (the "Government") retains and the user acknowledges that the Government retains a non-exclusive, paid-up, irrevocable, worldwide license to publish or reproduce the published form of these data, or allow others to do so, for Government purposes.
Access to and use of these Data shall impose the following obligations on the user, as set forth in this Agreement. The user is granted the right, without any fee or cost, to use, copy, modify, alter, enhance and distribute these Data for any purpose whatsoever, provided that this entire notice appears in all copies of the Data. Any modification, alteration or enhancement of these data shall be identified and documented by the user. Further, the user agrees to credit the DOE/NREL/Alliance in any publication that results from the use of these Data. The names DOE/NREL/Alliance, however, may not be used in any advertising or publicity to endorse or promote any products or commercial entities unless specific written permission is obtained from DOE/NREL/Alliance. The user also understands that DOE/NREL/Alliance is not obligated to provide the user with any support, consulting, training or assistance of any kind with regard to the use of these Data or to provide the user with any updates, revisions or new versions of these Data.
YOU AGREE TO INDEMNIFY THE GOVERNMENT AND DOE/NREL/ALLIANCE, AND ITS SUBSIDIARIES, AFFILIATES, OFFICERS, AGENTS, AND EMPLOYEES AGAINST ANY CLAIM OR DEMAND, INCLUDING REASONABLE ATTORNEYS' FEES, RELATED TO YOUR USE OF THESE DATA. THESE DATA ARE PROVIDED BY DOE/NREL/ALLIANCE "AS IS" AND ANY EXPRESS OR IMPLIED WARRANTIES, INCLUDING BUT NOT LIMITED TO, THE IMPLIED WARRANTIES OF MERCHANTABILITY AND FITNESS FOR A PARTICULAR PURPOSE ARE DISCLAIMED. IN NO EVENT SHALL THE GOVERNMENT OR DOE/NREL/ALLIANCE BE LIABLE FOR ANY SPECIAL, INDIRECT OR CONSEQUENTIAL DAMAGES OR ANY DAMAGES WHATSOEVER, INCLUDING BUT NOT LIMITED TO CLAIMS ASSOCIATED WITH THE LOSS OF DATA OR PROFITS, WHICH MAY RESULT FROM AN ACTION IN CONTRACT, NEGLIGENCE OR OTHER TORTIOUS CLAIM THAT ARISES OUT OF OR IN CONNECTION WITH THE ACCESS, USE OR PERFORMANCE OF THESE DATA.

## General comment
This gate-to-gate unit process represents the production of one kilogram of acrylonitrile-butadiene-styrene, ABS, copolymer resin produced in North America. The studied system boundary includes elementary flows associated with upstream raw material extraction and processing, incoming transport, manufacturing of ABS, and disposal of process wastes. The manufacture of ABS resin is accomplished by combining three monomers; polybutadiene, acrylonitrile, and styrene. The two standard technologies for ABS production in North America are emulsion or mass polymerization. Both technologies are represented within this production dataset. This unit process includes cutoff flows that represent process waste disposal. There are no coproducts in this unit process so no allocation was performed for ABS manufacturing.

## Technology
The manufacture of ABS resin is accomplished by combining three monomers; butadiene acrylonitrile, and styrene The two standard technologies for ABS production in North America are emulsion or mass polymerization. Both technologies are represented within the production dataset. Emulsion technology begins with the polymerization of butadiene in water followed by polymerization of acrylonitrile and styrene in the rubber latex solution and grafting onto the polybutadiene latex elastomer substrate. Mass polymerization technology is a continuous process in which styrene and acrylonitrile are polymerized in the presence of a rubber substrate such as polybutadiene.

## Geography
This unit process is representative of average ABS production in North America. Production data were collected from 3 producers (4 plants) in the United States and Mexico and aggregated using horizontal averaging. Incoming materials were modeled using North American data.

## Time period
This unit process is representative of ABS production from 2015-2016. For the ABS resin primary data, companies were requested to provide data for the year 2015, the most recent full year of ABS resin production prior to the project initiation date. Companies providing data were given the option to collect data from the year preceding or following 2015 if either year would reflect more typical production conditions. Three plants provided data for the year 2016, while another plant provided data from 2015.

## Reference product
- Acrylonitrile-butadiene-styrene, ABS, copolymer resin, at plant [RNA]: 1 kg

## Inputs from technosphere
- Electricity, AC, 120 V: 1.8108 MJ; provider Electricity; at user; consumption mix - US - US
- Transport, pipeline, unspecified petroleum products [RNA]: 2.4e-5 t*km
- Acrylonitrile; at plant: 0.225 kg
- Diesel, combusted in industrial equipment [RNA]: 4e-8 l
- Transport, train, diesel powered [RNA]: 0.08 t*km
- Liquefied petroleum gas, combusted in industrial boiler [RNA]: 8.8e-8 l
- Transport, ocean freighter, average fuel mix [RNA]: 0.45 t*km
- Gasoline, combusted in equipment [RNA]: 2.7e-8 l
- Polybutadiene, butadiene rubber, BR, at plant [RNA]: 0.156 kg; provider Polybutadiene, butadiene rubber; at plant
- Natural gas, combusted in industrial boiler [RNA]: 0.07 m3
- Transport, barge, average fuel mix [RNA]: 0.66 t*km
- Transport, combination truck, diesel powered [RNA]: 0.092 t*km
- Styrene, at plant [RNA]: 0.576 kg

## Inputs from nature
- Water [resource, water]: 7.4e-6 l

## Waste to treatment
- Disposal, hazardous waste, to incineration with energy recovery: 0.0002 kg
- Disposal, hazardous waste, to incineration without energy recovery: 0.00021 kg
- Disposal, solid waste, process, to sanitary landfill: 0.008 kg
- Disposal, hazardous waste, to unspecified hazardous waste landfill: 0.0002 kg
- Recycling, hazardous waste, to recovery: 0.00074 kg
- Disposal, solid waste, to incineration with energy recovery: 0.00254 kg; = 1.4E-4+0.0024

## Emissions to nature
- Selenium [emission, water]: 1e-8 kg
  This data was reported by fewer than three companies. To indicate known emissions while protecting the confidentiality of individual company responses, the emission is reported only by order of magnitude.
- Particulate matter, ≤ 2.5μm [emission, air]: 1e-8 kg
  (same comment as for Selenium)
- 2-Phosphono-1,2,4-butanetricarboxylic acid [emission, water]: 1e-5 kg
  (same comment as for Selenium)
- Chromium [emission, water]: 1e-8 kg
  (same comment as for Selenium)
- Carbon dioxide [emission, air]: 0.001 kg
  (same comment as for Selenium)
- Styrene [emission, water]: 1e-7 kg
  (same comment as for Selenium)
- Cyanide [emission, water]: 1e-8 kg
  (same comment as for Selenium)
- Iron [emission, water]: 1e-7 kg
  (same comment as for Selenium)
- Hydrochloric acid [emission, water]: 1e-5 kg
  (same comment as for Selenium)
- Methane [emission, air]: 1e-8 kg
  (same comment as for Selenium)
- Particulate matter, > 2.5μm and ≤ 10μm [emission, air]: 1e-7 kg
- Phosphoric acid [emission, water]: 1e-5 kg
  (same comment as for Selenium)
- Benzothiazole [emission, water]: 1e-6 kg
  (same comment as for Selenium)
- Nickel [emission, water]: 1e-8 kg
  (same comment as for Selenium)
- Volatile organic compounds [emission, air]: 1e-6 kg
  (same comment as for Selenium)
- Sulfur oxides [emission, air]: 1e-7 kg
  (same comment as for Selenium)
- Mercury [emission, water]: 1e-9 kg
  (same comment as for Selenium)
- Lead [emission, water]: 1e-8 kg
  (same comment as for Selenium)
- 1,2-Butadiene [emission, air]: 1e-5 kg
  (same comment as for Selenium)
- Chemical Oxygen Demand [emission, water]: 0.0001 kg
  (same comment as for Selenium)
- Cumene [emission, air]: 1e-6 kg
  (same comment as for Selenium)
- Styrene [emission, air]: 1.9e-5 kg
- Acetophenone [emission, air]: 1e-6 kg
  (same comment as for Selenium)
- Carbon monoxide [emission, air]: 1e-6 kg
  (same comment as for Selenium)
- Fluoride [emission, water]: 1e-6 kg
  (same comment as for Selenium)
- Nitrogen oxides [emission, air]: 1e-5 kg
  (same comment as for Selenium)
- Copper [emission, water]: 1e-8 kg
  (same comment as for Selenium)
- Total oil and grease, less total petroleum hydrocarbons (TPH) [emission, water]: 1e-6 kg
  (same comment as for Selenium)
- Arsenic [emission, water]: 1e-9 kg
  (same comment as for Selenium)
- Chlorine [emission, water]: 1e-8 kg
  (same comment as for Selenium)
- Zinc [emission, water]: 1e-8 kg
  (same comment as for Selenium)
- HCFC-22 [emission, air]: 1e-6 kg
  (same comment as for Selenium)
- Methanol [emission, water]: 1e-7 kg
  (same comment as for Selenium)
- Biological Oxygen Demand [emission, water]: 1e-5 kg
  (same comment as for Selenium)
- Manganese [emission, water]: 1e-8 kg
  (same comment as for Selenium)
- Acrylonitrile [emission, air]: 1.4e-5 kg
- Methyl methacrylate [emission, air]: 1e-7 kg
  (same comment as for Selenium)
- Ammonia [emission, air]: 1e-7 kg
  (same comment as for Selenium)
- Xylene [emission, air]: 1e-7 kg
  (same comment as for Selenium)
- Total suspended solids [emission, water]: 0.0001 kg
  (same comment as for Selenium)
- Acrylonitrile [emission, water]: 1e-8 kg
  (same comment as for Selenium)
- Total dissolved solids [emission, water]: 1e-5 kg
  (same comment as for Selenium)
- Ethylene glycol [emission, water]: 1e-8 kg
  (same comment as for Selenium)
- Barium [emission, water]: 1e-7 kg
  (same comment as for Selenium)
- Ethylbenzene [emission, air]: 1.6e-5 kg

## Inventory method
Attributional and gate to gate process. Developed with the intention to be compatible with TRACI.

## Modelling constants
Primary data were used to model the production of ABS. All data received were carefully evaluated before compiling the production-weighted average data sets used to generate results.

## Completeness
TREATMENT OF MISSING ENVIRONMENTAL DATA: Elementary and technosphere flows are cut-off at less than 1% based on environmental relevance.

TREATMENT OF MISSING TECHNOSPHERE DATA: Miscellaneous materials and additives, capital equipment, facilities and infrastructure, space conditioning, and support personnel requirements are not included in this unit process. No gaps have been identified in this dataset.

MASS BALANCE: The mass balance for each individual plant was calculated.

## Data selection
All ABS production data was sourced from primary producers. The data collection methods for ABS include information provided by direct measurement, purchasing and utility records, calculations from equipment specifications, and engineering estimates. Data evaluation procedures and criteria were applied consistently to all primary data provided by the participating producers for all data collected. All primary data obtained specifically for this study were considered the most representative available for the systems studied. Data were reviewed for completeness and material balances, and follow-up was conducted as needed to resolve any questions about the input and output flows, process technology, etc. The aggregated averaged datasets were also reviewed by the reporting companies as compared to the provided dataset. Companies were requested to review whether their data were complete and to comment about their or the average dataset as needed.

## Data treatment
A horizontal weighted average was calculated from the data collected to develop this LCA model. The average ABS datasets were reviewed and accepted respectively by each data provider. To indicate known emissions while protecting the confidentiality of individual company responses, some emissions are reported only by the order of magnitude of the average.

## Data collection
All primary data were collected for the years 2015 or 2016.

## Sampling procedure
BOUNDARY CONDITIONS: The system boundary includes upstream burdens from incoming materials, incoming transportation of materials, ABS manufacturing, and process waste management. The following are excluded from the system boundary: miscellaneous materials and additives, capital equipment, facilities and infrastructure, space conditioning, and support personnel requirements.

DATA COLLECTION: Data were collected from three ABS manufacturers (four plants).

UNCERTAINTY ESTIMATION: Uncertainty was not calculated.

## Intended application
Situation C1 - Accounting, with system-external interactions - The intended application is a purely descriptive accounting / documentation of the analysed system including existing interactions with other systems in the LCI model. These data are an update to a previously published dataset which is a generic unit process model. A full inventory of environmental flows are included; thus this unit process can be used for a full range of LCIA impact categories. The target audience of this model includes LCA practitioners, industry, and the general public. This dataset has been accepted by the North American plastics/chemical industry and is intended for use as an industry average. An inventory of environmental emission flows are included to the extent that the producers provided; thus this unit process can be used for a full range of LCIA impact categories. The original study results were analyzed using the TRACI LCIA factors.

## Project
This project was funded by and submitted to the American Chemistry Council (ACC). These data are an update to a previously published ACC dataset.

## Review 
The data providers reviewed their data and the average. Three ACC members reviewed the associated final report. Internal ERG review of data entry proofreading, and data documentation was also carried out.

## Sources
- American Chemistry Council, 2022, ABS
