# Polystyrene, general purpose, GPPS, resin; at plant

Dataset: openLCA process, unit process
Category: 31-33: Manufacturing/3252: Resin, Synthetic Rubber, and Artificial and Synthetic Fibers and Filaments Manufacturing
Geography: Northern America
Time period: 2015-01-01 to 2016-12-31
Allocation method: physical allocation
Data quality: US EPA - Process Pedigree Matrix (4;1)
Generated by: Franklin Associates, A Division of ERG
Owner: American Chemistry Council
Published in: American Chemistry Council, 2022, GPPS
isCopyrightProtected: false
restrictionsDescription: These U.S. LCI Database Project data ("Data") are provided by the National Renewable Energy Laboratory ("NREL"), operated by the Alliance for Sustainable Energy, LLC ("Alliance") for the US Department of Energy ("DOE") under Contract No. DE-AC36-08GO28308. The United States Government (the "Government") retains and the user acknowledges that the Government retains a non-exclusive, paid-up, irrevocable, worldwide license to publish or reproduce the published form of these data, or allow others to do so, for Government purposes.
Access to and use of these Data shall impose the following obligations on the user, as set forth in this Agreement. The user is granted the right, without any fee or cost, to use, copy, modify, alter, enhance and distribute these Data for any purpose whatsoever, provided that this entire notice appears in all copies of the Data. Any modification, alteration or enhancement of these data shall be identified and documented by the user. Further, the user agrees to credit the DOE/NREL/Alliance in any publication that results from the use of these Data. The names DOE/NREL/Alliance, however, may not be used in any advertising or publicity to endorse or promote any products or commercial entities unless specific written permission is obtained from DOE/NREL/Alliance. The user also understands that DOE/NREL/Alliance is not obligated to provide the user with any support, consulting, training or assistance of any kind with regard to the use of these Data or to provide the user with any updates, revisions or new versions of these Data.
YOU AGREE TO INDEMNIFY THE GOVERNMENT AND DOE/NREL/ALLIANCE, AND ITS SUBSIDIARIES, AFFILIATES, OFFICERS, AGENTS, AND EMPLOYEES AGAINST ANY CLAIM OR DEMAND, INCLUDING REASONABLE ATTORNEYS' FEES, RELATED TO YOUR USE OF THESE DATA. THESE DATA ARE PROVIDED BY DOE/NREL/ALLIANCE "AS IS" AND ANY EXPRESS OR IMPLIED WARRANTIES, INCLUDING BUT NOT LIMITED TO, THE IMPLIED WARRANTIES OF MERCHANTABILITY AND FITNESS FOR A PARTICULAR PURPOSE ARE DISCLAIMED. IN NO EVENT SHALL THE GOVERNMENT OR DOE/NREL/ALLIANCE BE LIABLE FOR ANY SPECIAL, INDIRECT OR CONSEQUENTIAL DAMAGES OR ANY DAMAGES WHATSOEVER, INCLUDING BUT NOT LIMITED TO CLAIMS ASSOCIATED WITH THE LOSS OF DATA OR PROFITS, WHICH MAY RESULT FROM AN ACTION IN CONTRACT, NEGLIGENCE OR OTHER TORTIOUS CLAIM THAT ARISES OUT OF OR IN CONNECTION WITH THE ACCESS, USE OR PERFORMANCE OF THESE DATA.

## General comment
The functional unit for this model is one kilogram of general purpose polystyrene (GPPS). The technical scope of this study is gate-to-gate and the system boundary includes incoming transport, manufacturing, and disposal of process wastes. The technology used to manufacture GPPS in North America involves the mass polymerization of styrene in a series of reactors in the presence of initiators. Continuous stirred tank or tubular reactors are used. Following the reactor, the polymer solution is sent for devolatizing where the monomer and solvents are removed from the polymer. The polymer is then pelletized. The GPPS producers who provided data for this module verified that the characteristics of their plants are representative of a majority of North American GPPS production. The captured GPPS production amount is approximately 68 percent of the GPPS production in the U.S. in 2015.

## Technology
The overall production technology is similar among all GPPS plants that submitted data for this analysis. GPPS is produced by feeding the styrene monomer and processing aids into a reactor. Other chemicals can be added, such as chain transfer agents or anti-oxidants, but these are normally below the one percent threshold for inclusion. Ethylbenzene or toluene may also be added in small amounts to control the polymerization rate. From the reactor, where the mass polymerization occurs, the polystyrene stream is devolatilized, which separates out the polymer from the remaining monomer with solvent. White mineral oil, which is included in the inputs for this analysis, is added to the finished polymer to prevent adherence to a mold and improve other physical characteristics. The polymer is then pelletized.

## Geography
This unit process is representative of average GPPS production in North America. GPPS resin data were collected from 4 plants in the United States and 1 plant in Mexico. Incoming materials were modeled using North American databases such as the U.S. LCI database, ecoinvent (adapted to US conditions), and Franklin Associates’ private database.

## Time period
This unit process is representative of GPPS production from 2015-2016. For the GPPS resin primary data, companies were requested to provide data for the year 2015, the most recent full year of GPPS resin production prior to the project initiation date. Companies providing data were given the option to collect data from the year preceding or following 2015 if either year would reflect more typical production conditions. Two plants provided data for the year 2015, and three plants provided data for the year 2016. After reviewing individual company data in comparison to the average, each manufacturer verified data from 2015 and/or 2016 was representative of an average year for GPPS resin production at their company.

## Reference product
- Polystyrene, general purpose, GPPS, at plant [RNA]: 1 kg

## Inputs from technosphere
- Transport, barge, average fuel mix [RNA]: 0.34 t*km
- Styrene, at plant [RNA]: 0.986 kg
- Transport, pipeline, unspecified petroleum products [RNA]: 0.0011 t*km
- Transport, combination truck, diesel powered [RNA]: 0.0054 t*km
- White mineral oil, at plant [RNA]: 0.0138 kg
- Diesel, combusted in industrial boiler [RNA]: 3.4e-6 l
- Natural gas, combusted in industrial boiler [RNA]: 0.023 m3
- Transport, train, diesel powered [RNA]: 0.1 t*km
- Electricity, AC, 120 V: 0.4536 MJ; provider Electricity; at user; consumption mix - US - US
- Transport, ocean freighter, average fuel mix [RNA]: 0.41 t*km

## Inputs from nature
- Water [resource, water]: 0.00044 m3

## Waste to treatment
- Disposal, non-hazardous waste, to incineration: 0.00078 kg
- Recycling, solid waste, to recycling or reuse: 0.00034 kg
- Disposal, hazardous waste, to incineration with energy recovery: 0.00029 kg
- Disposal, hazardous waste, to unspecified hazardous waste landfill: 3.9e-5 kg
- Disposal, hazardous waste, to incineration without energy recovery: 6.3e-5 kg
- Disposal, non-hazardous waste, to landfill: 0.0022 kg

## Emissions to nature
- Cumene [emission, air]: 1e-8 kg
  This data was reported by fewer than three companies. To indicate known emissions while protecting the confidentiality of individual company responses, the emission is reported only by order of magnitude.
- Ethylbenzene [emission, water]: 1e-8 kg
  (same comment as for Cumene)
- Particulate matter, ≤ 2.5μm [emission, air]: 1e-6 kg
  (same comment as for Cumene)
- HCFC-22 [emission, air]: 1e-6 kg
  (same comment as for Cumene)
- Suspended solids, inorganic [emission, water]: 1e-6 kg
  (same comment as for Cumene)
- Volatile organic compounds [emission, air]: 1e-6 kg
  (same comment as for Cumene)
- Carbon dioxide [emission, air]: 0.0001 kg
  (same comment as for Cumene)
- Ethylbenzene [emission, air]: 1e-6 kg
  (same comment as for Cumene)
- Biological Oxygen Demand [emission, water]: 1e-6 kg
  (same comment as for Cumene)
- Xylene [emission, air]: 1e-7 kg
  (same comment as for Cumene)
- Particulate matter [emission, air]: 1e-5 kg
  (same comment as for Cumene)
- Mercury [emission, water]: 1e-11 kg
  (same comment as for Cumene)
- Methane [emission, air]: 1e-8 kg
  (same comment as for Cumene)
- Nitrogen oxides [emission, air]: 1e-7 kg
  (same comment as for Cumene)
- Benzene [emission, air]: 1e-8 kg
  (same comment as for Cumene)
- Toluene [emission, air]: 1e-6 kg
  (same comment as for Cumene)
- Phenol [emission, water]: 1e-7 kg
  (same comment as for Cumene)
- Zinc [emission, water]: 4.5e-8 kg
- Nitrous oxide [emission, air]: 1e-8 kg
  (same comment as for Cumene)
- Toluene [emission, water]: 1e-9 kg
  (same comment as for Cumene)
- Carbon monoxide [emission, air]: 1e-7 kg
  (same comment as for Cumene)
- Chromium [emission, water]: 1e-10 kg
  (same comment as for Cumene)
- Styrene [emission, air]: 2.65e-5 kg
- Sulfur oxides [emission, air]: 1e-8 kg
  (same comment as for Cumene)
- Chemical Oxygen Demand [emission, water]: 1e-5 kg
  (same comment as for Cumene)
- Styrene [emission, water]: 1e-7 kg
  (same comment as for Cumene)
- Chlorine [emission, air]: 1e-8 kg
  (same comment as for Cumene)

## Inventory method
Attributional and gate to gate process. Developed with the intention to be compatible with TRACI.

## Modelling constants
Primary data were used to model the production of GPPS. All data received were carefully evaluated before compiling the production-weighted average data sets used to generate results. Secondary supporting background data were drawn from credible, widely used databases including the US LCI database, GREET, and Ecoinvent.

## Completeness
Treatment of Missing Environmental Data: Elementary and technosphere flows are cut-off at less than 1% based on environmental relevance.

Treatment of Missing Technosphere Data: Miscellaneous materials and additives, capital equipment, facilities and infrastructure, space conditioning, and support personnel requirements not included in this unit process. No gaps have been identified in this dataset.

Mass Balance: The mass balance for each individual plant was calculated.

## Data selection
All GPPS production data was sourced from primary producers. Data evaluation procedures and criteria were applied consistently to all primary data provided by the participating producers for all data collected. All primary data obtained specifically for this study were considered the most representative available for the systems studied. Data were reviewed for completeness and material balances, and follow-up was conducted as needed to resolve any questions about the input and output flows, process technology, etc. The aggregated averaged datasets were also reviewed by the providing companies as compared to the provided dataset. Companies were requested to review whether their data were complete and to comment about their or the average dataset as needed.

## Data treatment
A horizontal weighted average was calculated from the data collected to develop this LCA model. The average GPPS datasets were reviewed and accepted respectively by each data provider. To indicate known emissions while protecting the confidentiality of individual company responses, some emissions are reported only by the order of magnitude of the average.

## Data collection
GPPS data were collected during 2015 and 2016.

## Sampling procedure
Boundary Conditions: The system boundary includes GPPS manufacturing, and includes incoming transportation and upstream burdens for each material as well as process waste management. The following are excluded from the system boundary: miscellaneous materials and additives, capital equipment, facilities and infrastructure, space conditioning, and support personnel requirements.

Data Collection: Data were collected from GPPS manufacturers.

Uncertainty Estimation: Uncertainty was not calculated.

## Intended application
Situation C1 - Accounting, with system-external interactions - The intended application is a purely descriptive accounting / documentation of the analysed system including existing interactions with other systems in the LCI model. These data are an update to a previously published dataset which is a generic unit process model. The target audience of this model includes LCA practitioners, industry, and the general public. For use as an average dataset accepted by the North American plastics/chemical industry. An inventory of environmental emission flows are included to the extent that the producers provided; thus this unit process can be used for a full range of LCIA impact categories. The original study results were analyzed using the TRACI LCIA factors.

## Project
This project was funded by and submitted to the American Chemistry Council. These data are an update to a previously published dataset which is a generic unit process data.; Cradle-to-Gate Life Cycle Analysis of General Purpose Polystyrene (GPPS). Submitted to the American Chemistry Council (ACC). 2021.

## Review 
The data providers reviewed their data and the average. ACC members reviewed the associated final report. Internal ERG review of data entry proofreading, and data documentation was also carried out.

## Sources
- American Chemistry Council, 2022, GPPS
