# Phosphorous fertilizer, production mix, at plant

Dataset: openLCA process, unit process
Category: 31-33: Manufacturing/3253: Pesticide, Fertilizer, and Other Agricultural Chemical Manufacturing
Geography: Northern America
Allocation method: no allocation
Generated by: Jamie Meil
Published in: Maureen Puetmann
isCopyrightProtected: false
restrictionsDescription: All information can be accessed by everybody.

## General comment
Base process data presented with allocations to within process co-products noted. Refer to allocation worksheet for specifics. All allocations performed using mass or volume., adapted from European data (IDEMAT 2001) in SimaPro
Important note: although most of the data in the US LCI database has
undergone some sort of review, the database as a whole has not yet
undergone a formal validation process.
Please email comments to lci@nrel.gov.

## Technology
Typical

## Geography
US South East

## Reference product
- Phosphorous fertilizer, production mix, at plant [RNA]: 1 kg

## Inputs from technosphere
- Transport, combination truck, average fuel mix [RNA]: 0.121 t*km
- Electricity, AC, 120 V: 0.576 MJ; provider Electricity; at user; consumption mix - US - US
- Transport, train, diesel powered [RNA]: 2.25 t*km
- Natural gas, combusted in industrial boiler [RNA]: 0.0862 m3

## Emissions to nature
- Mercury [emission, water]: 4.5e-7 kg
- Arsenic(V) [emission, water]: 3e-5 kg
- Chromium [emission, water]: 4.5e-5 kg
- Cadmium(II) [emission, water]: 1e-5 kg
- Fluoride [emission, water]: 0.089 kg
- Copper(I) [emission, water]: 2.1e-5 kg
- Nickel [emission, water]: 1.5e-5 kg
- Lead [emission, water]: 1.5e-5 kg
- Particulate matter [emission, air]: 0.0001 kg
- Orthophosphate [emission, air]: 1.6e-5 kg
- Sulfur dioxide [emission, air]: 0.015 kg
- Fluoride [emission, air]: 3.5e-5 kg
- Orthophosphate [emission, water]: 0.067 kg
- Zinc [emission, air]: 1e-5 kg

## Sources
- Michael Milota
- Maureen Puetmann
- Leonard R. Johnson
