# Pyrolysis gasoline, at plant

Dataset: openLCA process, unit process
Category: 31-33: Manufacturing/3251: Basic Chemical Manufacturing
Geography: Northern America
Time period: 2002-12-31 to 2002-12-31
Allocation method: no allocation
Data quality: US EPA - Process Pedigree Matrix (4;1)
Generated by: Franklin Associates, A Division of ERG
Published in: THE PLASTICS DIVISION OF THE AMERICAN C
isCopyrightProtected: false
restrictionsDescription: All information can be accessed by everybody.

## General comment
Numerous coproduct streams are produced during this process. Fuel gas and off-gas are two coproducts produced that are exported to another process for fuel use. When the fuel coproducts are exported from the hydrocracker, they carry with them the allocated share of the inputs and outputs for their production. The ratio of the mass of the exported fuel over the total mass output is removed from the total inputs and outputs of the hydrocracker, and the remaining inputs and outputs are allocated over the material hydrocracker products. No energy credit is applied for the exported fuels, since both the inputs and outputs for the exported fuels have been removed from the data set. Complete inventory data and metadata are available in full in the final report and appendices, Cradle-to-Gate Life Cycle Inventory of Nine Plastic Resins and Four Polyurethane Precursors. This report has been extensively reviewed within Franklin Associates and has undergone partial critical review by ACC Plastics Division members and is available at: www.americanchemistry.com. Quantities may vary slightly between the reference to main source and and this module due to rounding. Important note: although most of the data in the US LCI database has undergone some sort of review, the database as a whole has not yet undergone a formal validation process. Please email comments to lci@nrel.gov.

## Technology
Steam cracking of natural gas and petroleum

## Geography
North America (US and Canada)

## Reference product
- Pyrolysis gasoline, at plant [RNA]: 1 kg

## Inputs from technosphere
- Natural gas, production mixture, to energy use: 0.10382 kg; provider Natural gas, processed, for energy use, at plant
  A portion of the material feed combusts within the hydrocracker and produces an offgas, which provides an internal energy source.
- Transport, pipeline, unspecified petroleum products [RNA]: 0.170236 t*km
- Gasoline, combusted in equipment [RNA]: 1.8443e-5 l
- Transport, barge, residual fuel oil powered [RNA]: 0.0900337 t*km
- Transport, combination truck, diesel powered [RNA]: 0.0327569 t*km
- Electricity, at cogen, for natural gas turbine [US]: 0.0423233 kWh
- Petroleum refined, to material use, at refinery: 0.418615 kg; provider Petroleum refined, for material use, at plant
  Specific raw materials from oil refining and natural gas processing include ethane, propane, liquid feed, heavy raffinate, and DNG
- Transport, train, diesel powered [RNA]: 0.0248981 t*km
- Transport, pipeline, natural gas [RNA]: 1.10667 t*km
- Electricity, AC, 120 V: 0.417493 MJ; provider Electricity; at user; consumption mix - US - US
- Petroleum refined, to energy use, at refinery: 0.07518 kg; provider Petroleum refined, for energy use, at plant
  (same comment as for Natural gas, production mixture, to energy use)
- Diesel, combusted in industrial equipment [RNA]: 1.60163e-5 l
  Includes diesel fuel and distillate oil amounts.
- Transport, barge, diesel powered [RNA]: 0.0270778 t*km
- Natural gas, combusted in industrial boiler, at hydrocracker, for pyrolysis gas [RNA]: 0.0963996 m3
- Natural gas, production mixture, to material use: 0.584241 kg; provider Natural gas, processed, for material use, at plant
  (same comment as for Petroleum refined, to material use, at refinery)

## Inputs from nature
- Water [resource, water]: 0.353771 kg
  Consumptive use includes: water incorporated into the product, water evaporated during the process, and/or water used and released to a body other than that from which it was drawn.

## Waste to treatment
- Disposal, solid waste, unspecified, to sanitary landfill: 0.000360541 kg
- Disposal, solid waste, unspecified, to municipal incineration: 0.00688534 kg
- Disposal, solid waste, unspecified, to waste-to-energy: 4.71149e-6 kg

## Emissions to nature
- Hydrogen [emission, air]: 0.000783808 MJ
- Volatile organic compounds [emission, air]: 1e-5 kg
  This emission was reported by fewer than three companies. To indicate known emissions while protecting the confidentiality of individual company responses, the emission is reported only by order of magnitude.
- Chemical Oxygen Demand [emission, water]: 1e-5 kg
  (same comment as for Volatile organic compounds)
- Particulate matter [emission, air]: 9.95728e-6 kg
- Naphthalene [emission, water]: 1e-11 kg
  (same comment as for Volatile organic compounds)
- Ethylbenzene [emission, water]: 1e-8 kg
  (same comment as for Volatile organic compounds)
- Phenols [emission, water]: 1e-6 kg
  (same comment as for Volatile organic compounds)
- HCFC-22 [emission, air]: 1e-9 kg
  (same comment as for Volatile organic compounds)
- Acetone [emission, water]: 1e-11 kg
  (same comment as for Volatile organic compounds)
- Total Organic Carbon [emission, water]: 1e-6 kg
  (same comment as for Volatile organic compounds)
- Carbon monoxide [emission, air]: 1e-6 kg
  (same comment as for Volatile organic compounds)
- Hydrochloric acid [emission, air]: 1e-9 kg
  (same comment as for Volatile organic compounds)
- Organic compounds [emission, air]: 1e-6 kg
  (same comment as for Volatile organic compounds)
- Styrene [emission, water]: 1e-9 kg
  (same comment as for Volatile organic compounds)
- Biological Oxygen Demand [emission, water]: 3.4867e-7 kg
- Sulfur oxides [emission, air]: 4.42194e-6 kg
- Benzene [emission, water]: 1e-8 kg
  (same comment as for Volatile organic compounds)
- Xylene [emission, water]: 1e-9 kg
  (same comment as for Volatile organic compounds)
- Chlorine [emission, air]: 1e-7 kg
  (same comment as for Volatile organic compounds)
- Toluene [emission, water]: 1e-7 kg
  (same comment as for Volatile organic compounds)
- Suspended solids, inorganic [emission, water]: 2.80768e-6 kg
- Particulate matter, > 2.5μm and ≤ 10μm [emission, air]: 0.0001 kg
  (same comment as for Volatile organic compounds)
- Methane [emission, air]: 1e-6 kg
  (same comment as for Volatile organic compounds)
- Volatile organic compounds [emission, air]: 0.000112933 kg

## Sampling procedure
Data collected from primary sources.

## Sources
- Franklin Associates (2020). Cradle-to-Gate Life Cycle Analysis of Olefins
- THE PLASTICS DIVISION OF THE AMERICAN C
