# Lignite coal, combusted in industrial boiler

Dataset: openLCA process, unit process
Category: 22: Utilities/2213: Water, Sewage and Other Systems
Geography: Northern America
Time period: 1996-12-31 to 2002-12-31
Allocation method: no allocation
Generated by: Franklin Associates, A Division of ERG
Published in: Franklin Associates (2003) Lignite Combustion in Industrial Boilers
isCopyrightProtected: false
restrictionsDescription: All information can be accessed by everybody.

## General comment
In cases where industrial boiler data were not available, utility boiler data were adjusted accordingly.,
Important note: although most of the data in the US LCI database has
undergone some sort of review, the database as a whole has not yet
undergone a formal validation process.
Please email comments to lci@nrel.gov.

## Technology
Lignite coal combustion in average industrial boiler.

## Geography
United States

## Reference product
- Lignite coal, combusted in industrial boiler [RNA]: 1 kg

## Inputs from technosphere
- Transport, train, diesel powered [RNA]: 0.00103 t*km
  Represents transportation from lignite mining to industrial boiler.
- Lignite coal, at surface mine [RNA]: 1 kg
- Transport, combination truck, average fuel mix [RNA]: 0.011008 t*km
  Represents transportation from lignite mining to industrial boiler.

## Waste to treatment
- Disposal, solid waste, unspecified, to unspecified treatment: 0.061585 kg
- Disposal, lignite coal combustion byproducts, to unspecified reuse: 0.0239 kg

## Emissions to nature
- Toluene [emission, air]: 1.2e-7 kg
- Anthracene [emission, air]: 1.05e-10 kg
  Sources for PAH data are old or unverifiable. Use this PAH data with caution.
- Benzyl chloride [emission, air]: 3.5e-7 kg
- Selenium [emission, air]: 6.5e-7 kg
- Naphthalene [emission, air]: 6.5e-9 kg
  Sources for PAH data are old or unverifiable. Use this PAH data with caution.
- Chloromethane [emission, air]: 2.65e-7 kg
- Acenaphthene [emission, air]: 2.55e-10 kg
  Sources for PAH data are old or unverifiable. Use this PAH data with caution.
- Chromium [emission, air]: 9.9038e-8 kg
- Mercury [emission, air]: 6.5409e-7 kg
- Methane [emission, air]: 2e-5 kg
- 5-Methylchrysene [emission, air]: 1.1e-11 kg
  Sources for PAH data are old or unverifiable. Use this PAH data with caution.
- Xylene [emission, air]: 1.85e-8 kg
- Isophorone [emission, air]: 2.9e-7 kg
- Benzene [emission, air]: 4.7668e-5 kg
- Particulate matter [emission, air]: 0.0085919 kg
- Phenol [emission, air]: 8e-9 kg
- Methylene chloride [emission, air]: 1.45e-7 kg
- Biphenyl [emission, air]: 8.5e-10 kg
  Sources for PAH data are old or unverifiable. Use this PAH data with caution.
- Oils, unspecified [emission, water]: 8.0038e-7 kg
- Phenols [emission, air]: 8e-9 kg
- Suspended solids, inorganic [emission, water]: 1.6008e-6 kg
- Chromium(VI) [emission, air]: 3.95e-8 kg
- Methyl hydrazine [emission, air]: 8.5e-8 kg
- Particulate matter, > 2.5μm and ≤ 10μm [emission, air]: 0.00036566 kg
- Tribromomethane [emission, air]: 1.95e-8 kg
- Chlorobenzene [emission, air]: 1.1e-8 kg
- Ethylene dibromide [emission, air]: 6e-10 kg
- 1,1,1-Trichloroethane [emission, air]: 1e-8 kg
- Methyl ethyl ketone [emission, air]: 1.95e-7 kg
- Benzofluoranthene [emission, air]: 5.5e-11 kg
  Sources for PAH data are old or unverifiable. Use this PAH data with caution.
- Nitrogen oxides [emission, air]: 0.0059743 kg
- Sulfur dioxide [emission, air]: 0.012889 kg
- Acetophenone [emission, air]: 7.5e-9 kg
- Carbon monoxide [emission, air]: 0.00040495 kg
- 2,4-Dinitrotoluene [emission, air]: 1.4e-10 kg
- Phenanthrene [emission, air]: 1.35e-9 kg
  Sources for PAH data are old or unverifiable. Use this PAH data with caution.
- Benzo[ghi]perylene [emission, air]: 1.35e-11 kg
  Sources for PAH data are old or unverifiable. Use this PAH data with caution.
- Cumene [emission, air]: 2.65e-9 kg
- Styrene [emission, air]: 1.25e-8 kg
- Chloroform [emission, air]: 2.95e-8 kg
- 2-Chloroacetophenone [emission, air, stratosphere]: 3.5e-9 kg
- Arsenic [emission, air]: 1.5756e-7 kg
- Manganese [emission, air]: 1.7876e-7 kg
- Tetrachloroethylene [emission, air]: 2.15e-8 kg
- Vinyl acetate [emission, air]: 3.8e-9 kg
- Acrolein [emission, air]: 7.4696e-8 kg
- Hydrofluoric acid [emission, air]: 7.5e-5 kg
- Carbon disulfide [emission, air]: 6.5e-8 kg
- Beryllium [emission, air]: 7.7597e-9 kg
- Hydrochloric acid [emission, air]: 0.0006 kg
- Benzo[a]pyrene [emission, air]: 1.9e-11 kg
  Sources for PAH data are old or unverifiable. Use this PAH data with caution.
- Carbon dioxide [emission, air]: 2.3 kg
- Ethylbenzene [emission, air]: 4.7e-8 kg
- Cadmium [emission, air]: 4.4278e-8 kg
- Acenaphthylene [emission, air]: 1.25e-10 kg
  Sources for PAH data are old or unverifiable. Use this PAH data with caution.
- Pyrene [emission, air]: 1.65e-10 kg
  Sources for PAH data are old or unverifiable. Use this PAH data with caution.
- Hexane [emission, air]: 3.35e-8 kg
- Volatile organic compounds [emission, air]: 3.1513e-5 kg
- Magnesium [emission, air]: 5.5e-6 kg
- Propionaldehyde [emission, air]: 1.9e-7 kg
- Dimethyl sulfate [emission, air, troposphere, rural]: 2.4e-8 kg
- Fluoranthene [emission, air]: 3.55e-10 kg
  Sources for PAH data are old or unverifiable. Use this PAH data with caution.
- Chloroethane [emission, air]: 2.1e-8 kg
- Di(2-ethylhexyl) phthalate [emission, air]: 3.65e-8 kg
- Methyl tert-butyl ether [emission, air]: 1.75e-8 kg
- 1,2-Dichloroethane [emission, air]: 2e-8 kg
- Lead [emission, air]: 6.8588e-5 kg
- Chrysene [emission, air]: 5e-11 kg
  Sources for PAH data are old or unverifiable. Use this PAH data with caution.
- Indeno[1,2,3-cd]pyrene [emission, air]: 3.05e-11 kg
  Sources for PAH data are old or unverifiable. Use this PAH data with caution.
- Cyanide [emission, air]: 1.25e-6 kg
- Formaldehyde [emission, air]: 3.383e-6 kg
- Methyl methacrylate [emission, air]: 1e-8 kg
- Nickel [emission, air]: 1.741e-7 kg
- Acetaldehyde [emission, air]: 2.85e-7 kg
- Antimony [emission, air]: 9e-9 kg
- Methyl bromide [emission, air]: 8e-8 kg
- Fluorene [emission, air]: 4.55e-10 kg
  Sources for PAH data are old or unverifiable. Use this PAH data with caution.
- Organic compounds [emission, air]: 3.2267e-6 kg
- Benz[a]anthracene [emission, air]: 4e-11 kg
  Sources for PAH data are old or unverifiable. Use this PAH data with caution.
- Cobalt [emission, air]: 5e-8 kg

## Sources
- EPA
- unspecified
- U.S. Energy Information Administration (1993). State Coal Profile ND
- EPA
- Franklin Associates (2003) Lignite Combustion in Industrial Boilers
- DOE
- U.S. Energy Information Administration (1993). State Coal Profile TX
- Speight
- unspecified
- U.S. EPA
- unspecified
- Franklin Associates (2003) Estimate
- EIA
- EPA
- U.S. Energy Information Administration
- USGS
