# Polyethylene, linear low-density, LLDPE, virgin resin, at plant

Dataset: openLCA process, unit process
Category: 31-33: Manufacturing/3252: Resin, Synthetic Rubber, and Artificial and Synthetic Fibers and Filaments Manufacturing
Geography: Northern America
Time period: 2014-12-30 to 2016-12-29
Allocation method: no allocation
Data quality: US EPA - Process Pedigree Matrix (4;1)
Generated by: Franklin Associates, A Division of ERG
Owner: American Chemistry Council
Published in: Franklin Associates (2020) Cradle-to-Gate LCA of LLDPE
isCopyrightProtected: false
restrictionsDescription: These U.S. LCI Database Project data ("Data") are provided by the National Renewable Energy Laboratory ("NREL"), operated by the Alliance for Sustainable Energy, LLC ("Alliance") for the US Department of Energy ("DOE") under Contract No. DE-AC36-08GO28308. The United States Government (the "Government") retains and the user acknowledges that the Government retains a non-exclusive, paid-up, irrevocable, worldwide license to publish or reproduce the published form of these data, or allow others to do so, for Government purposes.
Access to and use of these Data shall impose the following obligations on the user, as set forth in this Agreement. The user is granted the right, without any fee or cost, to use, copy, modify, alter, enhance and distribute these Data for any purpose whatsoever, provided that this entire notice appears in all copies of the Data. Any modification, alteration or enhancement of these data shall be identified and documented by the user. Further, the user agrees to credit the DOE/NREL/Alliance in any publication that results from the use of these Data. The names DOE/NREL/Alliance, however, may not be used in any advertising or publicity to endorse or promote any products or commercial entities unless specific written permission is obtained from DOE/NREL/Alliance. The user also understands that DOE/NREL/Alliance is not obligated to provide the user with any support, consulting, training or assistance of any kind with regard to the use of these Data or to provide the user with any updates, revisions or new versions of these Data.
YOU AGREE TO INDEMNIFY THE GOVERNMENT AND DOE/NREL/ALLIANCE, AND ITS SUBSIDIARIES, AFFILIATES, OFFICERS, AGENTS, AND EMPLOYEES AGAINST ANY CLAIM OR DEMAND, INCLUDING REASONABLE ATTORNEYS' FEES, RELATED TO YOUR USE OF THESE DATA. THESE DATA ARE PROVIDED BY DOE/NREL/ALLIANCE "AS IS" AND ANY EXPRESS OR IMPLIED WARRANTIES, INCLUDING BUT NOT LIMITED TO, THE IMPLIED WARRANTIES OF MERCHANTABILITY AND FITNESS FOR A PARTICULAR PURPOSE ARE DISCLAIMED. IN NO EVENT SHALL THE GOVERNMENT OR DOE/NREL/ALLIANCE BE LIABLE FOR ANY SPECIAL, INDIRECT OR CONSEQUENTIAL DAMAGES OR ANY DAMAGES WHATSOEVER, INCLUDING BUT NOT LIMITED TO CLAIMS ASSOCIATED WITH THE LOSS OF DATA OR PROFITS, WHICH MAY RESULT FROM AN ACTION IN CONTRACT, NEGLIGENCE OR OTHER TORTIOUS CLAIM THAT ARISES OUT OF OR IN CONNECTION WITH THE ACCESS, USE OR PERFORMANCE OF THESE DATA.

## General comment
Includes material and energy requirements and environmental emissions for one kilogram of Linear Low-density polyethylene (LLDPE) virgin resin production at the plant only (gate to gate). The LLDPE resin is commonly polymerized in low pressure reactors. LLDPE is most commonly manufactued by either a solution process or a gas phase process but may also be produced using the slurry loop process. All three types of reactors were used by data providers. A Phillips, Ziegler-Natta and/or metallocene catalyst are required during these technologies; however these have not been included after reviewing a sensitivity analysis, in which the results were all less than 1 percent changed.

## Technology
All data providers used the low pressure technology and either the gas-phase, solution, or slurry loop reactors.

## Geography
For the LLDPE resin primary data, companies were requested to provide data for the year 2015, the most recent full year of LLDPE resin production prior to the project initiation date. Companies providing data were given the option to collect data from the year preceding or following 2015 if either year would reflect more typical production conditions. Three companies provided data for the year 2015, and one company provided data for the year 2016. After reviewing individual company data in comparison to the average, each manufacturer verified data from 2015-2016 was representative of an average year for LLDPE resin production at their company.

The geographic scope of the analysis is the manufacture of LLDPE resin in North America. All LLDPE resin data collected were from plants in the United States and Canada and incoming materials were modeled using North American databases such as the U.S. LCI database and Franklin Associates’ private database or ecoinvent (adapted to US conditions).

## Time period
All primary data were collected from 2015-2016

## Reference product
- Polyethylene, linear low-density, LLDPE, virgin resin, at plant: 1 kg

## Inputs from technosphere
- Nitrogen, liquid, at plant: 0.077 kg
- Transport, barge, diesel powered [RNA]: 0.0017 t*km
- Electricity, at cogen, for natural gas turbine [US]: 0.3888 MJ
- Transport, train, diesel powered [RNA]: 0.085 t*km
- Hydrogen, at plant: 0.00045 kg; provider Hydrogen, liquid, synthesis gas, at plant
- Transport, pipeline, natural gas [RNA]: 0.011 t*km
- Cyclohexane, production: 0.00025 kg
  Ancillary material, Ecoinvent data adapted for US
- Ethylene, at plant, kg: 0.999284 kg; provider Ethylene, materials production, organic compound, at plant, kg
  The Ethylene amount includes amounts for Butene, Octane, and Hexene-1, as well as ancillary materials Isobutane and isopentane. Ethylene is used as surrogate for these inputs.
- Electricity, AC, 120 V: 0.5436 MJ; provider Electricity; at user; consumption mix - US - US
- Natural gas, combusted in industrial boiler [RNA]: 0.02 m3

## Inputs from nature
- Water [resource, water]: 1.25 kg

## Waste to treatment
- Recycling, solid waste, to recycling or reuse: 0.00026 kg
  Non hazardous waste
- Disposal, hazardous waste, to unspecified hazardous waste landfill: 6.6e-7 kg
- Disposal, solid waste, to incineration without energy recovery: 4.2e-5 kg
  Non hazardous waste
- Disposal, solid waste, to incineration with energy recovery: 2.4e-10 kg
- Disposal, hazardous waste, to incineration without energy recovery: 0.0013 kg
- Recycling, hazardous waste, to recovery: 8.8e-7 kg
- Disposal, hazardous waste, to incineration with energy recovery: 7.6e-9 kg
- Disposal, solid waste, process, to sanitary landfill: 0.0034 kg
  Non hazardouse waste

## Emissions to nature
- Iron [emission, water]: 1e-7 kg
  This data was reported by fewer than three companies. To indicate known emissions while protecting the confidentiality of individual company responses, the emission is reported only by order of magnitude.
- Nickel [emission, water]: 1e-8 kg
  (same comment as for Iron)
- Heptane [emission, air]: 1e-6 kg
  (same comment as for Iron)
- Propylene [emission, air]: 1.3e-5 kg
- Hydrocarbons [emission, air]: 0.00022 kg
- Chemical Oxygen Demand [emission, water]: 7.4e-7 kg
- Particulate matter, ≤ 2.5μm [emission, air]: 9.1e-6 kg
- Hexane [emission, air]: 1e-5 kg
  (same comment as for Iron)
- 2-Methylpentane [emission, air]: 1e-5 kg
  (same comment as for Iron)
- Isopropanol [emission, air]: 1e-5 kg
- 2-Methylbutane [emission, air]: 1e-6 kg
- Total oil and grease, less total petroleum hydrocarbons (TPH) [emission, water]: 1e-6 kg
- Isobutene [emission, air, troposphere, urban, low]: 1e-6 kg
  (same comment as for Iron)
- Ethane [emission, air]: 1e-5 kg
  (same comment as for Iron)
- Hydrogen [emission, air]: 0.0001 MJ
  (same comment as for Iron)
- Ethylene [emission, air]: 2.1e-5 kg
- Biological Oxygen Demand [emission, water]: 2.6e-6 kg
- Nitrogen oxides [emission, air]: 1.5e-5 kg
- Suspended solids, inorganic [emission, water]: 2.3e-5 kg
- Sulfur oxides [emission, air]: 5.9e-8 kg
- 1-Octene [emission, air]: 1e-6 kg
  (same comment as for Iron)
- Zinc [emission, water]: 1e-8 kg
- Cyanide [emission, water]: 1e-9 kg
  (same comment as for Iron)
- Mercury [emission, water]: 1e-11 kg
  (same comment as for Iron)
- Dissolved Organic Carbon [emission, water]: 0.0001 kg
  (same comment as for Iron)
- Fluoride [emission, water]: 1e-9 kg
  (same comment as for Iron)
- Methane [emission, air]: 1.3e-5 kg
- Propane [emission, air]: 1e-7 kg
  (same comment as for Iron)
- Carbon dioxide [emission, air]: 0.011 kg
- Phenol [emission, water]: 1e-8 kg
  (same comment as for Iron)
- Formaldehyde [emission, air]: 1e-7 kg
- Cyclohexane [emission, air]: 0.001 kg
  (same comment as for Iron)
- Chlorine [emission, air]: 1e-8 kg
  (same comment as for Iron)
- Aluminum [emission, water]: 3.8e-7 kg
- Naphthalene [emission, air]: 1e-12 kg
- Orthophosphate [emission, water]: 1e-9 kg
  Phosphates. This data was reported by fewer than three companies. To indicate known emissions while protecting the confidentiality of individual company responses, the emission is reported only by order of magnitude.
- Biphenyl [emission, air]: 1e-6 kg
  (same comment as for Iron)
- Toluene [emission, water]: 1e-9 kg
  (same comment as for Iron)
- Methanol [emission, air]: 1e-6 kg
- Hydrofluorocarbons [emission, air]: 1e-7 kg
  (same comment as for Iron)
- Particulate matter [emission, air]: 1e-5 kg
  (same comment as for Iron)
- Ammonia [emission, water]: 1e-8 kg
  (same comment as for Iron)
- Carbon monoxide [emission, air]: 6.1e-5 kg
- Total dissolved solids [emission, water]: 0.00032 kg
  (same comment as for Iron)
- Nitrous oxide [emission, air]: 1.2e-7 kg
- Hydrochloric acid [emission, air]: 1e-7 kg
  (same comment as for Iron)
- Phenyl ether [emission, air, troposphere, urban, ground-level]: 1e-5 kg
  Diphenyl oxide. This data was reported by fewer than three companies. To indicate known emissions while protecting the confidentiality of individual company responses, the emission is reported only by order of magnitude.
- Chromium [emission, water]: 1e-9 kg
  (same comment as for Iron)
- Dodecane [emission, air]: 1e-6 kg
  (same comment as for Iron)
- Particulate matter, > 2.5μm and ≤ 10μm [emission, air]: 2e-5 kg
- Propane [emission, air]: 1e-7 kg
- Phosphorus [emission, water]: 1e-7 kg
  (same comment as for Iron)
- Decane [emission, air]: 1e-5 kg
  (same comment as for Iron)
- Lead [emission, water]: 1e-9 kg
  (same comment as for Iron)
- Pentane [emission, air]: 1e-5 kg
  (same comment as for Iron)
- Orthophosphate [emission, water]: 1e-9 kg
- Isobutane [emission, air]: 0.0001 kg
  (same comment as for Iron)
- Sulfide [emission, water]: 1e-7 kg
  (same comment as for Iron)
- Octane [emission, air]: 1e-5 kg
  (same comment as for Iron)
- 1-Butene [emission, air]: 1e-5 kg
  (same comment as for Iron)
- 1-Hexene [emission, air]: 1e-5 kg
  (same comment as for Iron)

## Inventory method
Attributional; Compatible with TRACI

## Modelling constants
LCI data for the production of LLDPE resin were collected from four producers (six plants) in North America. Three companies provided data for the year 2015, and one company provided data for the year 2016. After reviewing individual company data in comparison to the average, each manufacturer verified data from 2015-2016 was representative of an average year for LLDPE resin production at their company. Mass allocation was used to allocate all inputs and outputs to each product and co-products. For steam used in other processes, this was treated as an avoided fuel product and were given credits based on the fuel required to create the steam that it would replace.

## Completeness
Data evaluation procedures and criteria were applied consistently to all primary data provided by the participating producers for all data collected. All primary data obtained specifically for this study were considered the most representative available for the systems studied. Data sets were reviewed for completeness and material balances, and follow-up was conducted as needed to resolve any questions about the input and output flows, process technology, etc. The aggregated averaged datasets were also reviewed by the providing companies as compared to the provided dataset. Companies were requested to review whether their data were complete and to comment about their or the average dataset.

## Data selection
All LLDPE production data was sourced from primary producers.

## Data treatment
A weighted average was calculated from the data collected and used to develop the LCA model. Small amounts (less than 1 percent of total output) of off-spec/scrap resin and isomers are produced as coproducts during this process and sold. A mass basis was used to allocate out the credit for the coproduct off-spec/scrap resin; thus, this inventory represents only the primary (i.e., virgin resin) produced. The average LLDPE datasets were reviewed and accepted respectively by each LLDPE data provider.

## Sampling procedure
BOUNDARY CONDITIONS: The unit process boundary includes the manufacturing of LLDPE resin at the plant, including incoming transportation for each material.
DATA COLLECTION: The primary data for the life cycle inventory of the production of LLDPE, were collected from four producers (six plants) located in the United States and Canada in 2015-2016. A weighted average was calculated from the data collected and used to develop the LCA model. For this process the data sets are based on actual plant data reported by plant personnel. Supporting background data were drawn from credible, widely used databases including the US LCI database, GREET, and Ecoinvent.
UNCERTAINTY ESTIMATION: Primary data collected from actual facilities are considered the best available data for representing industry operations. In this study, primary data were used to model the LLDPE production. All data received were carefully evaluated before compiling the production-weighted average data sets used to generate results. No uncertainty analysis was carried out due to the lack of uncertainty data or probability distributions for key parameters, which are often only available as single point estimates from the producers.

## Intended application
"Accounting, with system-external interactions" - The intended application is a purely descriptive accounting / documentation of the analysed system including existing interactions with other systems in the LCI model. These data are an update to a previously published dataset which is a generic unit process data.

## Project
These data are an update to a previously published dataset which is a generic unit process data.; Cradle-to-Resin Life Cycle Analysis of Linear Low-Density Polyethylene Resin. Submitted to the American Chemistry Council (ACC). 2020 (currently draft form)

## Review 
Some ACC members reviewed the data and associated report. Internal review of data entry proofreading, mass balance verification and data documentation was also carried out.

## Sources
- Franklin Associates (2020) Cradle-to-Gate LCA of LLDPE
