# Transport, ocean freighter, average fuel mix

Dataset: openLCA process, unit process
Category: 48-49: Transportation and Warehousing/4831: Deep Sea, Coastal, and Great Lakes Water Transportation
Geography: Global
Time period: 2023-01-01 to 2023-12-31
Allocation method: no allocation
Data quality: US EPA - Process Pedigree Matrix (4;5)
Generated by: Franklin Associates, A Division of ERG
Owner: Franklin Associates, A Division of ERG
Published in: Maritime Page
isCopyrightProtected: false
restrictionsDescription: These U.S. LCI Database Project data ("Data") are provided by the National Renewable Energy Laboratory ("NREL"), operated by the Alliance for Sustainable Energy, LLC ("Alliance") for the US Department of Energy ("DOE") under Contract No. DE-AC36-08GO28308. The United States Government (the "Government") retains and the user acknowledges that the Government retains a non-exclusive, paid-up, irrevocable, worldwide license to publish or reproduce the published form of these data, or allow others to do so, for Government purposes.
Access to and use of these Data shall impose the following obligations on the user, as set forth in this Agreement. The user is granted the right, without any fee or cost, to use, copy, modify, alter, enhance and distribute these Data for any purpose whatsoever, provided that this entire notice appears in all copies of the Data. Any modification, alteration or enhancement of these data shall be identified and documented by the user. Further, the user agrees to credit the DOE/NREL/Alliance in any publication that results from the use of these Data. The names DOE/NREL/Alliance, however, may not be used in any advertising or publicity to endorse or promote any products or commercial entities unless specific written permission is obtained from DOE/NREL/Alliance. The user also understands that DOE/NREL/Alliance is not obligated to provide the user with any support, consulting, training or assistance of any kind with regard to the use of these Data or to provide the user with any updates, revisions or new versions of these Data.
YOU AGREE TO INDEMNIFY THE GOVERNMENT AND DOE/NREL/ALLIANCE, AND ITS SUBSIDIARIES, AFFILIATES, OFFICERS, AGENTS, AND EMPLOYEES AGAINST ANY CLAIM OR DEMAND, INCLUDING REASONABLE ATTORNEYS' FEES, RELATED TO YOUR USE OF THESE DATA. THESE DATA ARE PROVIDED BY DOE/NREL/ALLIANCE "AS IS" AND ANY EXPRESS OR IMPLIED WARRANTIES, INCLUDING BUT NOT LIMITED TO, THE IMPLIED WARRANTIES OF MERCHANTABILITY AND FITNESS FOR A PARTICULAR PURPOSE ARE DISCLAIMED. IN NO EVENT SHALL THE GOVERNMENT OR DOE/NREL/ALLIANCE BE LIABLE FOR ANY SPECIAL, INDIRECT OR CONSEQUENTIAL DAMAGES OR ANY DAMAGES WHATSOEVER, INCLUDING BUT NOT LIMITED TO CLAIMS ASSOCIATED WITH THE LOSS OF DATA OR PROFITS, WHICH MAY RESULT FROM AN ACTION IN CONTRACT, NEGLIGENCE OR OTHER TORTIOUS CLAIM THAT ARISES OUT OF OR IN CONNECTION WITH THE ACCESS, USE OR PERFORMANCE OF THESE DATA.

## General comment
This cradle-to-gate unit process is for the transport of 1 tonne of freight 1 kilometer via an ocean freighter. This dataset represents an average ocean freighter fuel mix of 80% residual fuel oil and 20% diesel.

## Technology
Residual fuel oil is the most commonly used fuel for cargo ships, making up 80% of fuel use. Diesel and other fuel sources account for the remaining 20% of cargo ships fuel consumption. This model only considers diesel and residual fuel oil.

## Geography
This process is representative of a global ocean freighter fuel mix.

## Time period
This unit process is representative of a fuel mix from a 2023 report.

## Reference product
- Transport, ocean freighter, average fuel mix [RNA]: 1 t*km

## Inputs from technosphere
- Transport, ocean freighter, diesel powered [US]: 0.2 t*km
- Transport, ocean freighter, residual fuel oil powered [US]: 0.8 t*km

## Inventory method
Cradle-to-gate

## Modelling constants
The percentage split in this process is from an industry website.

## Completeness
TREATMENT OF MISSING ENVIRONMENTAL DATA: N/A

TREATMENT OF MISSING TECHNOSPHERE DATA: N/A

MASS BALANCE: Complete

## Data selection
This dataset was sourced from the Maritime Page website which is a shipping industry resource.

## Data treatment
The data source provided a fuel split of 80% for residual fuel oil and the remaining 20% is made up of multiple fuels, this model assumes that the entirety of the 20% consists of diesel fuel.

## Data collection
The data collected is from a 2023 article.

## Sampling procedure
DATA COLLECTION: Data was collected from Maritime Page

## Intended application
The intended application for this process is for accounting purposes as described in Goal Situation C1 from the ILCD Handbook's Detailed Guidance. LCA studies with this intended application offer "purely descriptive documentation of the system under analysis (e.g., a product, sector or country), without being interested in any potential consequences on other parts of the economy.” The studies categorized under Goal Situation C1 do consider existing benefits outside the analyzed system such as recycling. These data are an update to a previously published dataset.

## Project
USLCI curator updates

## Sources
- Maritime Page
