# Fertilizer, stover, 2022

Dataset: openLCA process, unit process
Category: 11: Agriculture, Forestry, Fishing and Hunting/1151: Support Activities for Crop Production
Geography: Northern America
Time period: 2009-12-31 to 2100-12-30
Allocation method: no allocation
Generated by: Daniel Inman
Published in: Hsu, D.
isCopyrightProtected: false
restrictionsDescription: All information can be accessed by everybody.

## Technology
Modern technology

## Geography
North America

## Time period
2010 and after

## Reference product
- Fertilizer, stover [RNA]: 10000 m2; = 1.0*10000

## Inputs from technosphere
- Ammonia, steam reforming, liquid, at plant: 21 kg
  Anhydrous ammonia, 82% N. Avg US rate = 155 kg N per ha. Accounts for 47% of all N applied to corn in the US. IFA 2008. Accounts for additional fertilizers added b/c of stover removal. Nutrient replacement is based on ISU Extension publication PM-1688. Proxy: Ammonia, liquid, at regional storehouse/RER with US electricity U
- Transport, combination truck, diesel powered [RNA]: 0.279 t*km
  Transport of urea to the field, resulting from fertilizer replaced b/c of stover removal. Assuming 80.6km roundtrip distance.
- Phosphorous fertilizer, production mix, at plant [RNA]: 3.26 kg
  TSP = 48% P2O5. Assuming 20% of P2O5 applied to corn in 2007 was TSP. Accounts for additional fertilizers added b/c of stover removal. Nutrient replacement is based on ISU Extension publication PM-1688, Table 2. Proxy: Triple superphosphate, as P2O5, at regional storehouse/RER with US electricity U
- Nitrogen fertilizer, production mix, at plant [RNA]: 6.22 kg
  UAN 32%. Avg US N rate = 155 kg N per hectare. 3.13 kg UAN 32 has 1 kg N. Accounts for 27% of all N applied to corn in the US. IFA 2008. Accounts for additional fertilizers added b/c of stover removal. Nutrient replacement is based on ISU Extension publication PM-1688. Proxy: Urea ammonium nitrate, as N, at regional storehouse/RER with US electricity U
- Transport, combination truck, diesel powered [RNA]: 0.279 t*km
  Transport of UAN to the field, resulting from fertilizer replaced b/c of stover removal. Assuming 80.6km roundtrip distance.
- Transport, combination truck, diesel powered [RNA]: 1.66 t*km
  Transport of K to the field, resulting from fertilizer replaced b/c of stover removal. Assuming 80.6km roundtrip distance.
- Transport, combination truck, diesel powered [RNA]: 0.392 t*km
  Transport of TSP to the field, resulting from fertilizer replaced b/c of stover removal. Assuming 80.6km roundtrip distance.
- Potassium chloride, as K2O, at regional storehouse: 49.4 kg
  Muriate of potash-K2O=60%. 100% of K applied to corn in 2007 was muriate. IFA 2008. Accounts for additional fertilizers added b/c of stover removal. Nutrient replacement is based on ISU Extension publication PM-1688, Table 2
- Transport, combination truck, diesel powered [RNA]: 0.939 t*km
  Transport of ammonia to the field, resulting from fertilizer replaced b/c of stover removal. Assuming 80.6km roundtrip distance.

## Emissions to nature
- Ammonia [emission, air]: 3.29 kg
  Assuming 10% of N applied volatalizes to NH3. IPCC 2006: Chapter 11: N2O Emissions from Managed Soils, and CO2 Emissions from Lime and Urea Application. Table 11.3
- Nitrous oxide [emission, air]: 0.436 kg
  Assuming 1.25% of N applied is lost via denitrification as N2O. IPCC 2006: Chapter 11: N2O Emissions from Managed Soils, and CO2 Emissions from Lime and Urea Application. Table 11.1; footnote 8. Teir I estimate.

## Sources
- NASS
- Hsu, D.
