# Fertilizer, corn, 2022

Dataset: openLCA process, unit process
Category: 11: Agriculture, Forestry, Fishing and Hunting/1151: Support Activities for Crop Production
Geography: Northern America
Time period: 2004-12-31 to 2009-12-30
Allocation method: no allocation
Generated by: Daniel Inman
Published in: Hsu, D.
isCopyrightProtected: false
restrictionsDescription: All information can be accessed by everybody.

## Technology
Modern technology

## Geography
North America

## Time period
2005-2009

## Reference product
- Fertilizer, corn [RNA]: 10000 m2; = 1.0*10000

## Inputs from technosphere
- Nitrogen fertilizer, production mix, at plant [RNA]: 36.4 kg
  proxy: Urea ammonium nitrate, as N, at regional storehouse/RER with US electricity U
- Ammonia, steam reforming, liquid, at plant: 123 kg
  proxy: Ammonia, liquid, at regional storehouse/RER with US electricity U
- Transport, combination truck, diesel powered [RNA]: 1.47 t*km
  Transport of UAN fertilizer to the field. assuming 80.6 km round trip distance.
- Slurry spreading, by vacuum tanker: 1.01 m3
  Accounting for manure spreading. 25% of all manure applied to corn is applied as a slurry. USDA ERS AMRS 2005
- Phosphorous fertilizer, production mix, at plant [RNA]: 10.2 kg
  proxy: Triple superphosphate, as P2O5, at regional storehouse/RER with US electricity U
- Potassium nitrate, as K2O, at regional storehouse: 94 kg
- Solid manure loading and spreading, by hydraulic loader and spreader: 3.02 kg
  Accounting for manure spreading. This includes both broadcast and dry-applied. 75%
- Lime, agricultural, corn production [RNA]: 10000 m2; = 1.0*10000

## Emissions to nature
- Nitrous oxide [emission, air]: 0.0668 kg
  N2O emissions as a result of slurry manure application. Assuming application of wet manure (85% moisture). Dry manure is 2% N by wt. Approximately 25% of all manure applied to corn is dry.
- Ammonia [emission, air]: 0.504 kg
  NH3 emissions as a result of slurry manure application. Assuming application of wet manure (85% moisture). Dry manure is 2% N by wt. Approximately 25% of all manure applied to corn is dry.

## Sources
- NASS
- Hsu, D.
