# Bituminous coal, combusted in industrial boiler

Dataset: openLCA process, unit process
Category: 22: Utilities/2213: Water, Sewage and Other Systems
Geography: Northern America
Time period: 1996-12-31 to 2002-12-31
Allocation method: no allocation
Generated by: Franklin Associates, A Division of ERG
Published in: Franklin Associates (2003) Bituminous Combustion Industrial Boiler
isCopyrightProtected: false
restrictionsDescription: All information can be accessed by everybody.

## General comment
In cases where industrial boiler data were not available, utility boiler data were adjusted accordingly., 100% inputs from technosphere and elementary flows allocated to the combustion of coal, and 0% to the production of ash and flue gas desulfurization sludge
Important note: although most of the data in the US LCI database has
undergone some sort of review, the database as a whole has not yet
undergone a formal validation process.
Please email comments to lci@nrel.gov.

## Technology
Surface mining is used to extract 58 percent of the U.S. supply of coal, while underground mining extracts 42 percent

## Geography
United States

## Reference product
- Bituminous coal, combusted in industrial boiler [RNA]: 1 kg

## Inputs from technosphere
- Transport, train, diesel powered [RNA]: 1.043 t*km
  Represents transportation from bituminous production/processing to industrial boiler.
- Transport, combination truck, diesel powered [RNA]: 0.0067592 t*km
  Represents transportation from bituminous production/processing to industrial boiler.
- Transport, barge, average fuel mix [RNA]: 0.12662 t*km
  Represents transportation from bituminous production/processing to industrial boiler.
- Bituminous coal, at mine [RNA]: 1 kg
- Transport, pipeline, coal slurry: 0.0050212 t*km
  Represents transportation from bituminous production/processing to industrial boiler.

## Waste to treatment
- Disposal, solid waste, unspecified, to unspecified treatment: 0.06208 kg
- Disposal, ash and flue gas desulfurization sludge, to unspecified reuse: 0.079 kg

## Emissions to nature
- Nickel [emission, air]: 1.741e-7 kg
- Benzo[a]pyrene [emission, air]: 1.9e-11 kg
  Sources for PAH data are old or unverifiable. Use this PAH data with caution.
- Methyl bromide [emission, air]: 8e-8 kg
- Benzo[ghi]perylene [emission, air]: 1.35e-11 kg
  Sources for PAH data are old or unverifiable. Use this PAH data with caution.
- Acenaphthylene [emission, air]: 1.25e-10 kg
  Sources for PAH data are old or unverifiable. Use this PAH data with caution.
- Di(2-ethylhexyl) phthalate [emission, air]: 3.65e-8 kg
- Fluoride [emission, air]: 2.2297e-5 kg
- Carbon dioxide [emission, air]: 2.634 kg
- Antimony [emission, air]: 9e-9 kg
- Lead [emission, air]: 1.7862e-6 kg
- Acenaphthene [emission, air]: 2.55e-10 kg
  Sources for PAH data are old or unverifiable. Use this PAH data with caution.
- Hydrofluoric acid [emission, air]: 5.2357e-5 kg
- Hexane [emission, air]: 3.35e-8 kg
- Sulfur dioxide [emission, air]: 0.016585 kg
- Chlorobenzene [emission, air]: 1.1e-8 kg
- Suspended solids, inorganic [emission, water]: 2.0108e-6 kg
- Xylene [emission, air]: 1.85e-8 kg
- Beryllium [emission, air]: 7.7597e-9 kg
- Chloroform [emission, air]: 2.95e-8 kg
- Methyl methacrylate [emission, air]: 1e-8 kg
- Chrysene [emission, air]: 5e-11 kg
  Sources for PAH data are old or unverifiable. Use this PAH data with caution.
- Phenanthrene [emission, air]: 1.35e-9 kg
  Sources for PAH data are old or unverifiable. Use this PAH data with caution.
- Benz[a]anthracene [emission, air]: 4e-11 kg
  Sources for PAH data are old or unverifiable. Use this PAH data with caution.
- Acetaldehyde [emission, air]: 2.85e-7 kg
- Chloromethane [emission, air]: 2.65e-7 kg
- 5-Methylchrysene [emission, air]: 1.1e-11 kg
  Sources for PAH data are old or unverifiable. Use this PAH data with caution.
- Indeno[1,2,3-cd]pyrene [emission, air]: 3.05e-11 kg
  Sources for PAH data are old or unverifiable. Use this PAH data with caution.
- Tribromomethane [emission, air]: 1.95e-8 kg
- Toluene [emission, air]: 1.2e-7 kg
- Benzene [emission, air]: 4.7668e-5 kg
- Mercury [emission, air]: 6.5409e-7 kg
- Phenols [emission, air]: 8e-9 kg
- 2-Chloroacetophenone [emission, air, stratosphere]: 3.5e-9 kg
- Manganese [emission, air]: 1.7876e-7 kg
- Tetrachloroethylene [emission, air]: 2.15e-8 kg
- Magnesium [emission, air]: 5.5e-6 kg
- 2,4-Dinitrotoluene [emission, air]: 1.4e-10 kg
- Mercaptans [emission, air]: 0.0001085 kg
- Biphenyl [emission, air]: 8.5e-10 kg
  Sources for PAH data are old or unverifiable. Use this PAH data with caution.
- Cyanide [emission, air]: 1.25e-6 kg
- Methyl ethyl ketone [emission, air]: 1.95e-7 kg
- Selenium [emission, air]: 6.5e-7 kg
- Anthracene [emission, air]: 1.05e-10 kg
  Sources for PAH data are old or unverifiable. Use this PAH data with caution.
- Fluoranthene [emission, air]: 3.55e-10 kg
  Sources for PAH data are old or unverifiable. Use this PAH data with caution.
- Chloroethane [emission, air]: 2.1e-8 kg
- Hydrochloric acid [emission, air]: 0.00030654 kg
- Ethylene dibromide [emission, air]: 6e-10 kg
- Propionaldehyde [emission, air]: 1.9e-7 kg
- Cobalt [emission, air]: 5e-8 kg
- Ethylbenzene [emission, air]: 4.7e-8 kg
- Cumene [emission, air]: 2.65e-9 kg
- 1,1,1-Trichloroethane [emission, air]: 1e-8 kg
- Cadmium [emission, air]: 4.4278e-8 kg
- Naphthalene [emission, air]: 6.5e-9 kg
  Sources for PAH data are old or unverifiable. Use this PAH data with caution.
- Acetophenone [emission, air]: 7.5e-9 kg
- Dimethyl sulfate [emission, air, troposphere, rural]: 2.4e-8 kg
- Nitrogen oxides [emission, air]: 0.0057524 kg
- Methyl hydrazine [emission, air]: 8.5e-8 kg
- Acrolein [emission, air]: 7.4696e-8 kg
- Arsenic [emission, air]: 1.5756e-7 kg
- Benzofluoranthene [emission, air]: 5.5e-11 kg
  Sources for PAH data are old or unverifiable. Use this PAH data with caution.
- Volatile organic compounds [emission, air]: 0.00014006 kg
- Methylene chloride [emission, air]: 1.45e-7 kg
- Carbon disulfide [emission, air]: 6.5e-8 kg
- Methane [emission, air]: 0.00011543 kg
- Chromium [emission, air]: 9.9038e-8 kg
- Vinyl acetate [emission, air]: 3.8e-9 kg
- Isophorone [emission, air]: 2.9e-7 kg
- Carbon monoxide [emission, air]: 0.0028911 kg
- Styrene [emission, air]: 1.25e-8 kg
- Particulate matter, ≤ 10μm [emission, air]: 0.002003 kg
- Benzyl chloride [emission, air]: 3.5e-7 kg
- Pyrene [emission, air]: 1.65e-10 kg
  Sources for PAH data are old or unverifiable. Use this PAH data with caution.
- Fluorene [emission, air]: 4.55e-10 kg
  Sources for PAH data are old or unverifiable. Use this PAH data with caution.
- Methyl tert-butyl ether [emission, air]: 1.75e-8 kg
- Formaldehyde [emission, air]: 3.383e-6 kg
- 1,2-Dichloroethane [emission, air]: 2e-8 kg
- Organic compounds [emission, air]: 3.0287e-6 kg
- Oils, unspecified [emission, water]: 1.0054e-6 kg
- Phenol [emission, air]: 8e-9 kg
- Nitrous oxide [emission, air]: 0.000368 kg
- Chromium(VI) [emission, air]: 3.95e-8 kg

## Sources
- EIA
- DOE
- EPA
- Speight
- unspecified
- Minerals Yearbook
- unspecified
- EPA
- EPA
- unspecified
- unspecified
- Franklin Associates (2003) Estimate
- EPA
- Franklin Associates (2003) Bituminous Combustion Industrial Boiler
