# Pesticide, corn, 2022

Dataset: openLCA process, unit process
Category: 11: Agriculture, Forestry, Fishing and Hunting/1151: Support Activities for Crop Production
Geography: Northern America
Time period: 2009-12-31 to 2100-12-30
Allocation method: no allocation
Generated by: Daniel Inman
Published in: Hsu, D.
isCopyrightProtected: false
restrictionsDescription: All information can be accessed by everybody.

## General comment
Application of pesticides (herbicides and insecticides) to one hectare of corn. Data are based on USDA 2006 Agricultural chemical use survey. Extrapolation of existing data to 2022 estimates.

Process has been reviewed by Dr. Dwayne Westfall, Dept Soil and Crop Sciences, Colorado State University. Date of review Sept 10 - 30 2008.

## Technology
modern

## Geography
North America

## Time period
2010-2100

## Reference product
- Pesticide, corn [RNA]: 10000 m2; = 1.0*10000

## Inputs from technosphere
- Alachlor, at regional storehouse: 0.428 kg
  Alochlor and Acetochlor are in the same chemical class (chloroacetanilide) and are produced similarly. Data from: USDA NASS 2006. Agricultural Chemical Usage 2005 Field Crops Summary. Pages 19-20.
- Application of plant protection products, by field sprayer: 20000 m2; = 2.0*10000
  Assuming field is covered twice during season
- Pyretroid-compounds, at regional storehouse: 0.00056 kg
  This class includes both Tefluthrin and Cyfluthrin. Data from: USDA NASS 2006. Agricultural Chemical Usage 2005 Field Crops Summary. Pages 19-20.
- Metolachlor, at regional storehouse: 0.347 kg
  Total metolochlor applied, kg ai. Assuming 23% of corn acres received metolochlor. Data from: USDA NASS 2006. Agricultural Chemical Usage 2005 Field Crops Summary. Pages 19-20.
- Organophosphorus-compounds, at regional storehouse: 0.00768 kg
  This class includes Tebupirimphos. Data from: USDA NASS 2006. Agricultural Chemical Usage 2005 Field Crops Summary. Pages 19-20.
- Glyphosate, at regional storehouse: 0.332 kg
  Total glyphosate applied, kg ai. Assuming 31% of corn acres planted recieved glyphosate. Data from: USDA NASS 2006. Agricultural Chemical Usage 2005 Field Crops Summary. Pages 19-20.
- 2,4-D, at regional storehouse: 0.0162 kg
  Total 2,4-D applied, kg ai. Assumeing 3% corn acres planted recieved 2,4-D. Data from: USDA NASS 2006. Agricultural Chemical Usage 2005 Field Crops Summary. Pages 19-20.
- Atrazine, at regional storehouse: 0.957 kg
  Total atrazine applied, kg ai. Assumeing 66% corn acres planted recieved atrazine. Data from: USDA NASS 2006. Agricultural Chemical Usage 2005 Field Crops Summary. Pages 19-20.
- Transport, combination truck, diesel powered [RNA]: 1.09 t*km
  Transport of pesticides and seed to the field assuming 80.6km round trip distance. Value is estimated.
- [sulfonyl]urea-compounds, at regional storehouse: 0.024 kg
  This class includes nicosulfuron. Data from: USDA NASS 2006. Agricultural Chemical Usage 2005 Field Crops Summary. Pages 19-20.

## Emissions to nature
- Tefluthrin [emission, ground, human-dominated, agricultural]: 0.00924 kg
  Total tefluthrin applied, kg ai. Assuming 7% of corn acres received application. Adjusted to 1 kg of corn.Data from: USDA NASS 2006. Agricultural Chemical Usage 2005 Field Crops Summary. Pages 19-20.
- 2,4-D [emission, ground, human-dominated, agricultural]: 0.0162 kg
  Total 2,4-D applied, kg ai. Assumeing 3% corn acres planted recieved 2,4-D. Adjusted to 1 kg of corn.Data from: USDA NASS 2006. Agricultural Chemical Usage 2005 Field Crops Summary. Pages 19-20.
- Glyphosate [emission, ground, human-dominated, agricultural]: 0.332 kg
  Total glyphosate applied, kg ai. Assuming 31% of corn acres planted recieved glyphosate. Adjusted to 1 kg of corn.Data from: USDA NASS 2006. Agricultural Chemical Usage 2005 Field Crops Summary. Pages 19-20.
- Mesotrione [emission, ground, human-dominated, agricultural]: 0.0266 kg
  Total mesotrione applied, kg ai. Assuming 20% of corn acres received mesotrione. Adjusted to 1 kg of corn. Data from: USDA NASS 2006. Agricultural Chemical Usage 2005 Field Crops Summary. Pages 19-20.
- Phostebupirim [emission, ground]: 0.00768 kg
  Total tebupirimphos applied, kg ai. Assuming 6% ofcorn acres received application. Adjusted to 1 kg of corn. Data from: USDA NASS 2006. Agricultural Chemical Usage 2005 Field Crops Summary. Pages 19-20.
- Atrazine [emission, water, subterranean]: 0.067 kg
  Amount of total atrazine applied, kg. that leaches below the root zone. Assumeing 66% corn acres planted recieved atrazine. Fraction of atrazine applied that has been documented to leach below the root zone. Assuming approximately 7% of applied atrazine is lost. From: Persicani, D., G. Gasparetti, P. Siro, M. Bonvini. 1995. Journal of Contaminant Hydrology 19:127-144. Page 137.
- Cyfluthrin [emission, ground, human-dominated, agricultural]: 0.00056 kg
  Total cyfluthrin applied, kg ai. Assuming 7% of corn acres received appication. Adjusted to 1 kg of corn. Data from: USDA NASS 2006. Agricultural Chemical Usage 2005 Field Crops Summary. Pages 19-20.
- S-Metolachlor [emission, ground, human-dominated, agricultural]: 0.347 kg
  Total metolochlor applied, kg ai. Assuming 23% of corn acres received metolochlor. Adjusted to 1 kg of corn. Data from: USDA NASS 2006. Agricultural Chemical Usage 2005 Field Crops Summary. Pages 19-20.
- Atrazine [emission, ground, human-dominated, agricultural]: 0.957 kg
  Total atrazine applied, kg ai. Assumeing 66% corn acres planted recieved atrazine. Adjusted to 1 kg of corn. Data from: USDA NASS 2006. Agricultural Chemical Usage 2005 Field Crops Summary. Pages 19-20.
- Nicosulfuron [emission, ground, human-dominated, agricultural]: 0.024 kg
  Total nicosulfuron applied, kg ai. Assuming 10% of corn acres received application. Adjusted to 1 kg of corn. Data from: USDA NASS 2006. Agricultural Chemical Usage 2005 Field Crops Summary. Pages 19-20.
- Acetochlor [emission, ground, human-dominated, agricultural]: 0.428 kg
  Total acetochlor applied, kg ai. Assumeing 23% corn acres planted recieved acetochlor. Adjusted to 1 kg of corn. Data from: USDA NASS 2006. Agricultural Chemical Usage 2005 Field Crops Summary. Pages 19-20.

## Sources
- Hsu, D.
- Nemecek, T.
