# Ethylene glycol, materials production, organic compound, at plant, kg

Dataset: openLCA process, unit process, infrastructure
Category: 31-33: Manufacturing/3251: Basic Chemical Manufacturing
Geography: Northern America
Time period: 2014-12-31 to 2015-12-30
Allocation method: no allocation
Data quality: US EPA - Process Pedigree Matrix (4;1)
Generated by: Franklin Associates, A Division of ERG
Owner: NAPCOR
Published in: Franklin Associates (2019) Cradle-to-Resin LCA PET for NAPCOR
isCopyrightProtected: false
restrictionsDescription: These U.S. LCI Database Project data ("Data") are provided by the National Renewable Energy Laboratory ("NREL"), operated by the Alliance for Sustainable Energy, LLC ("Alliance") for the US Department of Energy ("DOE") under Contract No. DE-AC36-08GO28308. The United States Government (the "Government") retains and the user acknowledges that the Government retains a non-exclusive, paid-up, irrevocable, worldwide license to publish or reproduce the published form of these data, or allow others to do so, for Government purposes.
Access to and use of these Data shall impose the following obligations on the user, as set forth in this Agreement. The user is granted the right, without any fee or cost, to use, copy, modify, alter, enhance and distribute these Data for any purpose whatsoever, provided that this entire notice appears in all copies of the Data. Any modification, alteration or enhancement of these data shall be identified and documented by the user. Further, the user agrees to credit the DOE/NREL/Alliance in any publication that results from the use of these Data. The names DOE/NREL/Alliance, however, may not be used in any advertising or publicity to endorse or promote any products or commercial entities unless specific written permission is obtained from DOE/NREL/Alliance. The user also understands that DOE/NREL/Alliance is not obligated to provide the user with any support, consulting, training or assistance of any kind with regard to the use of these Data or to provide the user with any updates, revisions or new versions of these Data.
YOU AGREE TO INDEMNIFY THE GOVERNMENT AND DOE/NREL/ALLIANCE, AND ITS SUBSIDIARIES, AFFILIATES, OFFICERS, AGENTS, AND EMPLOYEES AGAINST ANY CLAIM OR DEMAND, INCLUDING REASONABLE ATTORNEYS' FEES, RELATED TO YOUR USE OF THESE DATA. THESE DATA ARE PROVIDED BY DOE/NREL/ALLIANCE "AS IS" AND ANY EXPRESS OR IMPLIED WARRANTIES, INCLUDING BUT NOT LIMITED TO, THE IMPLIED WARRANTIES OF MERCHANTABILITY AND FITNESS FOR A PARTICULAR PURPOSE ARE DISCLAIMED. IN NO EVENT SHALL THE GOVERNMENT OR DOE/NREL/ALLIANCE BE LIABLE FOR ANY SPECIAL, INDIRECT OR CONSEQUENTIAL DAMAGES OR ANY DAMAGES WHATSOEVER, INCLUDING BUT NOT LIMITED TO CLAIMS ASSOCIATED WITH THE LOSS OF DATA OR PROFITS, WHICH MAY RESULT FROM AN ACTION IN CONTRACT, NEGLIGENCE OR OTHER TORTIOUS CLAIM THAT ARISES OUT OF OR IN CONNECTION WITH THE ACCESS, USE OR PERFORMANCE OF THESE DATA.

## General comment
Ethylene glycol is produced by the hydration of ethylene oxide. The production process is generally close to the process unit for ethylene oxide. In this case, crude oxide solution is used as feed to the glycol unit. Using crude solution avoids a refining step but still provides an adequate feed. An excess amount of water is added to the reactor feed to reduce the amount of diethylene glycol and triethylene glycol. These glycols are produced from the reaction of monoethylene glycol with ethylene oxide. The hydration reaction can be uncatalyzed or catalyzed with an acid. An uncatalyzed reaction is much slower, but acid removal from the glycol is required if a catalyst is used. This glycol/water mixture is sent through an evaporator to concentrate the solution and recover the water. The water is recycled back to be used to prepare the ethylene oxide feed. High purity ethylene glycol is obtained from the concentrated glycol solution by vacuum distillation.

## Technology
Production of Ethylene glycol at plant (including Ethylene Oxide).

## Geography
LCI data for the production of ethylene oxide (EO)/ethylene glycol (EG) was collected from three producers (five EO plants/three EG plants) in North America – all in the United States. All plants were able to provide data for 2015 with the exception of emissions from one plant, which were from 2016 due to availability issues. Monoethylene glycol and Diethylene glycol were considered the main products; triethylene glycol, when produced, was considered a coproduct. A mass basis was used to allocate the credit for the coproduct.

## Time period
Reflects conditions in 2015

## Reference product
- Ethylene glycol, at plant, kg: 1 kg

## Avoided products
- Natural gas, combusted in industrial boiler [RNA]: 0.0218 m3
  Natural gas amount equivalent to energy content of exported steam. Recovered energy from steam.

## Inputs from technosphere
- Natural gas, combusted in industrial boiler [RNA]: 0.146 m3
- Ethylene, at plant, kg: 0.59 kg; provider Ethylene, materials production, organic compound, at plant, kg
- Electricity, AC, 120 V: 0.54 MJ; provider Electricity; at user; consumption mix - US - US
- Electricity, at cogen, for natural gas turbine [US]: 0.088 kWh
- Transport, pipeline, unspecified petroleum products [RNA]: 0.034 t*km
- Nitrogen, liquid, at plant: 0.01 kg
- Oxygen, liquid, at plant [RNA]: 0.56 kg
- Treated drinking water, at plant: 0.00024 m3
  treated drinking water, converted from kg

## Inputs from nature
- Water [resource, water]: 0.31 kg
  This water is consumed process water.

## Waste to treatment
- Disposal, solid waste, process, to sanitary landfill: 0.001 kg
  Solid waste to landfill
- Disposal, hazardous waste, to incineration without energy recovery: 5.4e-6 kg
  Hazardous waste to incineration
- Disposal, solid waste, to incineration without energy recovery: 0.00067 kg
  Solid waste to incineration, burned without energy recovery
- Disposal, hazardous waste, to incineration with energy recovery: 2.4e-6 kg
  Hazardous waste to WTE

## Emissions to nature
- Total Organic Carbon [emission, water]: 0.0001 kg
  This data was reported by fewer than three companies. To indicate known emissions while protecting the confidentiality of individual company responses, the emission is reported only by order of magnitude.
- Methanol [emission, air]: 1e-8 kg
  (same comment as for Total Organic Carbon)
- Ethane [emission, air]: 1e-7 kg
  (same comment as for Total Organic Carbon)
- Ethylene oxide [emission, water]: 1e-5 kg
- 1,4-Dioxane [emission, water]: 1e-6 kg
  (same comment as for Total Organic Carbon)
- Nitrogen oxides [emission, air]: 1e-5 kg
  (same comment as for Total Organic Carbon)
- Nitrous oxide [emission, air]: 1e-6 kg
  (same comment as for Total Organic Carbon)
- Formaldehyde [emission, air]: 1e-6 kg
  (same comment as for Total Organic Carbon)
- Ethylene oxide [emission, air]: 1e-6 kg
  (same comment as for Total Organic Carbon)
- 1,2-Dichloroethane [emission, water]: 1e-6 kg
  (same comment as for Total Organic Carbon)
- Ethylene [emission, air]: 1e-6 kg
  (same comment as for Total Organic Carbon)
- Particulate matter, ≤ 2.5μm [emission, air]: 1e-8 kg
  (same comment as for Total Organic Carbon)
- Ethyl ether [emission, air]: 1e-9 kg
  (same comment as for Total Organic Carbon)
- Carbon monoxide [emission, air]: 1e-6 kg
  (same comment as for Total Organic Carbon)
- Hydrocarbons [emission, air]: 1e-5 kg
  (same comment as for Total Organic Carbon)
- Carbon dioxide [emission, air]: 0.32 kg
- Sulfur dioxide [emission, air]: 1e-10 kg
  (same comment as for Total Organic Carbon)
- Particulate matter, ≤ 10μm [emission, air]: 1e-7 kg
  Represents PM > 2.5 and <10. This data was reported by fewer than three companies. To indicate known emissions while protecting the confidentiality of individual company responses, the emission is reported only by order of magnitude.
- Particulate matter [emission, air]: 1e-6 kg
  (same comment as for Total Organic Carbon)
- Naphthalene [emission, air]: 1e-7 kg
  (same comment as for Total Organic Carbon)
- 1,2-Dichloroethane [emission, air]: 1e-8 kg
  (same comment as for Total Organic Carbon)
- 1,4-Dioxane [emission, air]: 1e-6 kg
  (same comment as for Total Organic Carbon)
- Volatile organic compounds [emission, air]: 1e-5 kg
  (same comment as for Total Organic Carbon)
- Methane [emission, air]: 1e-5 kg
  (same comment as for Total Organic Carbon)
- Ethylene glycol [emission, air]: 1e-7 kg
  (same comment as for Total Organic Carbon)
- Ethylene glycol [emission, water]: 0.001 kg
  (same comment as for Total Organic Carbon)

## Inventory method
Attributional. Compatible with TRACI

## Modelling constants
In this study, primary data were used to model ethylene glycol. All data received were carefully evaluated before compiling the production-weighted average data sets used to generate the results. Supporting background data were drawn from credible, widely used databases including the US LCI database, GREET, and Ecoinvent. Mass allocation was used to allocate all inputs and outputs to each product and co-products.

## Completeness
TREATMENT OF MISSING ENVIRONMENTAL DATA: Elementary flows are cut-off at less than 1% based on environmental relevance.
TREATMENT OF MISSING TECHNOSPHERE DATA: Intermediate flows are cut-off is at 1% based on environmental relevance.
MASS BALANCE: For primary data the mass balance was calculated by a straight comparison of inputs and outputs

## Data selection
Data was collected from three leading ethylene glycol producers (7 plants). When ethylene glycol data were provided separately for a company, an aggregated ethylene glycol dataset was prepared for that company. For producers that provided data from more than one plant, a weighted average using production amounts from each plant for the individual company was created.

## Data treatment
The average for each producer was then used to determine the overall weighted average for ethylene glycol production in North America. The average data set was individually reviewed by the data providers.

## Data collection
All companies provided data for the years 2015 and 2016

## Sampling procedure
BOUNDARY CONDITIONS: Material, energy and transportation related inputs and emissions to Ethylene Glycol production process.
DATA COLLECTION: Data was collected from three leading ethylene glycol producers (7 plants). When ethylene glycol data were provided separately for a company, an aggregated ethylene glycol data set was prepared for that company. For producers that provided data from more than one plant, a weighted average using production amounts from each plant for the individual company was created. The average for each producer was then used to determine the overall weighted average for ethylene oxide/ethylene glycol production in North America. The average data set was individually reviewed by the data providers.
UNCERTAINTY ESTIMATION: Primary data collected from actual facilities are considered the best available data for representing industry operations. In this study, primary data were used to model the steam cracking of the olefins. All data received were carefully evaluated before compiling the production-weighted average data sets used to generate results. No uncertainty analysis was carried out due to the lack of uncertainty data or probability distributions for key parameters, which are often only available as single point estimates from the producers.

## Intended application
"Accounting, with system-external interactions" - The intended application is a purely descriptive accounting / documentation of the analysed system including existing interactions with other systems in the LCI model. These data are an update to a previously published dataset which is a generic unit process data.

## Review 
Internal review of data entry proofreading, mass balance verification and data documentation.

## Sources
- Franklin Associates (2019) Cradle-to-Resin LCA PET for NAPCOR
