# Polypropylene, PP, virgin resin, at plant

Dataset: openLCA process, unit process
Category: 31-33: Manufacturing/3252: Resin, Synthetic Rubber, and Artificial and Synthetic Fibers and Filaments Manufacturing
Geography: Northern America
Time period: 2014-12-31 to 2016-12-30
Allocation method: no allocation
Data quality: US EPA - Process Pedigree Matrix (4;1)
Generated by: Franklin Associates, A Division of ERG
Owner: American Chemistry Council
Published in: American Chemistry Council, 2021, Polypropylene
isCopyrightProtected: false
restrictionsDescription: These U.S. LCI Database Project data ("Data") are provided by the National Renewable Energy Laboratory ("NREL"), operated by the Alliance for Sustainable Energy, LLC ("Alliance") for the US Department of Energy ("DOE") under Contract No. DE-AC36-08GO28308. The United States Government (the "Government") retains and the user acknowledges that the Government retains a non-exclusive, paid-up, irrevocable, worldwide license to publish or reproduce the published form of these data, or allow others to do so, for Government purposes.
Access to and use of these Data shall impose the following obligations on the user, as set forth in this Agreement. The user is granted the right, without any fee or cost, to use, copy, modify, alter, enhance and distribute these Data for any purpose whatsoever, provided that this entire notice appears in all copies of the Data. Any modification, alteration or enhancement of these data shall be identified and documented by the user. Further, the user agrees to credit the DOE/NREL/Alliance in any publication that results from the use of these Data. The names DOE/NREL/Alliance, however, may not be used in any advertising or publicity to endorse or promote any products or commercial entities unless specific written permission is obtained from DOE/NREL/Alliance. The user also understands that DOE/NREL/Alliance is not obligated to provide the user with any support, consulting, training or assistance of any kind with regard to the use of these Data or to provide the user with any updates, revisions or new versions of these Data.
YOU AGREE TO INDEMNIFY THE GOVERNMENT AND DOE/NREL/ALLIANCE, AND ITS SUBSIDIARIES, AFFILIATES, OFFICERS, AGENTS, AND EMPLOYEES AGAINST ANY CLAIM OR DEMAND, INCLUDING REASONABLE ATTORNEYS' FEES, RELATED TO YOUR USE OF THESE DATA. THESE DATA ARE PROVIDED BY DOE/NREL/ALLIANCE "AS IS" AND ANY EXPRESS OR IMPLIED WARRANTIES, INCLUDING BUT NOT LIMITED TO, THE IMPLIED WARRANTIES OF MERCHANTABILITY AND FITNESS FOR A PARTICULAR PURPOSE ARE DISCLAIMED. IN NO EVENT SHALL THE GOVERNMENT OR DOE/NREL/ALLIANCE BE LIABLE FOR ANY SPECIAL, INDIRECT OR CONSEQUENTIAL DAMAGES OR ANY DAMAGES WHATSOEVER, INCLUDING BUT NOT LIMITED TO CLAIMS ASSOCIATED WITH THE LOSS OF DATA OR PROFITS, WHICH MAY RESULT FROM AN ACTION IN CONTRACT, NEGLIGENCE OR OTHER TORTIOUS CLAIM THAT ARISES OUT OF OR IN CONNECTION WITH THE ACCESS, USE OR PERFORMANCE OF THESE DATA.

## General comment
Includes material and energy requirements and environmental emissions for one kilogram of Polypropylene (PP) virgin resin production at the plant only (gate to gate). Polypropylene is manufactured by the polymerization of propylene using Ziegler-Natta catalysts. Commercial processes generally use titanium trichloride in combination with aluminum diethylmonochloride. Production processes vary and include slurry, gas-phase, and solution monomer polymerization. The latter two processes employ the use of improved high-yield catalysts. The five polypropylene datasets represent the gas-phase and solution monomer polymerization processes.

## Technology
All data providers used the low pressure technology and either the gas-phase or slurry loop reactors with either a Phillips or a Ziegler catalyst.

## Geography
The geographic scope of the analysis is the manufacture of PP resin in North America. All PP resin data collected were from plants in the United States and Canada and incoming materials were modeled using North American databases such as the U.S. LCI database, ecoinvent (adapted to US conditions), and Franklin Associates’ private database.

## Time period
For the PP resin primary data, companies were requested to provide data for the year 2015, the most recent full year of PP resin production prior to the project initiation date. Companies providing data were given the option to collect data from the year preceding or following 2015 if either year would reflect more typical production conditions. Two companies provided data for the year 2015, and one company provided data for the year 2016. After reviewing individual company data in comparison to the average, each manufacturer verified data from 2015-2016 was representative of an average year for PP resin production at their company.

## Reference product
- Polypropylene, PP, virgin resin, at plant [RNA]: 1 kg

## Avoided products
- Natural gas, production mixture, at processing: 0.0027 kg
  avoided product for vent gas sent off or sold outside the process

## Inputs from technosphere
- Electricity, AC, 120 V: 0.576 MJ; provider Electricity; at user; consumption mix - US - US
- Electricity, at cogen, for natural gas turbine [US]: 0.504 MJ
- Natural gas, combusted in industrial boiler [RNA]: 0.034 m3
- Transport, pipeline, natural gas [RNA]: 0.038 t*km
  transport of incoming propylene and nitrogen
- Propylene, at plant [RNA]: 1.014 kg; provider Propylene, materials production, organic compound, at plant, kg
- Nitrogen, liquid, at plant: 0.064 kg

## Inputs from nature
- Water [resource, water]: 3 kg

## Waste to treatment
- Disposal, hazardous waste, to unspecified hazardous waste landfill: 9.8e-7 kg
- Disposal, solid waste, process, to sanitary landfill: 0.00042 kg
  Non hazardouse waste
- Disposal, hazardous waste, to incineration without energy recovery: 5.1e-6 kg
- Disposal, hazardous waste, to incineration with energy recovery: 0.00012 kg
- Recycling, solid waste, to recycling or reuse: 0.0007 kg

## Emissions to nature
- Nitrous oxide [emission, air]: 1e-7 kg
  This data was reported by fewer than three companies. To indicate known emissions while protecting the confidentiality of individual company responses, the emission is reported only by order of magnitude.
- Particulate matter, > 2.5μm and ≤ 10μm [emission, air]: 1.6e-5 kg
- Sulfur oxides [emission, air]: 1e-6 kg
  (same comment as for Nitrous oxide)
- Carbon monoxide [emission, air]: 1e-5 kg
  (same comment as for Nitrous oxide)
- Fluoride [emission, water]: 1e-9 kg
  (same comment as for Nitrous oxide)
- Methane [emission, air]: 1e-6 kg
  (same comment as for Nitrous oxide)
- Carbon dioxide [emission, air]: 0.01 kg
  (same comment as for Nitrous oxide)
- Ammonia [emission, air]: 1e-6 kg
  (same comment as for Nitrous oxide)
- Biological Oxygen Demand [emission, water]: 1e-5 kg
  (same comment as for Nitrous oxide)
- Formaldehyde [emission, air]: 1e-5 kg
  (same comment as for Nitrous oxide)
- Suspended solids, inorganic [emission, water]: 1.3e-5 kg
- Volatile organic compounds [emission, air]: 0.00011 kg
- Nitrogen oxides [emission, air]: 4.4e-5 kg
- Chemical Oxygen Demand [emission, water]: 1e-5 kg
  (same comment as for Nitrous oxide)
- Total dissolved solids [emission, water]: 1e-7 kg
  (same comment as for Nitrous oxide)
- Cyanide [emission, water]: 1e-9 kg
  (same comment as for Nitrous oxide)
- Particulate matter, ≤ 2.5μm [emission, air]: 9e-6 kg
- Zinc [emission, water]: 1e-9 kg
  (same comment as for Nitrous oxide)
- Particulate matter [emission, air]: 1e-5 kg
  (same comment as for Nitrous oxide)

## Inventory method
Attributional; Compatible with TRACI

## Modelling constants
LCI data for the production of PP resin were collected from three producers in North America – all in the United States. Two companies provided data for the year 2015, and one company provided data for the year 2016. After reviewing individual company data in comparison to the average, each manufacturer verified data from 2015-2016 was representative of an average year for PP resin production at their company. Mass allocation was used to allocate all inputs and outputs to each product and co-products.

## Completeness
Data evaluation procedures and criteria were applied consistently to all primary data provided by the participating producers for all data collected. All primary data obtained specifically for this study were considered the most representative available for the systems studied. Data sets were reviewed for completeness and material balances, and follow-up was conducted as needed to resolve any questions about the input and output flows, process technology, etc. The aggregated averaged datasets were also reviewed by the providing companies as compared to the provided dataset. Companies were requested to review whether their data were complete and to comment about their or the average dataset.

## Data selection
All PP production data was sourced from primary producers.

## Data treatment
A weighted average was calculated from the data collected and used to develop the LCA model. Small amounts (less than 1 percent of total output) of off-spec/scrap resin and isomers are produced as coproducts during this process and sold. A mass basis was used to allocate out the credit for the coproduct off-spec/scrap resin; thus, this inventory represents only the primary (i.e., virgin resin) produced. The average PP datasets were reviewed and accepted respectively by each PP data provider.

## Data collection
All primary data were collected from 2015-2016

## Sampling procedure
BOUNDARY CONDITIONS: The system boundary includes manufacturing of PP resin at the plant, including incoming transportation for each material.
DATA COLLECTION: The primary data for the life cycle inventory of the production of PP, were collected from three producers located in the United States in 2015-2016. A weighted average was calculated from the data collected and used to develop the LCA model. For this process the data sets are based on actual plant data reported by plant personnel. Supporting background data were drawn from credible, widely used databases including the US LCI database, GREET, and Ecoinvent.
UNCERTAINTY ESTIMATION: Primary data collected from actual facilities are considered the best available data for representing industry operations. In this study, primary data were used to model the PP production. All data received were carefully evaluated before compiling the production-weighted average data sets used to generate results. No uncertainty analysis was carried out due to the lack of uncertainty data or probability distributions for key parameters, which are often only available as single point estimates from the producers.

## Intended application
"Accounting, with system-external interactions" - The intended application is a purely descriptive accounting / documentation of the analysed system including existing interactions with other systems in the LCI model. These data are an update to a previously published dataset which is a generic unit process data.

## Project
These data are an update to a previously published dataset which is a generic unit process data.; Cradle-to-Resin Life Cycle Analysis of Polypropylene Resin. Submitted to the American Chemistry Council (ACC). 2020 (currently draft form)

## Review 
Some ACC members reviewed the data and associated report. Internal review of data entry proofreading, mass balance verification and data documentation was also carried out.

## Sources
- American Chemistry Council, 2021, Polypropylene
