# Bituminous coal, at mine

Dataset: openLCA process, unit process
Category: 21: Mining, Quarrying, and Oil and Gas Extraction/2121: Coal Mining
Geography: Northern America
Time period: 1993-01-01 to 2002-12-31
Allocation method: no allocation
Generated by: Franklin Associates, A Division of ERG
Published in: Franklin Associates (2003) Bituminous Coal Production
isCopyrightProtected: false
restrictionsDescription: These U.S. LCI Database Project data (""Data"") are provided by the National Renewable Energy Laboratory (""NREL""), operated by the Alliance for Sustainable Energy, LLC (""Alliance"") for the US Department of Energy (""DOE"") under Contract No. DE-AC36-08GO28308. The United States Government (the ""Government"") retains and the user acknowledges that the Government retains a non-exclusive, paid-up, irrevocable, worldwide license to publish or reproduce the published form of these data, or allow others to do so, for Government purposes.
Access to and use of these Data shall impose the following obligations on the user, as set forth in this Agreement. The user is granted the right, without any fee or cost, to use, copy, modify, alter, enhance and distribute these Data for any purpose whatsoever, provided that this entire notice appears in all copies of the Data. Any modification, alteration or enhancement of these data shall be identified and documented by the user. Further, the user agrees to credit the DOE/NREL/Alliance in any publication that results from the use of these Data. The names DOE/NREL/Alliance, however, may not be used in any advertising or publicity to endorse or promote any products or commercial entities unless specific written permission is obtained from DOE/NREL/Alliance. The user also understands that DOE/NREL/Alliance is not obligated to provide the user with any support, consulting, training or assistance of any kind with regard to the use of these Data or to provide the user with any updates, revisions or new versions of these Data.
YOU AGREE TO INDEMNIFY THE GOVERNMENT AND DOE/NREL/ALLIANCE, AND ITS SUBSIDIARIES, AFFILIATES, OFFICERS, AGENTS, AND EMPLOYEES AGAINST ANY CLAIM OR DEMAND, INCLUDING REASONABLE ATTORNEYS' FEES, RELATED TO YOUR USE OF THESE DATA. THESE DATA ARE PROVIDED BY DOE/NREL/ALLIANCE ""AS IS"" AND ANY EXPRESS OR IMPLIED WARRANTIES, INCLUDING BUT NOT LIMITED TO, THE IMPLIED WARRANTIES OF MERCHANTABILITY AND FITNESS FOR A PARTICULAR PURPOSE ARE DISCLAIMED. IN NO EVENT SHALL THE GOVERNMENT OR DOE/NREL/ALLIANCE BE LIABLE FOR ANY SPECIAL, INDIRECT OR CONSEQUENTIAL DAMAGES OR ANY DAMAGES WHATSOEVER, INCLUDING BUT NOT LIMITED TO CLAIMS ASSOCIATED WITH THE LOSS OF DATA OR PROFITS, WHICH MAY RESULT FROM AN ACTION IN CONTRACT, NEGLIGENCE OR OTHER TORTIOUS CLAIM THAT ARISES OUT OF OR IN CONNECTION WITH THE ACCESS, USE OR PERFORMANCE OF THESE DATA.

## General comment
This cradle to gate unit process is for 1 kilogram of bituminous coal extraction produced in 21 states across the US. Data was collected from 1993-2002 from various literature secondary sources. It is unknown if or what type of allocation is used in this dataset. The system boundary of this dataset includes bituminous coal extraction, processing, and cleaning. System boundary exclusions are unknown. The following technology was used: surface/strip mining and underground mining. This metadata was populated based on a 2004 module report. Please reach out to USLCI@erg.com for more information.

## Technology
In surface/strip mining, the overburden (soil and rock covering the ore) is removed from shallow seams, the deposit is broken up, and the coal is loaded for transport. The overburden is generally returned to the mine (eventually) and is not considered as a solid waste in this data module. Underground mining is done primarily by one of two methods—room-and-pillar mining or longwall mining. Underground mining is a complex undertaking, and is much more labor and energy intensive than surface mining.

After coal is mined, it goes through various preparation processes before it is used as fuel. These processes vary depending on the quality of the coal and the use for which it is intended. Coal preparation usually involves some type of size reduction, such as crushing and screening, and the removal of extraneous material introduced during mining. In addition, coal is often cleaned with mechanical methods to upgrade the quality and heating value of the coal by removing or reducing the sulfur, clay, rock, and other ash-producing materials.

Surface mining is used to extract 58 percent of bituminous coal, while underground mining is used to extract 42 percent. Approximately 58 percent of bituminous coal is cleaned. Small amounts of solid waste are produced from underground mining, while the remainder of solid waste comes from cleaning.

## Geography
This process is representative of the extraction of bituminous coal in 21 states across the US. The three top producing states are Wyoming, West Virginia, and Kentucky.

## Time period
This unit process is representative of data collected from 1993-2002 from various literature secondary sources.

## Reference product
- Bituminous coal, at mine [RNA]: 1 kg
  Processed coal for use in utilities

## Inputs from technosphere
- Bituminous coal, combusted in industrial boiler [RNA]: 0.000431 kg
- Diesel, combusted in industrial boiler [RNA]: 0.0088 l
- Natural gas, combusted in industrial boiler [RNA]: 0.000162 m3
- Residual fuel oil, combusted in industrial boiler [RNA]: 0.00087 l
- Gasoline, combusted in equipment [RNA]: 0.000836 l
- Electricity, AC, 120 V: 0.13932 MJ; provider Electricity; at user; consumption mix - US - US

## Inputs from nature
- Coal, bituminous [resource, ground]: 27.248 MJ
  This input of coal from nature in MJ represents the higher heating value (HHV) of 1 kg of output coal.

## Waste to treatment
- Disposal, solid waste, unspecified, to underground deposit: 0.235 kg
  Produced from froth floatation, primary cleaning, sinking mine shaft, treating runoff

## Emissions to nature
- Iron [emission, water]: 8.64e-6 kg
  Acid mine drainage
- Particulate matter [emission, air]: 0.00163 kg
  A portion from mining and processing; some from cleaning
- Volatile organic compounds [emission, air]: 2.57e-5 kg
  From cleaning
- Methane [emission, air]: 0.00399 kg
  A portion from mining and processing; some released prior to combustion (funciton of mining technology underground vs. surface)
- Suspended solids, inorganic [emission, water]: 0.0001 kg
  Acid mine drainage
- Manganese [emission, water]: 5.76e-6 kg
  Acid mine drainage

## Inventory method
An attributional LCI method was used to develop the dataset.

## Modelling constants
It is unknown if this process was adapted from another process.

## Completeness
TREATMENT OF MISSING ENVIRONMENTAL DATA

Elementary flows are cut-off at less than unknown based on unknown.

TREATMENT OF MISSING TECHNOSPHERE FLOWS

Technosphere flows are cut-off at less than unknown based on unknown. Missing technosphere flows include unknown.

MASS BALANCE

The mass imbalance for this unit process is unknown.

## Data selection
Data was selected from multiple sources identified in the description of the flows on the Inputs/Outputs tab.

## Data treatment
Data treatment is unknown.

## Data collection
All secondary data were collected from 1991-2002. Data were collected from various literature.

## Sampling procedure
BOUNDARY CONDITIONS

The system boundary includes: anthracite coal extraction and processing. This system boundary excludes unknown.

DATA COLLECTION

For material inputs, data collection was based on unknown. For other inputs, data collection was based on unknown.

UNCERTAINTY ESTIMATION

Uncertainty was estimated based on unknown.

## Intended application
The intended application for this process is for accounting purposes as described in Goal Situation C1 from the ILCD Handbook's Detailed Guidance. LCA studies with this intended application offer "purely descriptive documentation of the system under analysis (e.g., a product, sector or country), without being interested in any potential consequences on other parts of the economy.” The studies categorized under Goal Situation C1 do NOT consider existing benefits outside the analyzed system such as recycling. The target audience of this dataset is LCA practitioners, industry, the general public, and policymakers. This model was originally built for an LCA and was originally developed and analyzed with an unknown impact assessment method. The completeness of elementary flows is unknown and it is unknown if this is an update to a previous USLCI dataset.

## Project
This project was funded by unknown under an unknown grant/contract.

## Review 
Evaluation of this dataset is unknown.

## Sources
- U.S. EPA
- unspecified
- Franklin Associates (2003) Bituminous Coal Production
- U.S. Census bureau
- U.S. EPA
