# Winter wheat straw, carted

Dataset: openLCA process, unit process
Category: 11: Agriculture, Forestry, Fishing and Hunting/1151: Support Activities for Crop Production
Geography: Northern America
Time period: 2007-12-31 to 2099-12-31
Allocation method: no allocation
Generated by: Daniel Inman
Published in: Hsu, D.
isCopyrightProtected: false
restrictionsDescription: All information can be accessed by everybody.

## General comment
_30x30 Work

## Technology
modern

## Geography
North America

## Time period
2008

## Reference product
- Winter wheat straw, carted [RNA]: 476 kg; = 0.476*1000

## Inputs from technosphere
- Baling: 3420 m2; = 0.342*10000
  hectares of corn stover calculated based on mass ratio, then scaled by the amount of stover (0.46) per mass of corn grain. Impact of baling is slightly overstated because it involves tractor--INL design report has baler behind the harvester.
- Transport, tractor and trailer: 0.38835 t*km
  1.12 is for conversion to short ton
- Winter wheat straw, production [RNA]: 357 kg; provider Winter wheat straw, production, average, US, 2022
- Transport, combination truck, diesel powered [RNA]: 7.8546 t*km
  1.12 is for conversion to short ton

## Sources
- Hess, J.
- Hsu, D.
