# Gasoline, combusted in equipment, at pulp and paper mill (EXCL.)

Dataset: openLCA process, unit process
Category: 31-33: Manufacturing/3221: Pulp, Paper, and Paperboard Mills
Geography: Northern America
Time period: 1995-12-31 to 2002-12-31
Allocation method: no allocation
Generated by: Caroline Gaudreault
Published in: Franklin Associates (2003) Gasoline Equipment Combustion
isCopyrightProtected: false
restrictionsDescription: All information can be accessed by everybody.

## General comment
This process was built to be used within the processes named "Fuels burned at bleached kraft market pulp mill", "Fuels burned at uncoated freesheet paper mill", "Fuels burned at coated freesheet paper mill", "Fuels burned at uncoated mechanical paper mill", "Fuels burned at coated mechanical paper mill" and "Fuels burned at bag and sack paper mill". It was built from the process named "Gasoline, combusted in equipment" v.1.6 available in the US LCI database. Transport and waste processes were removed. The following emissions to air were excluded (excl.): Sulfur oxidesand Nitrogen oxides.

## Technology
Gasoline combustion in equipment such as mobile refrigeration units, generators, pumps, and portable well-drilling equipment.

## Geography
United States

## Reference product
- Gasoline, combusted in equipment, at pulp and paper mill (EXCL.) [RNA]: 1 l

## Inputs from technosphere
- Gasoline, at refinery: 1 l; provider Petroleum refining, at refinery

## Emissions to nature
- Particulate matter, > 2.5μm and ≤ 10μm [emission, air]: 0.00026521 kg
- Acrolein [emission, air]: 1.3855e-6 kg
- Xylene [emission, air]: 4.2688e-6 kg
- Carbon dioxide [emission, air]: 2.085 kg
- Propylene [emission, air]: 3.8644e-5 kg
- Polycyclic aromatic hydrocarbons [emission, air]: 2.5164e-6 kg
- Volatile organic compounds [emission, air]: 0.0028351 kg
- Benzene [emission, air]: 1.3975e-5 kg
- Acetaldehyde [emission, air]: 1.1488e-5 kg
- 1,3-Butadiene [emission, air]: 5.8565e-7 kg
- Formaldehyde [emission, air]: 1.7674e-5 kg
- Methane [emission, air]: 0.00092063 kg
- Toluene [emission, air]: 6.1261e-6 kg
- Nitrous oxide [emission, air]: 6.0969e-5 kg
- Carbon monoxide [emission, air]: 0.13535 kg

## Sources
- Center for Transportation Research, Argo
- AF&PA (2010). Printing & Writing Papers LCA
- Franklin Associates (2003) Gasoline Equipment Combustion
