# Ammonia, steam reforming, liquid, at plant

Dataset: openLCA process, unit process
Category: 31-33: Manufacturing/3253: Pesticide, Fertilizer, and Other Agricultural Chemical Manufacturing
Geography: Northern America
Time period: 1972-12-31 to 2002-12-31
Allocation method: no allocation
Generated by: Franklin Associates, A Division of ERG
Published in: THE PLASTICS DIVISION OF THE AMERICAN C
isCopyrightProtected: false
restrictionsDescription: All information can be accessed by everybody.

## General comment
Mass imbalance is due to unavailability of the weight of water inputs to production. Complete inventory data and metadata are available in full in the final report and appendices, Cradle-to-Gate Life Cycle Inventory of Nine Plastic Resins and Four Polyurethane Precursors. This report has been extensively reviewed within Franklin Associates and has undergone partial critical review by ACC Plastics Division members and is available at: www.americanchemistry.com. Quantities may vary slightly between the reference to main source and and this module due to rounding. Important note: although most of the data in the US LCI database has undergone some sort of review, the database as a whole has not yet undergone a formal validation process. Please email comments to lci@nrel.gov.

## Technology
Steam reforming of natural gas

## Geography
US

## Reference product
- Ammonia, steam reforming, liquid, at plant: 1 kg
  Mass imbalance is due to unavailability of the weight of water inputs to production.

## Inputs from technosphere
- Natural gas, production mixture, to material use: 0.267 kg; provider Natural gas, processed, for material use, at plant
  MATERIAL USE
- Natural gas, combusted in industrial boiler [RNA]: 0.13977 m3
- Electricity, AC, 120 V: 0.503964 MJ; provider Electricity; at user; consumption mix - US - US
- Transport, pipeline, natural gas [RNA]: 0.42944 t*km
- Transport, combination truck, diesel powered [RNA]: 0.0042944 t*km
- Transport, train, diesel powered [RNA]: 0.0042944 t*km

## Inputs from nature
- Water [resource, water]: 1.5255 kg
  Consumptive use includes: water incorporated into the product, water evaporated during the process, and/or water used and released to a body other than that from which it was drawn.
- Nitrogen [resource, air, subterranean]: 0.418 kg

## Waste to treatment
- Disposal, solid waste, unspecified, to sanitary landfill: 0.0002 kg

## Emissions to nature
- Carbon dioxide [emission, air]: 0.097 kg
- Ammonia [emission, water]: 6e-5 kg
- Ammonia [emission, air]: 0.001 kg
- Biological Oxygen Demand [emission, water]: 5e-5 kg
- Chemical Oxygen Demand [emission, water]: 0.00023 kg
- Organic compounds [emission, air]: 0.001 kg
- Suspended solids, inorganic [emission, water]: 5e-5 kg
- Total oil and grease, less total petroleum hydrocarbons (TPH) [emission, water]: 5e-5 kg

## Sampling procedure
Data are from secondary sources.

## Sources
- THE PLASTICS DIVISION OF THE AMERICAN C
