# Wood waste, unspecified, combusted in industrial boiler

Dataset: openLCA process, unit process
Category: 22: Utilities/2213: Water, Sewage and Other Systems
Geography: Northern America
Allocation method: no allocation
Generated by: Franklin Associates, A Division of ERG
Published in: Franklin Associates (2004) Wood Combustion
isCopyrightProtected: false
restrictionsDescription: All information can be accessed by everybody.

## General comment
Converted previous version from the assumption of 50% MC green basis; 100% MC od basis to OD basis to align with CORRIM calculations. Important note: although most of the data in the US LCI database has
undergone some sort of review, the database as a whole has not yet
undergone a formal validation process.
Please email comments to lci@nrel.gov.

## Technology
Typical

## Geography
US

## Reference product
- Wood waste, unspecified, combusted in industrial boiler [RNA]: 1 kg

## Inputs from technosphere
- Wood fuel, unspecified [RNA]: 1 kg; lognormal geomSd 1

## Waste to treatment
- Disposal, solid waste, unspecified, to unspecified treatment: 0.0882 kg; lognormal geomSd 1

## Emissions to nature
All rows: lognormal geomSd 1
- Sulfur oxides [emission, air]: 0.000225 kg
- Beryllium [emission, air]: 9.9e-9 kg
- Total Organic Carbon [emission, air]: 3.681e-5 kg
- Phenols [emission, air]: 4.59e-7 kg
- Particulate matter, ≤ 10μm [emission, air]: 0.0045 kg
- Nitrogen oxides [emission, air]: 0.00198, 0.000117 kg (2 entries)
- Metals [emission, air]: 0.00038494 kg
- Chlorine [emission, air]: 7.11e-6 kg
- Formaldehyde [emission, air]: 3.96e-5 kg
- Carbon dioxide [emission, air]: 1.755 kg
- Acrolein [emission, air]: 3.6e-5 kg
- Antimony [emission, air]: 7.11e-8 kg
- Lead [emission, air]: 4.32e-7 kg
- Manganese [emission, air]: 1.44e-5 kg
- Chromium [emission, air]: 1.89e-7 kg
- Hydrochloric acid [emission, air]: 0.000171 kg
- Carbon monoxide [emission, air]: 0.0054 kg
- Cadmium [emission, air]: 3.69e-8 kg
- Biological Oxygen Demand [emission, water]: 0.0175 kg
- 2,3,7,8-Tetrachlorodibenzo-p-dioxin [emission, air]: 1.50298e-8 kg
- Methylene chloride [emission, air]: 2.61e-6 kg
- Naphthalene [emission, air]: 8.73e-7 kg
- Carbon tetrachloride [emission, air]: 4.05e-7 kg
- Benzene [emission, air]: 3.78e-5 kg
- Methane [emission, air]: 0.000189 kg
- Selenium [emission, air]: 2.52e-8 kg
- Arsenic [emission, air]: 1.98e-7 kg
- Acetaldehyde [emission, air]: 7.47e-6 kg
- Mercury [emission, air]: 3.15e-8 kg
- Cobalt [emission, air]: 5.85e-8 kg
- Nickel [emission, air]: 2.97e-7 kg

## Sources
- Kaminski, Paul
- Combustion Engineering Inc.
- U.S. DoE
- Argonne National Laboratory
- Sassenrath, Charles P
- Franklin Associates (2004) Wood Combustion
- U.S. EPA
