# Aniline; at plant

Dataset: openLCA process, unit process
Category: 31-33: Manufacturing/3251: Basic Chemical Manufacturing
Geography: Northern America
Time period: 2015-01-01 to 2016-12-31
Allocation method: physical allocation
Data quality: US EPA - Process Pedigree Matrix (4;1)
Generated by: Franklin Associates, A Division of ERG
Owner: American Chemistry Council
Published in: American Chemistry Council, 2022, MDI
isCopyrightProtected: false
restrictionsDescription: These U.S. LCI Database Project data ("Data") are provided by the National Renewable Energy Laboratory ("NREL"), operated by the Alliance for Sustainable Energy, LLC ("Alliance") for the US Department of Energy ("DOE") under Contract No. DE-AC36-08GO28308. The United States Government (the "Government") retains and the user acknowledges that the Government retains a non-exclusive, paid-up, irrevocable, worldwide license to publish or reproduce the published form of these data, or allow others to do so, for Government purposes.
Access to and use of these Data shall impose the following obligations on the user, as set forth in this Agreement. The user is granted the right, without any fee or cost, to use, copy, modify, alter, enhance and distribute these Data for any purpose whatsoever, provided that this entire notice appears in all copies of the Data. Any modification, alteration or enhancement of these data shall be identified and documented by the user. Further, the user agrees to credit the DOE/NREL/Alliance in any publication that results from the use of these Data. The names DOE/NREL/Alliance, however, may not be used in any advertising or publicity to endorse or promote any products or commercial entities unless specific written permission is obtained from DOE/NREL/Alliance. The user also understands that DOE/NREL/Alliance is not obligated to provide the user with any support, consulting, training or assistance of any kind with regard to the use of these Data or to provide the user with any updates, revisions or new versions of these Data.
YOU AGREE TO INDEMNIFY THE GOVERNMENT AND DOE/NREL/ALLIANCE, AND ITS SUBSIDIARIES, AFFILIATES, OFFICERS, AGENTS, AND EMPLOYEES AGAINST ANY CLAIM OR DEMAND, INCLUDING REASONABLE ATTORNEYS' FEES, RELATED TO YOUR USE OF THESE DATA. THESE DATA ARE PROVIDED BY DOE/NREL/ALLIANCE "AS IS" AND ANY EXPRESS OR IMPLIED WARRANTIES, INCLUDING BUT NOT LIMITED TO, THE IMPLIED WARRANTIES OF MERCHANTABILITY AND FITNESS FOR A PARTICULAR PURPOSE ARE DISCLAIMED. IN NO EVENT SHALL THE GOVERNMENT OR DOE/NREL/ALLIANCE BE LIABLE FOR ANY SPECIAL, INDIRECT OR CONSEQUENTIAL DAMAGES OR ANY DAMAGES WHATSOEVER, INCLUDING BUT NOT LIMITED TO CLAIMS ASSOCIATED WITH THE LOSS OF DATA OR PROFITS, WHICH MAY RESULT FROM AN ACTION IN CONTRACT, NEGLIGENCE OR OTHER TORTIOUS CLAIM THAT ARISES OUT OF OR IN CONNECTION WITH THE ACCESS, USE OR PERFORMANCE OF THESE DATA.

## General comment
The functional unit for this model is one kilogram of aniline. This aniline dataset includes nitrobenzene production and has been aggregated with incoming nitric acid LCI data. The technical scope includes the gate-to-gate production of nitric acid, nitrobenzene, and aniline. The system boundary includes incoming transport, manufacturing, and disposal of process wastes. The aniline dataset represented in this model includes data for nitric acid to conceal the confidential data of a provider company. Steam/heat is produced as a coproduct during this process, so system expansion is used for this recovered energy, which is shown as natural gas as an avoided product. Aniline is formed by the hydrogenation of nitrobenzene in the presence of a copper-chromium or copper-silica catalyst. The aniline producers who provided data for this module verified that the characteristics of their plants are representative of a majority of North American aniline production. The captured aniline production amount is approximately 71 percent of the aniline production in the U.S. in 2015.

## Technology
The overall production technology is similar among all aniline plants that submitted data for this analysis. Aniline is formed by the hydrogenation of nitrobenzene in the presence of a copper-chromium or copper-silica catalyst. For hydrogenation of nitrobenzene, preheated hydrogen and nitrobenzene are fed into an evaporator, and aniline is formed by vapor phase catalytic reduction. The aniline is dehydrated to remove the water produced during the reaction. Pure aniline (99.95 wt. %) is obtained after a purification step in which the dehydrated aniline goes through a distillation process.

## Geography
This unit process is representative of average aniline production in North America. Production data were collected from 2 leading producers in the United States and aggregated using horizontal averaging. Incoming materials were modeled using North American databases such as the U.S. LCI database, ecoinvent (adapted to US conditions), and Franklin Associates’ private database. The energy and emissions data for nitric acid production is from a primary European source from 1990 and was adapted to North American conditions.

## Time period
This unit process is representative of aniline production from 2015-2016. Secondary data supporting the modeling are from 1990 and were adapted to represent updated nitric acid production. For the nitrobenzene/aniline primary data, companies were requested to provide data for the year 2015, the most recent full year of aniline production prior to the project initiation date. Data for the production of nitrobenzene/aniline were provided by two leading production plants in North America. Nitric acid data was included to keep the data confidential. Companies providing data were given the option to collect data from the year preceding or following 2015 if either year would reflect more typical production conditions. One company provided data for the year 2015, and one company provided data for the year 2016. After reviewing individual company data in comparison to the average, each manufacturer verified data from 2015-2016 was representative of an average year for aniline production at their company.

## Reference product
- Aniline, at plant [RNA]: 1 kg

## Avoided products
- Natural gas, combusted in industrial boiler [RNA]: 0.144 m3

## Inputs from technosphere
- Transport, pipeline, unspecified petroleum products: 0.002 t*km
- Benzene, at plant [RNA]: 0.848 kg
- Natural gas, combusted in industrial boiler [RNA]: 0.0312 m3
- Electricity, at cogen, for natural gas turbine [US]: 0.057 kWh
  Electricity from cogeneration
- Ammonia, steam reforming, liquid, at plant: 0.203 kg
- Electricity, AC, 120 V: 0.5004 MJ; provider Electricity; at user; consumption mix - US - US
- Sodium hydroxide; chlor-alkali electrolysis; at plant: 0.01 kg; provider Chlorine; chlor-alkali electrolysis; at plant
- Hydrogen, at plant: 0.067 kg; provider Hydrogen, liquid, synthesis gas, at plant
- Transport, combination truck, diesel powered: 0.00032 t*km
- Transport, pipeline, natural gas [RNA]: 0.0032 t*km

## Inputs from nature
- Water, fresh [resource, water, fresh water body]: 0.0018 m3

## Waste to treatment
- Recycling, solid waste, to recycling or reuse: 1e-5 kg
- Disposal, solid waste, process, to sanitary landfill: 1e-6 kg
- Disposal, hazardous waste, to incineration without energy recovery: 0.001 kg

## Emissions to nature
- Lead [emission, air]: 1e-9 kg
  This data was reported by fewer than three companies. To indicate known emissions while protecting the confidentiality of individual company responses, the emission is reported only by order of magnitude.
- Nitrate [emission, water]: 0.0001 kg
  (same comment as for Lead)
- Sulfuric acid [emission, air]: 1e-9 kg
  (same comment as for Lead)
- Mercury [emission, air]: 1e-9 kg
  (same comment as for Lead)
- Carbon monoxide [emission, air]: 1e-5 kg
  (same comment as for Lead)
- Nitrous oxide [emission, air]: 0.00032 kg
- Sulfur oxides [emission, air]: 1e-7 kg
  (same comment as for Lead)
- Methane [emission, air]: 1e-7 kg
  (same comment as for Lead)
- Chlorine [emission, air]: 1e-8 kg
  (same comment as for Lead)
- Organic compounds [emission, air]: 1e-6 kg
  (same comment as for Lead)
- Particulate matter, ≤ 2.5μm [emission, air]: 1e-5 kg
  (same comment as for Lead)
- Hydrochloric acid [emission, air]: 1e-8 kg
  (same comment as for Lead)
- Biological Oxygen Demand [emission, water]: 1e-6 kg
  (same comment as for Lead)
- Aniline [emission, water]: 0.0001 kg
  (same comment as for Lead)
- Suspended solids, inorganic [emission, water]: 1e-5 kg
  (same comment as for Lead)
- Total Organic Carbon [emission, water]: 1e-6 kg
  (same comment as for Lead)
- Carbon dioxide [emission, air]: 0.01 kg
  (same comment as for Lead)
- Volatile organic compounds [emission, air]: 1e-5 kg
  (same comment as for Lead)
- Nitrobenzene [emission, water]: 0.0001 kg
  (same comment as for Lead)
- Nitrogen oxides [emission, air]: 0.0014 kg
- HCFC-22 [emission, air]: 1e-8 kg
  (same comment as for Lead)
- Nitrate compounds [emission, water]: 0.001 kg
  (same comment as for Lead)
- Ammonia [emission, air]: 1e-6 kg
  (same comment as for Lead)

## Inventory method
Attributional and gate to gate process. Developed with the intention to be compatible with TRACI.

## Modelling constants
Primary data were used to model the production of nitrobenzene/aniline. Nitric acid data were collected from a European source from 1990. All data received were carefully evaluated before compiling the production-weighted average data sets used to generate results. Secondary supporting background data were drawn from credible, widely used databases including the US LCI database, GREET, and Ecoinvent.

## Completeness
Treatment of Missing Environmental Data: Elementary and technosphere flows are cut-off at less than 1% based on environmental relevance.

Treatment of Missing Technosphere Data: Miscellaneous materials and additives, capital equipment, facilities and infrastructure, and support personnel requirements not included in this unit process. No gaps have been identified in this dataset.

Mass Balance: The mass balance for each individual plant was calculated.

## Data selection
All nitrobenzene/aniline production data were sourced from primary producers. Primary data were used for nitric acid production from a 1990 European source and adapted for North American production. Data evaluation procedures and criteria were applied consistently to all primary data provided by the participating producers for all data collected. All primary data obtained specifically for this study were considered the most representative available for the systems studied. Data were reviewed for completeness and material balances, and follow-up was conducted as needed to resolve any questions about the input and output flows, process technology, etc. The aggregated averaged datasets were also reviewed by the providing companies as compared to the provided dataset. Companies were requested to review whether their data were complete and to comment about their data and the average dataset as needed. The nitric acid data was collected in the 1990s and was compared to similar European data (from a 1997 secondary source). One potential data gap is the release of nitrous oxide from nitric acid production. No data was provided on the release of nitrous oxide in the private data from 1990s; whereas the 1997 secondary source includes an amount of nitrous oxide. Nitrous oxide may affect some impact categories, including global warming potential.

## Data treatment
A horizontal weighted average was calculated from the data collected to develop this LCA model. The average aniline datasets were reviewed and accepted respectively by each data provider. To indicate known emissions while protecting the confidentiality of individual company responses, some emissions are reported only by the order of magnitude of the average.

## Data collection
Nitrobenzene/aniline data were collected from 2015-2016. Nitric acid data was collected in the 1990s.

## Sampling procedure
Boundary Conditions: The system boundary includes aniline production which is aggregated with nitrobenzene and nitric acid, and includes incoming transportation and upstream burdens for each material as well as process waste management. The following are excluded from the system boundary: miscellaneous materials and additives, capital equipment, facilities and infrastructure, and support personnel requirements.

Data Collection: Data were collected from aniline manufacturers.

Uncertainty Estimation: Uncertainty was not calculated.

## Intended application
Situation C1 - Accounting, with system-external interactions - The intended application is a purely descriptive accounting / documentation of the analysed system including existing interactions with other systems in the LCI model. These data are an update to a previously published dataset which is a generic unit process model. A full inventory of environmental flows are included; thus this unit process can be used for a full range of LCIA impact categories. The target audience of this model includes LCA practitioners, industry, and the general public. For use as an average dataset accepted by the North American plastics/chemical industry. An inventory of environmental emission flows are included to the extent that the producers provided; thus this unit process can be used for a full range of LCIA impact categories. The original study results were analyzed using the TRACI LCIA factors.

## Project
This project was funded by and submitted to the American Chemistry Council. These data are an update to a previously published dataset which is a generic unit process data; Cradle-to-Gate Life Cycle Analysis of Methylene Diisocyanurate (MDI). Submitted to the American Chemistry Council (ACC). 2022.

## Review 
The data providers reviewed their data and the average. ACC members reviewed the associated final report. Internal ERG review of data entry proofreading, and data documentation was also carried out.

## Sources
- American Chemistry Council, 2022, MDI
