# Spring wheat straw, ground and stored, 2022

Dataset: openLCA process, unit process
Category: 11: Agriculture, Forestry, Fishing and Hunting/1151: Support Activities for Crop Production
Geography: Northern America
Time period: 2007-12-31 to 2021-12-31
Allocation method: no allocation
Generated by: Daniel Inman
Published in: Hsu, D.
isCopyrightProtected: false
restrictionsDescription: All information can be accessed by everybody.

## General comment
1 metric ton of wheat straw, dried to 12%
moisture.

## Technology
future

## Geography
North America

## Time period
2022

## Reference product
- Spring wheat straw, ground and stored [RNA]: 1000 kg; = 1.0*1000

## Inputs from technosphere
- Conveyor belt, at plant: 3.47472e-5 m
- Dried roughage store, non ventilated: 1.17232e-7 m3
  30 year lifetime for storage from INL feedstock design report.
- Agricultural machinery, general, production: 0.9 kg
- Electricity, AC, 120 V: 61.289 MJ; provider Electricity; at user; consumption mix - US - US
  proxy: Electricity, medium voltage, at grid/US with US electricity. Electricity needed for dust collection.
- Spring wheat straw, carted [RNA]: 1330 kg; = 1.33*1000; provider Spring wheat straw, carted, 2022
- Corn wet mill, gluten drying, AP-42 [RNA]: 33.3 kg
- Fodder loading, by self-loading trailer: 2.77505 m3
- Electricity, AC, 120 V: 3.25506 MJ; provider Electricity; at user; consumption mix - US - US
  proxy: Electricity, medium voltage, at grid/US with US electricity. Electricity needed for twine removal.
- Loading bales: 1.43 Item(s)
  loading bales for grinder. Calculation of number of bales comes from 2000 lbs of corn stover divided by weight per bale. Trailer volume is 2511 ft^3 (INL table 4-5), density is 12 lbs/ft^3 dry (=20 wet at 40% moisture).
- Electricity, AC, 120 V: 53.6645 MJ; provider Electricity; at user; consumption mix - US - US
  proxy: Electricity, medium voltage, at grid/US with US electricity. Electricity needs for pelletization.
- Grinding [RNA]: 970.034 kg; = 0.97003389*1000

## Emissions to nature
- Water [emission, air, troposphere, rural]: 333 kg
  water dried per ton of final moisture corn stover. drying from 34% moisture to 12% moisture.

## Sources
- Hess, J.
- Hsu, D.
