# Polyvinyl chloride resin, suspension grade PVC; at plant

Dataset: openLCA process, unit process
Category: 31-33: Manufacturing/3252: Resin, Synthetic Rubber, and Artificial and Synthetic Fibers and Filaments Manufacturing
Geography: United States
Time period: 2022-01-01 to 2022-12-31
Allocation method: no allocation
Data quality: US EPA - Process Pedigree Matrix (3;1)
Generated by: Sustainable Solutions Corporation
Owner: Vinyl Institute
Published in: Sustainable Solutions Corporation (2024) Suspension Grade PVC Resin Life Cycle Assessment
isCopyrightProtected: false
restrictionsDescription: These U.S. LCI Database Project data ("Data") are provided by the National Renewable Energy Laboratory ("NREL"), operated by the Alliance for Sustainable Energy, LLC ("Alliance") for the US Department of Energy ("DOE") under Contract No. DE-AC36-08GO28308. The United States Government (the "Government") retains and the user acknowledges that the Government retains a non-exclusive, paid-up, irrevocable, worldwide license to publish or reproduce the published form of these data, or allow others to do so, for Government purposes.
Access to and use of these Data shall impose the following obligations on the user, as set forth in this Agreement. The user is granted the right, without any fee or cost, to use, copy, modify, alter, enhance and distribute these Data for any purpose whatsoever, provided that this entire notice appears in all copies of the Data. Any modification, alteration or enhancement of these data shall be identified and documented by the user. Further, the user agrees to credit the DOE/NREL/Alliance in any publication that results from the use of these Data. The names DOE/NREL/Alliance, however, may not be used in any advertising or publicity to endorse or promote any products or commercial entities unless specific written permission is obtained from DOE/NREL/Alliance. The user also understands that DOE/NREL/Alliance is not obligated to provide the user with any support, consulting, training or assistance of any kind with regard to the use of these Data or to provide the user with any updates, revisions or new versions of these Data.
YOU AGREE TO INDEMNIFY THE GOVERNMENT AND DOE/NREL/ALLIANCE, AND ITS SUBSIDIARIES, AFFILIATES, OFFICERS, AGENTS, AND EMPLOYEES AGAINST ANY CLAIM OR DEMAND, INCLUDING REASONABLE ATTORNEYS' FEES, RELATED TO YOUR USE OF THESE DATA. THESE DATA ARE PROVIDED BY DOE/NREL/ALLIANCE "AS IS" AND ANY EXPRESS OR IMPLIED WARRANTIES, INCLUDING BUT NOT LIMITED TO, THE IMPLIED WARRANTIES OF MERCHANTABILITY AND FITNESS FOR A PARTICULAR PURPOSE ARE DISCLAIMED. IN NO EVENT SHALL THE GOVERNMENT OR DOE/NREL/ALLIANCE BE LIABLE FOR ANY SPECIAL, INDIRECT OR CONSEQUENTIAL DAMAGES OR ANY DAMAGES WHATSOEVER, INCLUDING BUT NOT LIMITED TO CLAIMS ASSOCIATED WITH THE LOSS OF DATA OR PROFITS, WHICH MAY RESULT FROM AN ACTION IN CONTRACT, NEGLIGENCE OR OTHER TORTIOUS CLAIM THAT ARISES OUT OF OR IN CONNECTION WITH THE ACCESS, USE OR PERFORMANCE OF THESE DATA.

## General comment
This unit process represents the production of 1 kg of suspension grade PVC resin (S-PVC). This process represents all S-PVC produced in the United States. The studied system includes all processes involved in the PVC production process, including incoming transport.

## Technology
This process represents production of suspension grade PVC resin in the United States. Two main processes are used to polymerize VCM and produce PVC: suspension and dispersion. Most PVC produced in North America is through suspension polymerization, and so it is the polymerization method considered within the scope of this study. Processing for dispersion grade resin is not considered. In the suspension process, the VCM is fed into a reactor with water and suspension agents to suspend droplets of VCM. An initiator is then fed into the reactor to facilitate the polymerization of VCM to PVC. The PVC, which is formed suspended in water, then undergoes a drying process in order to obtain the S-PVC resin.

## Geography
This data represents ten manufacturing sites located in Texas, Louisiana, New Jersey, and New York.

## Time period
This data represents operations for the 2022 calendar year.

## Reference product
- Polyvinyl chloride resin, suspension grade PVC; at plant [RNA]: 1 kg

## Inputs from technosphere
- Electricity, AC, 120 V: 0.0232687 MJ; provider Electricity; at user; consumption mix - PJM - FERC
- Polyvinyl Acetate: 0.000337 kg
- Transport, combination truck, average fuel mix: 0.0533 t*km
- Hydrogen peroxide, at plant: 0.000275 kg
- Sodium hydroxide; chlor-alkali electrolysis; at plant: 0.002388 kg; = 2.24E-3+1.48E-4; provider Chlorine; chlor-alkali electrolysis; at plant
  From CoGen
- Natural gas, combusted in industrial boiler [RNA]: 0.03249 m3; = 2.71E-2+5.39E-03
- Transport, train, diesel powered: 0.315 t*km
- Ethylene dichloride-vinyl chloride, EDC-VCM, monomer; at plant [RNA]: 1 kg; provider Ethylene dichloride-vinyl chloride monomer, EDC-VCM; at plant
- Sodium hydroxide; chlor-alkali electrolysis; at plant: 0.000973 kg; provider Chlorine; chlor-alkali electrolysis; at plant
- Transport, single unit truck, diesel powered: 1.94e-5 t*km
- Natural gas, combusted in industrial boiler [RNA]: 0.0329 m3
  From CoGen
- Transport, barge, average fuel mix: 0.00248 t*km
- Electricity, AC, 120 V: 0.372299 MJ; provider Electricity; at user; consumption mix - Electric Reliability Council of Texas, Inc. - BA
- Propylene, at plant [RNA]: 1.06e-7 kg; provider Propylene, materials production, organic compound, at plant, kg
- Electricity, AC, 120 V: 0.00581717 MJ; provider Electricity; at user; consumption mix - New York Independent System Operator - BA
- Electricity, AC, 120 V: 0.180332 MJ; provider Electricity; at user; consumption mix - MISO - FERC
- Transport, ocean freighter, average fuel mix: 9.38e-5 t*km
- Sulfuric acid, at plant [RNA]: 0.002928 kg; = 2.48E-3+4.48E-4
  From CoGen

## Inputs from nature
- Water [resource, water]: 6.13884 kg; = 3.46E0+8.84E-03+2.67E0
- Nitrogen [resource, air]: 0.00601 kg

## Waste to treatment
- Disposal, solid waste, process, to sanitary landfill: 0.003212 kg; = 3.08E-3+1.32E-04
- Wastewater treatment level 1; Conventional plug flow activated sludge aggregate, solids reduction; at plant: 0.0053 m3; = 5.3/1000; provider Wastewater treatment; Conventional plug flow activated sludge, Level 1; at plant
- Disposal, solid waste to incineration without energy recovery: 1.02e-6 kg

## Emissions to nature
- Sulfur oxides [emission, air]: 2.74e-7 kg
- 1,1,2,2-Tetrachloroethane [emission, air]: 4.46e-8 kg
- Sulfuric acid [emission, air]: 5.18e-10 kg
- Vinyl chloride [emission, air]: 9.24e-6 kg
- Volatile organic compounds [emission, air]: 2.75e-5 kg
- Propylene glycol [emission, air]: 1.17e-8 kg
- 1,1,2-Trichloroethane [emission, air]: 9.19e-9 kg
- Acetaldehyde [emission, air]: 1.8e-6 kg
- Volatile organic compounds [emission, air]: 1.54e-9 kg
  non-methane hydrocarbon
- Hexane [emission, air]: 1.54e-6 kg
- Chloroethane [emission, air]: 7.93e-8, 3.31e-7 kg (2 entries)
- 1,1-Dichloroethylene [emission, air]: 9.27e-7 kg
- Lead [emission, air]: 8.3e-8 kg
- Total suspended solids [emission, water]: 9.26e-5 kg
- Carbon monoxide [emission, air]: 1.1e-5 kg
- Nitrogen oxides [emission, air]: 1e-5 kg
- Chloroform [emission, air]: 3.31e-8 kg
- Carbon tetrachloride [emission, air]: 1.72e-8 kg
- Bis(2-chloroethyl) ether [emission, air]: 6.8e-9 kg
  dichloroethyl ether
- Particulate matter [emission, air]: 0.000569 kg
- Toluene [emission, air]: 3.59e-8 kg
- 1,3-Butadiyne [emission, air]: 6.03e-8 kg
  1,3-butadiene
- Formaldehyde [emission, air]: 4.35e-7 kg
- Ethylbenzene [emission, air]: 2.51e-10 kg
- Ammonia [emission, air]: 1.26e-5 kg
- Particulate matter, ≤ 10μm [emission, air]: 2.35e-5 kg
- Total oil and grease, less total petroleum hydrocarbons (TPH) [emission, water]: 5.86e-10 kg
  Oil and grease
- Acetophenone [emission, air]: 7.57e-7 kg
- Benzene [emission, air]: 1.19e-7 kg
- Copper [emission, water]: 5.38e-8 kg
- 1,2-Dichloroethane [emission, water]: 3.65e-10 kg
- Xylene [emission, air]: 9.22e-10 kg
- Ethylene [emission, air]: 9.52e-7 kg
- Tetrachloroethylene [emission, air]: 9.91e-11 kg
- Biological Oxygen Demand [emission, water]: 7.86e-6 kg
- Chlorine [emission, water]: 3.12e-8 kg
- Particulate matter, ≤ 2.5μm [emission, air]: 3.89e-5 kg
- Total Organic Carbon [emission, water]: 3.87e-6 kg
- Chloromethane [emission, air]: 5.86e-10 kg
  methyl chloride
- Cumene [emission, air]: 1.53e-6 kg
- Hydrochloric acid [emission, air]: 3.58e-6 kg
  hydrochloric acid
- Hexachloroethane [emission, air]: 1.47e-8 kg
- Chlorobenzene [emission, air]: 1.79e-9 kg
- 1,1-Dichloroethane [emission, air]: 6.91e-10 kg
  same as ethylidene dichloride
- Vinyl chloride [emission, water]: 2.01e-8 kg
- 1,2-Dichloropropane [emission, air]: 2.35e-10 kg
- Zinc [emission, water]: 2.89e-8 kg
- Chemical Oxygen Demand [emission, water]: 7.1e-5 kg
- Methanol [emission, air]: 2.71e-6 kg
- Lead [emission, water]: 8.29e-8 kg
- Chloroform [emission, water]: 1.3e-8 kg
- 1,1,1-Trichloroethane [emission, air]: 9e-10 kg
- Propylene [emission, air]: 7.69e-8 kg
  propylene
- Ethylene glycol [emission, air]: 1.64e-7 kg
- 1,3-Dichloropropene [emission, air]: 6.06e-8 kg
  1,3-Dichloropropylene
- Chlorine [emission, air]: 5.07e-6 kg
- Chloroprene [emission, air]: 2.89e-10 kg

## Inventory method
Attributional

## Modelling constants
Data was collected from four manufacturers which represent 100% of the S-PVC resin produced in the US in 2022. A total of ten facilities provided their data for 2022 and the LCI was developed using mass allocation. Data was reviewed and verified by each of the four companies. When a material is not obtainable in the available LCI databases, another chemical which has similar manufacturing and environmental impacts may be used as a proxy to represent the actual chemical. The Proxy Chemical List used in this analysis is provided in the Data Quality tables in Appendix B. The cogeneration process is similar across the S-PVC plants to produce S-PVC resin. The cogeneration process produces 50% electricity and 50% steam. Emissions to water and air were considered within the scope of this study and were accounted for based off of quantities in annual emissions reporting from each company. Data validation was performed through mass balances.

## Completeness
The following cut-off criteria was used throughout the study. Processes whose total contribution to the final result, with respect to their mass and in relation to all considered impact categories, is less than 1% can be neglected. The sum of the neglected processes may not exceed 5% by mass and by 5% of the considered impact categories. Construction of capital equipment, maintenance of operation and support equipment, and human labor and employee commute are all excluded from this life cycle assessment. This assessment is cradle-to-gate and excludes any processes downstream of the manufacturer.
No other known processes within the system boundary were excluded. All data was provided by the manufacturers and reviewed by the manufacturers again after the results had been calculated to ensure completeness. The mass balance for this process was calculated.

## Data treatment
A weighted average was calculated from the primary data collected from the four manufacturers (ten facilities) of S-PVC in the US.

## Sampling procedure
The system boundary is cradle-to-gate and includes the use of raw materials entering the facilities, the transportation to get raw and supporting materials to the manufacturing facilities, and the processing inputs and outputs to produce PVC resin. Construction of capital equipment, maintenance of operation and support equipment, and human labor and employee commute are all excluded from this life cycle assessment. Uncertainty was not calculated.

## Intended application
Situation C1 - Accounting, with system-external interactions - The intended application is a purely descriptive accounting / documentation of the analyzed system including existing interactions with other systems in the LCI model. The target audience of this model includes LCA practitioners, industry, and the general public. A full inventory of environmental flows are included; thus this unit process can be used for a full range of LCIA impact categories. The original study results were analyzed using the TRACI LCIA factors. These data are an update to the previously published dataset from 2021. These data are intended to be used as an average dataset accepted by the North American plastics/chemical industry.

## Project
This process was developed as part of the Vinyl Institute's Suspension Grade PVC Resin Life Cycle Assessment.

## Sources
- Sustainable Solutions Corporation (2024) Suspension Grade PVC Resin Life Cycle Assessment
