# Crude oil, on-shore domestic, at extraction

Dataset: openLCA process, unit process
Category: 21: Mining, Quarrying, and Oil and Gas Extraction/2111: Oil and Gas Extraction
Geography: United States
Time period: 2006-01-01 to 2013-12-31
Allocation method: no allocation
Data quality: US EPA - Process Pedigree Matrix (4;1)
Generated by: Franklin Associates, A Division of ERG
Published in: Franklin Associates (2020). Cradle-to-Gate Life Cycle Analysis of Olefins
isCopyrightProtected: false
restrictionsDescription: These U.S. LCI Database Project data ("Data") are provided by the National Renewable Energy Laboratory ("NREL"), operated by the Alliance for Sustainable Energy, LLC ("Alliance") for the US Department of Energy ("DOE") under Contract No. DE-AC36-08GO28308. The United States Government (the "Government") retains and the user acknowledges that the Government retains a non-exclusive, paid-up, irrevocable, worldwide license to publish or reproduce the published form of these data, or allow others to do so, for Government purposes.
Access to and use of these Data shall impose the following obligations on the user, as set forth in this Agreement. The user is granted the right, without any fee or cost, to use, copy, modify, alter, enhance and distribute these Data for any purpose whatsoever, provided that this entire notice appears in all copies of the Data. Any modification, alteration or enhancement of these data shall be identified and documented by the user. Further, the user agrees to credit the DOE/NREL/Alliance in any publication that results from the use of these Data. The names DOE/NREL/Alliance, however, may not be used in any advertising or publicity to endorse or promote any products or commercial entities unless specific written permission is obtained from DOE/NREL/Alliance. The user also understands that DOE/NREL/Alliance is not obligated to provide the user with any support, consulting, training or assistance of any kind with regard to the use of these Data or to provide the user with any updates, revisions or new versions of these Data.
YOU AGREE TO INDEMNIFY THE GOVERNMENT AND DOE/NREL/ALLIANCE, AND ITS SUBSIDIARIES, AFFILIATES, OFFICERS, AGENTS, AND EMPLOYEES AGAINST ANY CLAIM OR DEMAND, INCLUDING REASONABLE ATTORNEYS' FEES, RELATED TO YOUR USE OF THESE DATA. THESE DATA ARE PROVIDED BY DOE/NREL/ALLIANCE "AS IS" AND ANY EXPRESS OR IMPLIED WARRANTIES, INCLUDING BUT NOT LIMITED TO, THE IMPLIED WARRANTIES OF MERCHANTABILITY AND FITNESS FOR A PARTICULAR PURPOSE ARE DISCLAIMED. IN NO EVENT SHALL THE GOVERNMENT OR DOE/NREL/ALLIANCE BE LIABLE FOR ANY SPECIAL, INDIRECT OR CONSEQUENTIAL DAMAGES OR ANY DAMAGES WHATSOEVER, INCLUDING BUT NOT LIMITED TO CLAIMS ASSOCIATED WITH THE LOSS OF DATA OR PROFITS, WHICH MAY RESULT FROM AN ACTION IN CONTRACT, NEGLIGENCE OR OTHER TORTIOUS CLAIM THAT ARISES OUT OF OR IN CONNECTION WITH THE ACCESS, USE OR PERFORMANCE OF THESE DATA.

## General comment
This cradle-to-gate unit process is for 1 kg of crude oil from domestic, on-shore sources. Crude oil extraction inputs include energy from natural gas, petroleum and other fossil fuels in addition to electricity use. The energy inputs are assumed to be the same for the domestic and imported on-shore and off-shore extraction processes. The energy inputs of this process are taken from GREET model 2017. The emission data for the process is adapted from inventory data compiled by the National Energy Technology Lab.

## Technology
Oil is produced by drilling into porous rock structures generally located several thousand feet underground. Once an oil deposit is located, numerous holes are drilled and lined with steel casing. Some oil is brought to the surface by natural pressure in the rock structure, although most oil requires energy to drive pumps that lift oil to the surface. Once oil is on the surface, it is separated from water and stored in tanks before being transported to a refinery. In some cases, it is immediately transferred to a pipeline that transports the oil to a larger terminal.

## Geography
This process is representative of U.S. domestic, on-shore crude oil extraction.

## Time period
This unit process is representative of data collected for crude oil extraction from 2006-2013.

## Reference product
- Crude oil, at extraction: 1 kg

## Inputs from technosphere
- Diesel, combusted in industrial equipment [RNA]: 3.67e-6 l
  Includes diesel fuel and distillate oil amounts.
- Electricity, AC, 120 V: 0.1584 MJ; provider Electricity; at user; consumption mix - US - US
  This electricity value has been updated from the original report inventory due to an error.
- Diesel, combusted in industrial boiler [RNA]: 2.24e-7 l
- Residual fuel oil, combusted in industrial boiler [RNA]: 2.24e-7 l
- Gasoline, combusted in equipment [RNA]: 5.26e-7 l
- Natural gas, combusted in industrial boiler [RNA]: 1.76e-5 m3

## Waste to treatment
- Disposal, solid waste, process, to sanitary landfill: 0.0247 kg

## Emissions to nature
- Benzo[ghi]perylene [emission, air]: 1.66323e-9 kg
- Fluoranthene [emission, air]: 7.42866e-12 kg
- Hydrogen sulfide [emission, air]: 4.26742e-7 kg
- Chlorofluorocarbons [emission, air]: 8.71299e-9 kg
  Proxy for CFC-10
- Naphthalene [emission, air]: 5.39953e-8 kg
- Chromium(III) [emission, air]: 7.34693e-10 kg
- Ammonia [emission, water]: 4.83702e-8 kg
- o-Xylene [emission, air]: 7.84494e-11 kg
- Manganese [emission, water]: 3.4516e-8 kg
- Chloride [emission, water]: 1.56783e-6 kg
- Dibromomethane [emission, air]: 1.04652e-8 kg
  Proxy for Ethane, 1,2-dibromo-
- Diethanolamine [emission, air]: 9.45413e-11 kg
- Particulate matter, ≤ 2.5μm [emission, air]: 1.3498e-5 kg
- Styrene [emission, air]: 1.19208e-8 kg
- Acetophenone [emission, air]: 8.83463e-13 kg
- Cobalt [emission, air]: 4.74603e-12 kg
- Dibenz[a,h]anthracene [emission, air]: 2.10593e-13 kg
- Hydrazine [emission, air]: 3.89308e-18 kg
- Toluene [emission, air]: 1.5105e-5 kg
- Ethylbenzene [emission, water]: 7.60706e-13 kg
- Selenium [emission, air]: 1.72595e-10 kg
- Sulfate [emission, water]: 1.0212e-5 kg
- Cyanamide [emission, air]: 1.26761e-12 kg
- Chromium(IV) [emission, air]: 3.44898e-10 kg
- Particulate matter, > 2.5μm and ≤ 10μm [emission, air]: 3.21901e-7 kg
- Acenaphthene [emission, air]: 9.10594e-12 kg
- Aromatic hydrocarbons [emission, air]: 3.76051e-9 kg
- Chloroethane [emission, air]: 7.95147e-11 kg
- Benz[a]anthracene [emission, air]: 1.66404e-10 kg
- Aromatic hydrocarbons [emission, water]: 1.91598e-7 kg
- 2-Methoxyethanol [emission, air]: 2.33553e-10 kg
- Benzo[e]pyrene [emission, air]: 1.2574e-12 kg
- Ethylbenzene [emission, air]: 1.81374e-6 kg
- Carbonyl sulfide [emission, air]: 1.21716e-7 kg
- Xylene [emission, water]: 6.3926e-12 kg
- Carbon monoxide [emission, air]: 0.000631021 kg
- Radium-226 [emission, water]: 1.4574e-16 kg
- Sulfide [emission, water]: 7.21829e-8 kg
- Xylene [emission, air]: 3.8192e-6 kg
- Dichlorobenzene [emission, air]: 1.74252e-9 kg
  Proxy for Benzene, 1,4-dichloro-
- Lead [emission, air]: 3.88565e-9 kg
- Sulfur dioxide [emission, air]: 8.16642e-5 kg
- Benzo[k]fluoranthene [emission, air]: 1.48607e-13 kg
- 1,2-Dichloropropane [emission, air]: 6.8165e-9 kg
- Volatile organic compounds [emission, air]: 0.00437219 kg
- 2-Ethoxyethanol [emission, air]: 7.07323e-15 kg
- 1,4-Dioxane [emission, air]: 1.01255e-10 kg
- Chloroethane [emission, air]: 4.38752e-9 kg
  Proxy for Ethene, chloro-
- Phenanthrene [emission, air]: 5.21188e-11 kg
- Mercury [emission, water]: 8.27434e-14 kg
- Biphenyl [emission, air]: 9.08743e-9 kg
- Total suspended solids [emission, water]: 6.69372e-6 kg
- 2-Methylnaphthalene [emission, air]: 1.70416e-10 kg
- Anthracene [emission, air]: 2.9926e-12 kg
- Acrolein [emission, air]: 1.82682e-6 kg
- Cadmium [emission, air]: 1.29972e-10 kg
- Mercury [emission, air]: 9.38932e-11 kg
- Acetaldehyde [emission, air]: 2.0671e-6 kg
- Chloromethane [emission, air]: 2.45705e-8 kg
  Proxy for Methane, dichloro-, HCC-30
- Ammonia [emission, air]: 2.65414e-7 kg
- Ethylene oxide [emission, air]: 5.33067e-14 kg
- Benzo(b)fluoranthene [emission, air]: 8.40571e-13 kg
- Indeno[1,2,3-cd]pyrene [emission, air]: 2.02501e-13 kg
- Copper [emission, water]: 5.56516e-11 kg
- 1,2-Butadiene [emission, air]: 3.69784e-7 kg
  Proxy for butadiene
- Manganese [emission, air]: 4.74001e-10 kg
- Chloroform [emission, air]: 7.24581e-9 kg
- Phenol [emission, air]: 4.52746e-9 kg
- Perylene [emission, air]: 1.51728e-14 kg
- 2,2,4-Trimethylpentane [emission, air]: 1.63144e-7 kg
- Dibromomethane [emission, air]: 1.09435e-15 kg
  Proxy for Methane, bromo-, Halon 1001
- Glycol ethers [emission, air]: 2.22514e-11 kg
- m-Xylene [emission, air]: 3.76207e-10 kg
- Chloromethane [emission, air]: 4.1947e-14 kg
- Phosphorus [emission, air]: 8.7405e-10 kg
- Total dissolved solids [emission, water]: 2.69502e-5 kg
- Cresol [emission, air]: 1.22024e-12 kg
- Ethylene glycol [emission, air]: 1.98464e-11 kg
- Hexane [emission, air]: 1.90005e-6 kg
- Chlorobenzene [emission, air]: 8.47454e-9 kg
- Methanol [emission, air]: 1.99335e-6 kg
- Hydrochloric acid [emission, air]: 5.34212e-10 kg
- Formaldehyde [emission, air]: 1.68555e-5 kg
- Carbon dioxide [emission, air]: 0.342716 kg
- 1,1,1-Trichloroethane [emission, air]: 1.25922e-8 kg
- Cumene [emission, air]: 1.50239e-11 kg
- 1,1,2,2-Tetrachloroethane [emission, air]: 1.3543e-8 kg
- Carbon disulfide [emission, air]: 6.43206e-10 kg
- Propylene oxide [emission, air]: 3.19258e-10 kg
- Beryllium [emission, air]: 3.68913e-11 kg
- 1,1-Dichloroethane [emission, air]: 5.93921e-9 kg
- 7,12-Dimethylbenz[a]anthracene [emission, air]: 5.24955e-13 kg
- Methyl isobutyl ketone [emission, air]: 2.47978e-9 kg
- Fluorene [emission, air]: 2.6743e-11 kg
- Pyrene [emission, air]: 7.15862e-12 kg
- 1,1-Dichloroethylene [emission, air]: 1.2369e-12 kg
- 3-Methylcholanthrene [emission, air]: 5.90577e-14 kg
- Tetrachloroethylene [emission, air]: 2.50762e-9 kg
- Chrysene [emission, air]: 4.74886e-12 kg
- Oils, unspecified [emission, water]: 3.33677e-8 kg
- 1,3-Dichloropropene [emission, air]: 6.66029e-9 kg
- Fluoride [emission, water]: 4.2773e-9 kg
- Chlorine [emission, water]: 6.5394e-13 kg
- Bromide [emission, water]: 2.13932e-10 kg
- Methyl tert-butyl ether [emission, air]: 8.37944e-14 kg
- Benzene [emission, air]: 2.39721e-5 kg
- 1,1,2-Trichloroethane [emission, air]: 8.01985e-9 kg
- Nickel [emission, air]: 4.2687e-9 kg
- Chlorine [emission, air]: 1.80894e-10 kg
- Acenaphthylene [emission, air]: 2.73987e-11 kg
- Arsenic [emission, air]: 1.22929e-9 kg
- Trichloroethylene [emission, air]: 4.76174e-11 kg
- Benzo[a]pyrene [emission, air]: 1.59212e-12 kg
- Ethane, 1,2-dichloro-1-fluoro- [emission, air]: 4.68537e-10 kg
- Acrylamide [emission, air]: 3.33693e-14 kg
- Nitrogen oxides [emission, air]: 0.00045122 kg
- Toluene [emission, water]: 5.16479e-12 kg
- Zinc [emission, water]: 1.9031e-11 kg

## Inventory method
Attributional; cradle to gate process. Compatible with TRACI.

## Modelling constants
Secondary data adapted from from GREET and NETL.

## Completeness
TREATMENT OF MISSING ENVIRONMENTAL DATA: Elementary flows are cut-off at less than 1% based on environmental relevance.
TREATMENT OF MISSING TECHNOSPHERE DATA: Miscellaneous materials and additives, capital equipment, facilities and infrastructure, space conditioning, and support personnel requirements are not included in this system process. No gaps have been identified in this dataset.
MASS BALANCE: The mass balance was calculated by a straight comparison of inputs and outputs

## Data selection
Crude oil extraction data adapted from NETL and GREET datasets.

## Data treatment
Emission data for this process is adapted from inventory data compiled by the National Energy Technology Lab. The inventory for crude oil extraction accounts for emissions to air as reported in the NEI for U.S. extraction sites, greenhouse gas emissions from Cooney et. al. 2017, and emissions to water from EPA’s Discharge Monitoring Reports. Emissions data from each U.S. county were allocated between oil extraction and natural gas based on North American Industry Classification System (NAICS) and source classification codes included in the NEI. For cases in which not enough detail was provided from emissions records, emissions were allocated between oil and gas in that county based on the energy content of reported production.

Solid wastes include drilling wastes and associated wastes as calculated from statistics in EPA 2000 and API 2000. Drilling wastes include solids from brine water and drilling mud, while associated wastes are tank bottoms, contaminated soil and scale or sludges from radioactive materials.

No information was found pertaining to fresh water consumption used in onshore or offshore extraction, and so this is not included. Water is extracted with the oil and is called produced water. This produced water is a brine and so not included as consumed water.

## Data collection
Primary data from GREET were collected from 2006-2013.

## Sampling procedure
BOUNDARY CONDITIONS
The system boundary includes incoming fuel use, crude oil extraction, and process waste management. The following are excluded from the unit process boundary: miscellaneous materials and additives, capital equipment, facilities and infrastructure, space conditioning, and support personnel requirements.

DATA COLLECTION
Secondary data were collected from NETL, National Emissions Inventory, GREET 2017, EPA, and Cooney et al. 2017.

UNCERTAINTY ESTIMATION
No uncertainty analysis was carried out due to the lack of uncertainty data or probability distributions for key parameters, which are often only available as single point estimates from NETL.

## Intended application
The intended application for this process is for accounting purposes as described in Goal Situation C1 from the ILCD Handbook's Detailed Guidance. LCA studies with this intended application offer "purely descriptive documentation of the system under analysis (e.g., a product, sector or country), without being interested in any potential consequences on other parts of the economy.” The studies categorized under Goal Situation C1 do consider existing benefits outside the analyzed system such as recycling. A full inventory of environmental flows are included; thus this unit process can be used for a full range of LCIA impact categories. The target audience of this model includes LCA practitioners, industry, and the general public. For use as an average dataset accepted by the North American plastics/chemical industry. An inventory of environmental emission flows are included to the extent that the producers provided; thus this unit process can be used for a full range of LCIA impact categories. The original study results were analyzed using the TRACI LCIA factors.

## Project
This project was funded by and submitted to the American Chemistry Council. These data are a background dataset used in the Cradle-to-Gate Life Cycle Analysis of Olefins report. Submitted to the American Chemistry Council (ACC). 2020.

## Review 
Internal review of data entry proofreading, mass balance verification and data documentation.

## Sources
- Franklin Associates (2020). Cradle-to-Gate Life Cycle Analysis of Olefins
