# Fuels, burned at bleached kraft market pulp mill, average production, at mill

Dataset: openLCA process, unit process
Category: 31-33: Manufacturing/3221: Pulp, Paper, and Paperboard Mills
Geography: Northern America
Time period: 2005-12-31 to 2005-12-31
Allocation method: no allocation
Generated by: Caroline Gaudreault
Published in: AF&PA (2010). Printing & Writing Papers LCA
isCopyrightProtected: false
restrictionsDescription: All information can be accessed by everybody.

## General comment
Bleached kraft market pulp, average North American production, at mill. All flows are production-weighted means. Data were developed for a full LCA that was critically reviewed. Reviewers were: • Martha Stevenson, Chairperson – Private Consultant to the public interest with ten years of experience in sustainability, environmental management, packaging and materials recovery; led the development of the Design Guidelines for Sustainable Packaging and the COMPASS software used to compare the environmental impacts of package designs; • Pascal Lesage – Life cycle assessment consultant, Researcher at École Polytechnique de Montréal [at the Inter-University Research Centre for the Life Cycle of Products, Processes and Services (CIRAIG) in Montreal]; and • Dale Phenicie, Environmental Affairs Consulting – Consultant with 35 years of experience in environmental protection and process consulting for the forest products industry. Has served on several U.S. EPA Task Forces dealing with water quality issues and authored several AF&PA Environmental, Health and Safety/Sustainability reports.

## Technology
current technology mix for kraft pulping

## Time period
Primary data collected from participating companies and associations for their operational activities are representative for 2006 and 2007.

## Reference product
- Fuels, burned at bleached kraft market pulp mill, average production, at mill [RNA]: 10867 MJ

## Inputs from technosphere
- Diesel, combusted in industrial boiler, at pulp and paper mill (EXCL.) [RNA]: 0.36528 l
  Other fossil fuels assumed to be diesel.
- RFO, combusted in industrial boiler, at pulp and paper mill (EXCL.) [RNA]: 39.531 l
  All combusted on site. Actually received at supplier, not refinery.
- Hog fuel, self-gen., combusted in ind. boiler, at pulp and paper mill (EXCL.) [RNA]: 237.66 kg
  Combustion of self-generated hogged fuel from pulpwood. Wood inputs are accounted for in the process named Bleached kraft market pulp, average production, at mill
- Natural gas, combusted in industrial boiler, at pulp and paper mill (EXCL.) [RNA]: 55.463 m3
- Gasoline, combusted in equipment, at pulp and paper mill (EXCL.) [RNA]: 0.11507 l
  Gasoline and kerosene, assumed to be gasoline.
- Hog fuel, pur., combusted in industrial boiler, at pulp and paper mill (EXCL.) [RNA]: 64.259 kg
  Purchased hogged fuel. Typically from wood products manufacturing.
- TDF, combusted in industrial boiler, at pulp and paper mill (EXCL.) [RNA]: 2.2746 kg
  All combusted. Not present in any database.
- Bituminous coal, combusted in industrial boiler, at pulp and paper mill (EXCL.) [RNA]: 22.546 kg
- Diesel, combusted in industrial boiler, at pulp and paper mill (EXCL.) [RNA]: 1.2627 l
  Proxy for light fuel oil.
- LPG, combusted in industrial boiler, at pulp and paper mill (EXCL.) [RNA]: 0.30706 l

## Emissions to nature
- Phenol [emission, air]: 0.010362 kg
  From black liquor recovery, non-recyclable paper combustion and wastewater residuals combustion
- Nickel [emission, air]: 1.8679e-5 kg
  (same comment as for Phenol)
- Carbon monoxide [emission, air]: 0.16978 kg
  (same comment as for Phenol)
- Benzene [emission, air]: 0.00064642 kg
  (same comment as for Phenol)
- Selenium [emission, air]: 0.0014247 kg
  (same comment as for Phenol)
- Mercury [emission, air]: 2.4695e-6 kg
  (same comment as for Phenol)
- Nitrogen oxides [emission, air]: 2.1151 kg
  From all combustion processes at pulp and paper mill.
- Xylene [emission, air]: 0.00077892 kg
  (same comment as for Phenol)
- Methanol [emission, air]: 0.11083 kg
  (same comment as for Phenol)
- Carbon disulfide [emission, air]: 0.00047496 kg
  (same comment as for Phenol)
- Sulfuric acid [emission, air]: 0.021082 kg
  (same comment as for Phenol)
- Manganese [emission, air]: 0.00014731 kg
  (same comment as for Phenol)
- Nitrous oxide [emission, air]: 0.040499 kg
  (same comment as for Phenol)
- Cumene [emission, air]: 0.00067735 kg
  (same comment as for Phenol)
- Sulfur dioxide [emission, air]: 2.7384 kg
  From all combustion processes at pulp and paper mill.
- Arsenic [emission, air]: 2.3806e-6 kg
  (same comment as for Phenol)
- Methyl isobutyl ketone [emission, air]: 0.00036324 kg
  (same comment as for Phenol)
- Hexachlorobenzene [emission, air]: 4.3237e-10 kg
  (same comment as for Phenol)
- Barium [emission, air]: 0.00028484 kg
  (same comment as for Phenol)
- Chromium [emission, air]: 2.3973e-5 kg
  (same comment as for Phenol)
- Styrene [emission, air]: 0.00019062 kg
  (same comment as for Phenol)
- Beryllium [emission, air]: 0.00126 kg
  (same comment as for Phenol)
- Zinc [emission, air]: 6.4345e-5 kg
  (same comment as for Phenol)
- Toluene [emission, air]: 0.00052873 kg
  (same comment as for Phenol)
- Methylene chloride [emission, air]: 0.000178 kg
  (same comment as for Phenol)
- Benzo[ghi]perylene [emission, air]: 2.8042e-6 kg
  (same comment as for Phenol)
- Lead [emission, air]: 8.2617e-6 kg
  (same comment as for Phenol)
- Chloromethane [emission, air]: 0.018536 kg
  (same comment as for Phenol)
- Formaldehyde [emission, air]: 0.0056491 kg
  (same comment as for Phenol)
- Cadmium [emission, air]: 6.5959e-5 kg
  (same comment as for Phenol)
- Naphthalene [emission, air]: 0.00012219 kg
  (same comment as for Phenol)
- 1,2,4-Trichlorobenzene [emission, air]: 0.00011412 kg
  (same comment as for Phenol)
- Particulate matter [emission, air]: 0.050624 kg
  (same comment as for Phenol)
- Carbon tetrachloride [emission, air]: 3.683e-5 kg
  (same comment as for Phenol)
- Vanadium [emission, air]: 1.2564e-6 kg
  (same comment as for Phenol)
- 2,3,7,8-Tetrachlorodibenzo-p-dioxin [emission, air]: 2.0704e-13 kg
  (same comment as for Phenol)
- 1,1,2-Trichloroethane [emission, air]: 2.2148e-5 kg
  (same comment as for Phenol)
- Antimony [emission, air]: 7.1984e-5 kg
  (same comment as for Phenol)
- Chloroform [emission, air]: 2.2992e-5 kg
  (same comment as for Phenol)
- Acrolein [emission, air]: 0.00026657 kg
  (same comment as for Phenol)
- Methane [emission, air]: 0.051542 kg
  (same comment as for Phenol)
- 1,1,1-Trichloroethane [emission, air]: 3.9413e-5 kg
  (same comment as for Phenol)
- Polycyclic organic matter [emission, air]: 0.00023196 kg
  (same comment as for Phenol)
- Silver [emission, air]: 8.9949e-5 kg
  (same comment as for Phenol)
- Trichloroethylene [emission, air]: 2.1023e-5 kg
  (same comment as for Phenol)
- Hydrofluoric acid [emission, air]: 0.00093539 kg
  (same comment as for Phenol)
- Hexane [emission, air]: 0.00038677 kg
  (same comment as for Phenol)
- Carbon dioxide [emission, air]: 2022.4 kg
  (same comment as for Phenol)
- Hydrogen sulfide [emission, air]: 0.1452 kg
  Total reduced sulfur assumed to be hydrogen sulfide. From all combustion processes.
- Biphenyl [emission, air]: 0.00013023 kg
  (same comment as for Phenol)
- Copper [emission, air]: 2.8232e-5 kg
  (same comment as for Phenol)
- Acetaldehyde [emission, air]: 0.012167 kg
  (same comment as for Phenol)
- Propionaldehyde [emission, air]: 0.0046931 kg
  (same comment as for Phenol)
- Cresol [emission, air]: 0.0030724 kg
  (same comment as for Phenol)
- Hydrochloric acid [emission, air]: 0.061277 kg
  (same comment as for Phenol)
- Tetrachloroethylene [emission, air]: 2.5826e-6 kg
  (same comment as for Phenol)

## Sampling procedure
The survey included results from 53 pulp mills representing 15.5 million short tons per year (TPY), nearly 97% of 2006 production volume.

## Sources
- AF&PA (2010). Printing & Writing Papers LCA
