# Propylene, materials production, organic compound, at plant, kg

Dataset: openLCA process, unit process
Category: 31-33: Manufacturing/3251: Basic Chemical Manufacturing
Geography: Northern America
Time period: 2014-12-30 to 2015-11-29
Allocation method: no allocation
Data quality: US EPA - Process Pedigree Matrix (4;1)
Generated by: Franklin Associates, A Division of ERG
Owner: American Chemistry Council
Published in: Franklin Associates (2020). Cradle-to-Gate Life Cycle Analysis of Olefins
isCopyrightProtected: false
restrictionsDescription: These U.S. LCI Database Project data ("Data") are provided by the National Renewable Energy Laboratory ("NREL"), operated by the Alliance for Sustainable Energy, LLC ("Alliance") for the US Department of Energy ("DOE") under Contract No. DE-AC36-08GO28308. The United States Government (the "Government") retains and the user acknowledges that the Government retains a non-exclusive, paid-up, irrevocable, worldwide license to publish or reproduce the published form of these data, or allow others to do so, for Government purposes.
Access to and use of these Data shall impose the following obligations on the user, as set forth in this Agreement. The user is granted the right, without any fee or cost, to use, copy, modify, alter, enhance and distribute these Data for any purpose whatsoever, provided that this entire notice appears in all copies of the Data. Any modification, alteration or enhancement of these data shall be identified and documented by the user. Further, the user agrees to credit the DOE/NREL/Alliance in any publication that results from the use of these Data. The names DOE/NREL/Alliance, however, may not be used in any advertising or publicity to endorse or promote any products or commercial entities unless specific written permission is obtained from DOE/NREL/Alliance. The user also understands that DOE/NREL/Alliance is not obligated to provide the user with any support, consulting, training or assistance of any kind with regard to the use of these Data or to provide the user with any updates, revisions or new versions of these Data.
YOU AGREE TO INDEMNIFY THE GOVERNMENT AND DOE/NREL/ALLIANCE, AND ITS SUBSIDIARIES, AFFILIATES, OFFICERS, AGENTS, AND EMPLOYEES AGAINST ANY CLAIM OR DEMAND, INCLUDING REASONABLE ATTORNEYS' FEES, RELATED TO YOUR USE OF THESE DATA. THESE DATA ARE PROVIDED BY DOE/NREL/ALLIANCE "AS IS" AND ANY EXPRESS OR IMPLIED WARRANTIES, INCLUDING BUT NOT LIMITED TO, THE IMPLIED WARRANTIES OF MERCHANTABILITY AND FITNESS FOR A PARTICULAR PURPOSE ARE DISCLAIMED. IN NO EVENT SHALL THE GOVERNMENT OR DOE/NREL/ALLIANCE BE LIABLE FOR ANY SPECIAL, INDIRECT OR CONSEQUENTIAL DAMAGES OR ANY DAMAGES WHATSOEVER, INCLUDING BUT NOT LIMITED TO CLAIMS ASSOCIATED WITH THE LOSS OF DATA OR PROFITS, WHICH MAY RESULT FROM AN ACTION IN CONTRACT, NEGLIGENCE OR OTHER TORTIOUS CLAIM THAT ARISES OUT OF OR IN CONNECTION WITH THE ACCESS, USE OR PERFORMANCE OF THESE DATA.

## General comment
Includes material and energy requirements and environmental emissions for one kilogram of propylene production through steam cracking of hydrocarbons (including natural gas liquids and petroleum liquids). Numerous co-product streams are produced during this process. Fuel gas and off-gas are two coproducts produced that are exported to another process for fuel use. When the fuel coproducts are exported from the hydrocracker, they carry with them the allocated share of the inputs and outputs for their production. The ratio of the mass of the exported fuel over the total mass output is removed from the total inputs and outputs of the hydrocracker, and the remaining inputs and outputs are allocated over the material hydrocracker products. No energy credit is applied for the exported fuels, since both the inputs and outputs for the exported fuels have been removed from the data set. Quantities may vary slightly between the reference to main source and and this module due to rounding. Representativeness: 100%. The olefins producers who provided data for this module verified that the characteristics of their plants are representative of a majority of North American olefins production

The captured propylene production amount is approximately 10 percent of the ethylene production in the U.S. in 2015 (Oil and Gas Journal, 2017). The captured propylene production amount is estimated to be 4 percent of the total propylene production in the U.S. in 2015 (Oil and Gas Journal, 2017). Propylene, pyrolysis gasoline and butadiene are coproducts of ethylene production, and a mass basis was used to allocate the credit for the coproducts. Differences in this dataset and the dataset of other olefins are due to the use of the production amount to weight each plant's data. For coproducts sold for fuel use in other processes, these were treated as an avoided fuel product and were given credits based on the fuel they would replace.

## Technology
Propylene mainly comes from steam cracking or as a by-product of refining, although some propylene is created through propane dehydrogenation (PDH), olefin metathesis, methanol synthesis, and coal to olefins. This average dataset represents steam cracking only. Typical steam cracking begins when hydrocarbons are fed to the cracking furnace. After being pre-heated by a heat exchanger, mixed with steam and then further heated, the hydrocarbon feed is transferred to a reactor. The temperature is again increased to around 800 Celsius, and the cracked gas products are immediately cooled in quench towers using quench oil or quench water. Fuel oil is separated from the main gas stream in a multi-stage centrifugal compressor. The main gas stream then undergoes acid gas removal and drying to remove any moisture that may remain from the quenching process prior to cracked gas compression. The final step involves fractional distillation of the various reaction products and is achieved using a series of distillation columns and hydrogenation reactors.

## Geography
LCI data for the production of olefins, including Ethylene, propylene and pyrolysis gasoline, were collected from three producers (ten plants) in North America – all in the United States. All companies provided data for the year 2015. A weighted average was calculated from the data collected and used to develop the LCA model.

## Time period
All primary data were collected from 2014-2015

## Reference product
- Propylene, at plant [RNA]: 1 kg

## Avoided products
- Natural gas, combusted in industrial boiler [RNA]: 0.045 m3
  Excess offgas that does not come back as fuel gas and is used in some other process. Off-gas sold as a credit.
- Natural gas, combusted in industrial equipment, 1.357 m3/kg, 52.13 MJ/kg [RNA]: 0.014 m3; provider Natural gas, combusted in industrial equipment
  Natural gas amount equivalent to energy content of exported steam. Recovered energy from steam.
- Residual fuel oil, combusted in industrial boiler [RNA]: 0.0028 l
  Bunker oil sold as a coproduct

## Inputs from technosphere
- Transport, pipeline, unspecified petroleum products [RNA]: 0.002 t*km
- Transport, barge, average fuel mix [RNA]: 0.079 t*km
- Fuel gas, produced onsite, at cracker, m3: 0.115 m3
  Incoming fuel gas from other units
- Petroleum refined, to energy use, at refinery: 0.027 kg; provider Petroleum refined, for energy use, at plant
  Use to create internal off-gas
- Natural gas, production mixture, to energy use: 0.16 kg; provider Natural gas, processed, for energy use, at plant
  Used to create internal off-gas
- Petroleum refined, to material use, at refinery: 0.14 kg; provider Petroleum refined, for material use, at plant
  Used to create products
- Electricity, at cogen, for natural gas turbine [US]: 0.023 kWh
- Natural gas, combusted in industrial boiler, at hydrocracker, for ethylene [RNA]: 0.113 m3
  Represents natural gas, purchased, at cracker, m3/US.
- Transport, pipeline, natural gas [RNA]: 0.868 t*km
- Landfill gas, at cracker, m3: 0.00051 m3
  Combustion of landfill gas used
- Natural gas, production mixture, to material use: 0.87 kg; provider Natural gas, processed, for material use, at plant
  Used to create products
- Electricity, AC, 120 V: 0.1116 MJ; provider Electricity; at user; consumption mix - US - US

## Inputs from nature
- Water [resource, water]: 0.0033 m3

## Waste to treatment
- Disposal, solid waste, to incineration without energy recovery: 0.0057 kg
  Solid waste to incineration
- Recycling, solid waste, to recycling or reuse: 0.00021 kg
  Solid waste to recycling/reuse
- Disposal, hazardous waste, to unspecified hazardous waste landfill: 3.5e-6 kg
  Hazardous waste to landfill
- Disposal, solid waste, process, to sanitary landfill: 0.00029 kg
  Solid waste to landfill
- Disposal, solid waste, to incineration with energy recovery: 5.8e-7 kg
  Solid waste to WTE
- Disposal, hazardous waste, to incineration without energy recovery: 0.00133 kg
  Hazardous waste to incineration

## Emissions to nature
- Lead [emission, water]: 1e-10 kg
  This data was reported by fewer than three companies. To indicate known emissions while protecting the confidentiality of individual company responses, the emission is reported only by order of magnitude.
- Sulfur oxides [emission, air]: 1.9e-5 kg
- Particulate matter, ≤ 10μm [emission, air]: 5.6e-6 kg
  Represents PM > 2.5 and <10.
- Particulate matter, ≤ 2.5μm [emission, air]: 2.8e-5 kg
- Carbon monoxide [emission, air]: 0.00025 kg
- Volatile organic compounds [emission, air]: 1, 0.00012, 1e-5 kg (3 entries)
- Methane [emission, air]: 0.0001 kg
- Styrene [emission, water]: 1e-5 kg
  (same comment as for Lead)
- Ammonia [emission, air]: 1e-7 kg
  (same comment as for Lead)
- Mercury [emission, water]: 1e-10 kg
  (same comment as for Lead)
- Total dissolved solids [emission, water]: 1e-8 kg
  (same comment as for Lead)
- Dimethyl phthalate [emission, water]: 1e-7 kg
  (same comment as for Lead)
- Benzene [emission, water]: 1e-5 kg
  (same comment as for Lead)
- Ethylbenzene [emission, water]: 1e-6 kg
  (same comment as for Lead)
- Xylene [emission, water]: 1e-6 kg
  (same comment as for Lead)
- Total Organic Carbon [emission, water]: 1e-9 kg
  (same comment as for Lead)
- 7,12-Dimethylbenz[a]anthracene [emission, water]: 1e-8 kg
  (same comment as for Lead)
- Ethylene [emission, water]: 1e-5 kg
  (same comment as for Lead)
- 3-Methylcholanthrene [emission, water]: 1e-9 kg
  (same comment as for Lead)
- Nitrous oxide [emission, air]: 0.0002 kg
- Carbon dioxide [emission, air]: 0.64 kg
- Ethylene glycol [emission, water]: 1e-6 kg
  (same comment as for Lead)
- Cyanide [emission, water]: 1e-9 kg
  (same comment as for Lead)
- Chemical Oxygen Demand [emission, water]: 0.00046 kg
- 1,3-Butadiene [emission, water]: 1e-6 kg
  (same comment as for Lead)
- Propylene glycol [emission, water]: 1e-6 kg
  (same comment as for Lead)
- Nickel [emission, water]: 1e-9 kg
  (same comment as for Lead)
- Suspended solids, inorganic [emission, water]: 1e-5 kg
  (same comment as for Lead)
- Biphenyl [emission, water]: 1e-6 kg
  (same comment as for Lead)
- Sodium sulfate [emission, water]: 1e-8 kg
  (same comment as for Lead)
- Cresol [emission, water]: 1e-8 kg
  (same comment as for Lead)
- Chlorine [emission, air]: 1e-8 kg
  (same comment as for Lead)
- Phenol [emission, water]: 1e-7 kg
  (same comment as for Lead)
- Hydrogen sulfide [emission, air]: 1e-10 kg
  (same comment as for Lead)
- Ammonia [emission, water]: 1e-6 kg
  This data was reported by fewer than three companies. To indicate known emissions while protecting the confidentiality of individual company responses, the emission is reported only by order of magnitude. Includes N2 as ammonia.
- Particulate matter [emission, air]: 1e-5 kg
  (same comment as for Lead)
- Toluene [emission, water]: 1e-5 kg
  (same comment as for Lead)
- Isoprene [emission, water]: 1e-7 kg
  (same comment as for Lead)
- Biological Oxygen Demand [emission, water]: 3.9e-6 kg
- Nitrogen oxides [emission, air]: 0.0003 kg
- Dibenz[a,j]acridine [emission, water]: 1e-9 kg
  (same comment as for Lead)

## Inventory method
Attributional. Compatible with TRACI

## Modelling constants
In this study, primary data were used to model the steam cracking of the olefins. All data received were carefully evaluated before compiling the production-weighted average data sets used to generate results. Supporting background data were drawn from credible, widely used databases including the US LCI database, GREET, and Ecoinvent. Mass allocation was used to allocate all inputs and outputs to each product and co-products.

## Completeness
TREATMENT OF MISSING ENVIRONMENTAL DATA: Elementary flows are cut-off at less than 1% based on environmental relevance.
TREATMENT OF MISSING TECHNOSPHERE DATA: Intermediate flows are cut-off is at 1% based on environmental relevance.
MASS BALANCE: For primary data the mass balance was calculated by a straight comparison of inputs and outputs

## Data selection
LCI data for the production of olefins, including ethylene, propylene and pyrolysis gasoline, were collected from three producers (ten plants) in North America – all in the United States. All companies provided data for the year 2015.

## Data treatment
A weighted average was calculated from the data collected and used to develop the LCA model. The weighting used production amounts provided by the plants.

## Data collection
All primary data were collected from 2015.

## Sampling procedure
BOUNDARY CONDITIONS: The system boundary includes (1) raw material extraction (e.g., extraction of petroleum and natural gas as feedstocks for Ethylene production), (2) incoming transportation for each process, and (3) manufacturing of Propylene, including incoming transportation for each material.
DATA COLLECTION: The primary data for the life cycle inventory of the production of olefins, including ethylene, propylene and pyrolysis gasoline, were collected from three producers (ten plants) located in the United States in 2015. A weighted average was calculated from the data collected and used to develop the LCA model. For some processes, the data sets are based on actual plant data reported by plant personnel, while other data sets are based on engineering estimates or secondary data sources. Supporting background data were drawn from credible, widely used databases including the US LCI database, GREET, and Ecoinvent.
UNCERTAINTY ESTIMATION: Primary data collected from actual facilities are considered the best available data for representing industry operations. In this study, primary data were used to model the steam cracking of the olefins. All data received were carefully evaluated before compiling the production-weighted average data sets used to generate results. No uncertainty analysis was carried out due to the lack of uncertainty data or probability distributions for key parameters, which are often only available as single point estimates from the producers.

## Intended application
"Accounting, with system-external interactions" - The intended application is a purely descriptive accounting / documentation of the analysed system including existing interactions with other systems in the LCI model. These data are an update to a previously published dataset which is a generic unit process data.

## Project
Franklin Associates, a Division of ERG (2020). Cradle-to-Resin Life Cycle Analysis of Olefins. Submitted to the Plastics Division of the American Chemistry Council (ACC). April, 2020. https://plastics.americanchemistry.com/Life-Cycle-Studies/

## Review 
Internal review of data entry proofreading, mass balance verification and data documentation.

## Sources
- Franklin Associates (2020). Cradle-to-Gate Life Cycle Analysis of Olefins
- Oil and Gas Journal, 2017
