# Electricity, diesel, at power plant

Dataset: openLCA process, unit process
Category: 22: Utilities/2211: Electric Power Generation, Transmission and Distribution
Geography: Northern America
Allocation method: no allocation
Generated by: Jeff Hernbloom
Published in: Franklin Associates (2003) Distillate Fuel Oil Utility Combustion
isCopyrightProtected: false
restrictionsDescription: All information can be accessed by everybody.

## General comment
Important note: although most of the data in the US LCI database has
undergone some sort of review, the database as a whole has not yet
undergone a formal validation process.
Please email comments to lci@nrel.gov.

## Geography
North America

## Reference product
- Electricity, diesel, at power plant [RNA]: 1 kWh

## Inputs from technosphere
- Transport, barge, average fuel mix [RNA]: 0.0094543 t*km
  Represents transportation from petroleum refinery to utility boiler.
- Transport, train, diesel powered [RNA]: 0.001116 t*km
  Represents transportation from petroleum refinery to utility boiler.
- Transport, pipeline, unspecified petroleum products [RNA]: 0.013739 t*km
  Represents transportation from petroleum refinery to utility boiler.
- Diesel, at refinery: 0.33261 l; provider Petroleum refining, at refinery
  Fuel consumption : 0.333 liter/kWh (0.0878 gal/kWh)
- Transport, combination truck, average fuel mix [RNA]: 0.0017446 t*km
  Represents transportation from petroleum refinery to utility boiler.

## Emissions to nature
- Methylene chloride [emission, air]: 1.7827e-7 kg
- Cadmium [emission, air]: 1.5862e-8 kg
- Carbon monoxide [emission, air]: 0.00021551 kg
- Benzene [emission, air]: 8.529e-9 kg
- Iron [emission, water]: 1.1828e-8 kg
- Nickel [emission, air]: 3.3677e-6 kg
- Formaldehyde [emission, air]: 1.3152e-6 kg
- Nitrous oxide [emission, air]: 4.7486e-6 kg
- Naphthalene [emission, air]: 4.5036e-8 kg
- Lead [emission, air]: 6.0181e-8 kg
- Manganese [emission, air]: 1.1956e-7 kg
- 2,3,7,8-Tetrachlorodibenzo-p-dioxin [emission, air]: 5.5279e-13 kg
- Nitrogen oxides [emission, air]: 0.0010313 kg
- Selenium [emission, air]: 2.7221e-8 kg
- Suspended solids, inorganic [emission, water]: 3.5484e-7 kg
- Mercury [emission, air]: 4.5036e-9 kg
- Oils, unspecified [emission, water]: 1.7742e-7 kg
- Carbon dioxide [emission, air]: 0.97897 kg
- Particulate matter, > 2.5μm and ≤ 10μm [emission, air]: 4.2981e-5 kg
- Copper(I) [emission, water]: 1.1828e-8 kg
- Methane [emission, air]: 2.1917e-6 kg
- Beryllium [emission, air]: 1.108e-9 kg
- Radionuclides [emission, air]: 0.036011 kBq
- Chromium [emission, air]: 3.3677e-8 kg
- Phenols [emission, air]: 1.3433e-7 kg
- Tetrachloroethylene [emission, air]: 3.0403e-9 kg
- Cobalt [emission, air]: 2.3993e-7 kg
- Sulfur oxides [emission, air]: 0.0002149 kg
- Volatile organic compounds [emission, air]: 8.6449e-6 kg
- Chloride [emission, water]: 2.3656e-9 kg
- Hydrochloric acid [emission, air]: 2.7875e-5 kg
- Arsenic [emission, air]: 5.2609e-8 kg

## Sources
- Franklin Associates (2003) Distillate Fuel Oil Utility Combustion
- U.S. EPA
- Center for Transportation Research, Argo
- EIA
- U.S. EPA
- U.S. EPA
