# Corn stover, ground and stored

Dataset: openLCA process, unit process
Category: 11: Agriculture, Forestry, Fishing and Hunting/1151: Support Activities for Crop Production
Geography: Northern America
Time period: 2009-12-31 to 2021-12-31
Allocation method: no allocation
Generated by: Daniel Inman
Published in: Hsu, D.
isCopyrightProtected: false
restrictionsDescription: All information can be accessed by everybody.

## General comment
Taken from Sheehan, Corn Stover Ethanol LCA. (Directly from TEAM). The corn steep liquor production involves the steeping of harvested corn for a period of from 24 to 48 hours in a light sulfurous acid solution. The production of sulfurous acid was assumed to be negligible. The only emissions were SOx from the steeping tanks. Emission factors provided by USA EPA AP-42. All of the production burdens from corn are assumed to be allocated to the production of the steeping liquor.

## Technology
modern

## Geography
North America

## Time period
2010

## Reference product
- Corn stover, ground and stored [RNA]: 1000 kg; = 1.0*1000

## Inputs from technosphere
- Corn stover, carted [RNA]: 1280 kg; = 1.28*1000
  comes in wet
- Agricultural machinery, general, production: 0.9 kg
- Grinding [RNA]: 931.45 kg; = 0.93145*1000
- Loading bales: 1.43 Item(s)
  loading bales for grinder. Calculation of number of bales comes from 2000 lbs of corn stover divided by weight per bale. Trailer volume is 2511 ft^3 (INL table 4-5), density is 12 lbs/ft^3 dry (=20 wet at 40% moisture).
- Corn wet mill, gluten drying, AP-42 [RNA]: 238 kg
- Dried roughage store, non ventilated: 1.1723e-7 m3
- Electricity, AC, 120 V: 220.64 MJ; provider Electricity; at user; consumption mix - US - US
  Electricity needed for dust collection
- Fodder loading, by self-loading trailer: 2.7751 m3
  loading to storage
- Conveyor belt, at plant: 3.4747e-5 m
  conveyor for grinder in-feed system

## Emissions to nature
- Water [emission, air, troposphere, rural]: 280 kg
  water dried per ton of final moisture corn stover.

## Sources
- Hess, J.
- Hsu, D.
