# Soda powder, at plant

Dataset: openLCA process, unit process
Category: 21: Mining, Quarrying, and Oil and Gas Extraction/2123: Nonmetallic Mineral Mining and Quarrying
Geography: Northern America
Time period: 2002-12-31 to 2002-12-31
Allocation method: no allocation
Generated by: Franklin Associates, A Division of ERG
Published in: THE PLASTICS DIVISION OF THE AMERICAN C
isCopyrightProtected: false
restrictionsDescription: All information can be accessed by everybody.

## General comment
Soda powder may also be referred to as soda ash. Process inputs do not consider the fraction of mass that is extracted and returned to the mine as overburden. Complete inventory data and metadata are available in full in the final report and appendices, Cradle-to-Gate Life Cycle Inventory of Nine Plastic Resins and Four Polyurethane Precursors. This report has been extensively reviewed within Franklin Associates and has undergone partial critical review by ACC Plastics Division members and is available at: www.americanchemistry.com. Quantities may vary slightly between the reference to main source and and this module due to rounding. Important note: although most of the data in the US LCI database has undergone some sort of review, the database as a whole has not yet undergone a formal validation process. Please email comments to lci@nrel.gov.

## Technology
Underground mining of naturally occurring trona brine via the room and pillar method and the long wall method

## Geography
North America (US and Canada)

## Reference product
- Soda powder, at plant [RNA]: 1 kg
  Also referred to as soda ash

## Inputs from technosphere
- Diesel, combusted in industrial equipment [RNA]: 6.7e-5 l
  Includes diesel fuel and distillate oil amounts.
- Electricity, AC, 120 V: 0.32619 MJ; provider Electricity; at user; consumption mix - US - US
- Bituminous coal, combusted in industrial boiler [RNA]: 0.108 kg
- Residual fuel oil, combusted in industrial boiler [RNA]: 0.00158536 l
- Natural gas, combusted in industrial boiler [RNA]: 0.0497543 m3

## Inputs from nature
- Trona [resource, ground, subterranean]: 1 kg
  Process inputs do not consider the fraction of mass that is extracted and returned to the mine as overburden.

## Emissions to nature
- Particulate matter [emission, air]: 0.0965 kg
- Carbon dioxide [emission, air]: 0.415 kg

## Sampling procedure
Data are from secondary sources.

## Sources
- THE PLASTICS DIVISION OF THE AMERICAN C
