# Corn stover, production, average, US, 2022

Dataset: openLCA process, unit process
Category: 11: Agriculture, Forestry, Fishing and Hunting/1111: Oilseed and Grain Farming
Geography: Northern America
Time period: 2009-12-31 to 2100-12-30
Allocation method: no allocation
Generated by: Daniel Inman
Published in: Hsu, D.
isCopyrightProtected: false
restrictionsDescription: All information can be accessed by everybody.

## General comment
Corn stover based on US average corn yeilds and practices extrapolated from historic data to 2022. Includes all crop production processes from field preperation to harvest. Infrastructure, maintenance, and construction of faciilities and equipment is included. Loading/unloading,transport, and storage of material is not included. Grain and components are assumed to be at field-dry conditions of 15.5% moisture.

The stover process has been seperated from corn to allow for incremental allocation. Only processes directly attributed to stover collection are counted. These processes include additional harvesting energy for single pass harvest, additional nutrients, and hay substitition for loss of potential over-winter cattle feed.

Process has been reviewed by Dr. Dwayne Westfall, Dept Soil and Crop Sciences, Colorado State University. Date of review Sept 10 - 30 2008. Data from NASS where available. Extrapolation of existing data to 2022 estimates. Mass based between stover and grain.

## Technology
modern

## Geography
North America

## Time period
2010 and after

## Reference product
- Corn stover, production [RNA]: 3290 kg

## Inputs from technosphere
- Hay grown for feed: 573 kg
  Hay is used to replace over-winter feed lost by harvesting stover
- Harvest, corn, single pass [RNA]: 3150 m2; = 0.315*10000
  1 hectare of single pass harvest, scaled to 1.46 hectares because of the increase in material from stover harvest. The .46 is attributed to stover.
- Fertilizer, stover [RNA]: 10000 m2; = 1.0*10000; provider Fertilizer, stover, 2022
  This accounts for fertilizer replacement of nutrients removed in stover.

## Inputs from nature
- Biomass [resource, biotic]: 3012.12 kg
  LHV for corn stover, data from Phyllis database http://www.ecn.nl/phyllis/
  Verified 10/14/08
- Carbon dioxide [resource, air]: 4830 kg
  CO2=44g per mole, C = 12g, O=16

## Emissions to nature
- Nitrate [emission, water, subterranean]: 0.00545 kg
  NO3-N leaching, assuming 30% of fertilizer N applied leaches below the root zone. IPCC 2006: Chapter 11: N2O Emissions from Managed Soils, and CO2 Emissions from Lime and Urea Application. Table 11.3

## Sources
- USDA NASS
- Edwards, W.
- USDA
- Hess, J.
- Hsu, D.
- Nemecek, T.
- Graham, R.L.
