# Winter wheat straw, ground and stored

Dataset: openLCA process, unit process
Category: 11: Agriculture, Forestry, Fishing and Hunting/1151: Support Activities for Crop Production
Geography: Northern America
Time period: 2009-12-31 to 2010-12-31
Allocation method: no allocation
Generated by: Daniel Inman
Published in: Hsu, D.
isCopyrightProtected: false
restrictionsDescription: All information can be accessed by everybody.

## General comment
dried to 12% moisture

## Technology
modern

## Geography
North America

## Time period
2010

## Reference product
- Winter wheat straw, ground and stored [RNA]: 1000 kg; = 1.0*1000

## Inputs from technosphere
- Fodder loading, by self-loading trailer: 2.7751 m3
- Electricity, AC, 120 V: 11.7184 MJ; provider Electricity; at user; consumption mix - US - US
  twine removal
- Winter wheat straw, carted [RNA]: 1330 kg; = 1.33*1000
- Conveyor belt, at plant: 3.4747e-5 m
  conveyor for grinder in-feed system
- Grinding [RNA]: 880 kg; = 0.88*1000
- Agricultural machinery, general, production: 0.9 kg
- Loading bales: 1.43 Item(s)
  loading bales for grinder. Calculation of number of bales comes from 2000 lbs of corn stover divided by weight per bale. Trailer volume is 2511 ft^3 (INL table 4-5), density is 12 lbs/ft^3 dry (=20 wet at 40% moisture).
- Dried roughage store, non ventilated: 1.1723e-7 m3
  30 year lifetime for storage from INL feedstock design report.
- Corn wet mill, gluten drying, AP-42 [RNA]: 33.3 kg

## Emissions to nature
- Water [emission, air, troposphere, rural]: 333 kg
  water dried per ton of final moisture corn stover.

## Sources
- Hess, J.
- Hsu, D.
