# Liquefied petroleum gas, combusted in industrial boiler

Dataset: openLCA process, unit process
Category: 22: Utilities/2213: Water, Sewage and Other Systems
Geography: Northern America
Time period: 2000-12-31 to 2000-12-31
Allocation method: no allocation
Generated by: Franklin Associates, A Division of ERG
Published in: Franklin Associates (2003) LPG Industrial Combustion
isCopyrightProtected: false
restrictionsDescription: All information can be accessed by everybody.

## General comment
Important note: although most of the data in the US LCI database has
undergone some sort of review, the database as a whole has not yet
undergone a formal validation process.
Please email comments to lci@nrel.gov.

## Technology
LPG combustion in average industrial boiler.

## Geography
United States

## Reference product
- Liquefied petroleum gas, combusted in industrial boiler [RNA]: 1 l
  100% propane

## Inputs from technosphere
- Transport, pipeline, natural gas [RNA]: 0.041307 t*km
  Represents transportation from petroleum refinery to industrial boiler.
- Transport, barge, average fuel mix [RNA]: 0.028425 t*km
  Represents transportation from petroleum refinery to industrial boiler.
- Transport, train, diesel powered [RNA]: 0.0033554 t*km
  Represents transportation from petroleum refinery to industrial boiler.
- Transport, combination truck, average fuel mix [RNA]: 0.0052453 t*km
  Represents transportation from petroleum refinery to industrial boiler.
- Liquefied petroleum gas, at refinery [RNA]: 1 l; provider Petroleum refining, at refinery

## Emissions to nature
- Volatile organic compounds [emission, air]: 4.5544e-5 kg
- Carbon monoxide [emission, air]: 0.00044339 kg
- Particulate matter, ≤ 10μm [emission, air]: 7.8147e-5 kg
- Nitrogen oxides [emission, air]: 0.0026025 kg
- Nitrous oxide [emission, air]: 0.00011711 kg
- Methane [emission, air]: 2.6025e-5 kg
- Carbon dioxide [emission, air]: 1.724 kg

## Sources
- Franklin Associates (2003) LPG Industrial Combustion
- Center for Transportation Research, Argo
