# Diesel, combusted in industrial boiler

Dataset: openLCA process, unit process
Category: 22: Utilities/2213: Water, Sewage and Other Systems
Geography: Northern America
Time period: 1997-12-31 to 2000-12-31
Allocation method: no allocation
Generated by: Franklin Associates, A Division of ERG
Published in: Franklin Associates (2003) Distillate Fuel Oil Industrial Combustion
isCopyrightProtected: false
restrictionsDescription: All information can be accessed by everybody.

## General comment
Important note: although most of the data in the US LCI database has
undergone some sort of review, the database as a whole has not yet
undergone a formal validation process.
Please email comments to lci@nrel.gov.

## Technology
Diesel combustion in average industrial boiler.

## Geography
United States

## Reference product
- Diesel, combusted in industrial boiler [RNA]: 1 l

## Inputs from technosphere
- Transport, barge, average fuel mix [RNA]: 0.028425 t*km
  Represents transportation from petroleum refinery to industrial boiler.
- Transport, pipeline, unspecified petroleum products [RNA]: 0.041307 t*km
  Represents transportation from petroleum refinery to industrial boiler.
- Transport, combination truck, average fuel mix [RNA]: 0.0052453 t*km
  Represents transportation from petroleum refinery to industrial boiler.
- Diesel, at refinery: 1 l; provider Petroleum refining, at refinery
- Transport, train, diesel powered [RNA]: 0.0033554 t*km
  Represents transportation from petroleum refinery to industrial boiler.

## Emissions to nature
- Lead [emission, air]: 1.4958e-7 kg
- Tetrachloroethylene [emission, air]: 9.141e-9 kg
- Suspended solids, inorganic [emission, water]: 1.0669e-6 kg
- Nickel [emission, air]: 4.986e-8 kg
- Zinc [emission, air]: 6.648e-8 kg
- Carbon dioxide [emission, air]: 2.727 kg
- Carbon monoxide [emission, air]: 0.00060031 kg
- 2,3,7,8-Tetrachlorodibenzo-p-dioxin [emission, air]: 1.662e-12 kg
- Volatile organic compounds [emission, air]: 2.408e-5 kg
- Methane [emission, air]: 6.1048e-6 kg
- Particulate matter, ≤ 10μm [emission, air]: 0.00011972 kg
- Sulfur oxides [emission, air]: 0.0005986 kg
- Arsenic [emission, air]: 6.648e-8 kg
- Manganese [emission, air]: 9.972e-8 kg
- Iron [emission, water]: 3.5562e-8 kg
- Hydrochloric acid [emission, air]: 8.3807e-5 kg
- Beryllium [emission, air]: 4.986e-8 kg
- Selenium [emission, air]: 2.493e-7 kg
- Copper(I) [emission, water]: 3.5562e-8 kg
- Mercury [emission, air]: 4.986e-8 kg
- Cadmium [emission, air]: 4.986e-8 kg
- Methylene chloride [emission, air]: 5.3599e-7 kg
- Oils, unspecified [emission, water]: 5.3343e-7 kg
- Nitrous oxide [emission, air]: 1.3227e-5 kg
- Copper [emission, air]: 9.972e-8 kg
- Nitrogen oxides [emission, air]: 0.0028727 kg
- Chromium [emission, air]: 4.986e-8 kg
- Radionuclides [emission, air]: 0.10827 kBq
- Chloride [emission, water]: 7.1124e-9 kg
- Phenols [emission, air]: 4.0386e-7 kg

## Sources
- Franklin Associates (2003) Distillate Fuel Oil Industrial Combustion
- U.S. EPA
- Center for Transportation Research, Argo
- U.S. EPA Office of Solid Waste
- EIA
- U.S. EPA
- U.S. EPA
- U.S. EPA
