# Ethylene dichloride-vinyl chloride monomer, EDC-VCM; at plant

Dataset: openLCA process, unit process
Category: 31-33: Manufacturing/3251: Basic Chemical Manufacturing
Geography: United States
Time period: 2022-01-01 to 2022-12-31
Allocation method: no allocation
Data quality: US EPA - Process Pedigree Matrix (3;1)
Generated by: Sustainable Solutions Corporation
Owner: Vinyl Institute
Published in: Sustainable Solutions Corporation (2024) Suspension Grade PVC Resin Life Cycle Assessment
isCopyrightProtected: false
restrictionsDescription: These U.S. LCI Database Project data ("Data") are provided by the National Renewable Energy Laboratory ("NREL"), operated by the Alliance for Sustainable Energy, LLC ("Alliance") for the US Department of Energy ("DOE") under Contract No. DE-AC36-08GO28308. The United States Government (the "Government") retains and the user acknowledges that the Government retains a non-exclusive, paid-up, irrevocable, worldwide license to publish or reproduce the published form of these data, or allow others to do so, for Government purposes.
Access to and use of these Data shall impose the following obligations on the user, as set forth in this Agreement. The user is granted the right, without any fee or cost, to use, copy, modify, alter, enhance and distribute these Data for any purpose whatsoever, provided that this entire notice appears in all copies of the Data. Any modification, alteration or enhancement of these data shall be identified and documented by the user. Further, the user agrees to credit the DOE/NREL/Alliance in any publication that results from the use of these Data. The names DOE/NREL/Alliance, however, may not be used in any advertising or publicity to endorse or promote any products or commercial entities unless specific written permission is obtained from DOE/NREL/Alliance. The user also understands that DOE/NREL/Alliance is not obligated to provide the user with any support, consulting, training or assistance of any kind with regard to the use of these Data or to provide the user with any updates, revisions or new versions of these Data.
YOU AGREE TO INDEMNIFY THE GOVERNMENT AND DOE/NREL/ALLIANCE, AND ITS SUBSIDIARIES, AFFILIATES, OFFICERS, AGENTS, AND EMPLOYEES AGAINST ANY CLAIM OR DEMAND, INCLUDING REASONABLE ATTORNEYS' FEES, RELATED TO YOUR USE OF THESE DATA. THESE DATA ARE PROVIDED BY DOE/NREL/ALLIANCE "AS IS" AND ANY EXPRESS OR IMPLIED WARRANTIES, INCLUDING BUT NOT LIMITED TO, THE IMPLIED WARRANTIES OF MERCHANTABILITY AND FITNESS FOR A PARTICULAR PURPOSE ARE DISCLAIMED. IN NO EVENT SHALL THE GOVERNMENT OR DOE/NREL/ALLIANCE BE LIABLE FOR ANY SPECIAL, INDIRECT OR CONSEQUENTIAL DAMAGES OR ANY DAMAGES WHATSOEVER, INCLUDING BUT NOT LIMITED TO CLAIMS ASSOCIATED WITH THE LOSS OF DATA OR PROFITS, WHICH MAY RESULT FROM AN ACTION IN CONTRACT, NEGLIGENCE OR OTHER TORTIOUS CLAIM THAT ARISES OUT OF OR IN CONNECTION WITH THE ACCESS, USE OR PERFORMANCE OF THESE DATA.

## General comment
This unit process represents the production of 1 kg of vinyl chloride monomer (VCM) for use in PVC manufacturing. This process represents all VCM produced by the suspension grade PVC resin manufacturers in the United States. The creation of ethylene dichloride (EDC) for use in VCM production is included within this model. As EDC and VCM production are often conducted simultaneously, the facilities were not all able to provide data specific to EDC or VCM production but were able to provide data for the overall VCM production. The process LCI data were thus aggregated to create a weighted average for the overall EDC/VCM process. The studied system includes all processes involved in the VCM production process, including incoming transport.

## Technology
This process represents the VCM production process used to produce suspension grade PVC resin. Commercially, two main processes are used to produce EDC: direct chlorination and oxychlorination. The plants within this study use a combination of these processes. In direct chlorination, a reaction occurs between ethylene and chlorine using a catalyst. Oxychlorination occurs when hydrogen chloride is catalyzed to react in the presence of excess oxygen and ethylene. Direct chlorination, oxychlorination, and the creation of VCM from EDC are often conducted simultaneously. VCM is produced through the thermal cracking of EDC. In this process, the EDC is fed into a furnace where hydrogen chloride is separated from the VCM under high temperatures. The hydrogen chloride produced is then fed back into and consumed by the oxychlorination reaction.

## Geography
This data represents eight manufacturing sites located in Texas and Louisiana.

## Time period
This data represents operations for the 2022 calendar year.

## Reference product
- Ethylene dichloride-vinyl chloride, EDC-VCM, monomer; at plant [RNA]: 1 kg

## Inputs from technosphere
- Electricity, AC, 120 V: 0.318675 MJ; provider Electricity; at user; consumption mix - Midcontinent Independent System Operator, Inc. - BA
- Limestone, at mine [RNA]: 0.00258 kg
- Natural gas, combusted in industrial boiler [RNA]: 0.00781 m3
- Natural gas, combusted in industrial boiler [RNA]: 0.0168 m3
  From COGEN
- Transport, barge, average fuel mix: 0.000944 t*km
- Chlorine; chlor-alkali electrolysis; at plant: 0.5208 kg; = 5.06E-01+1.48E-02
- Ethylene, at plant, kg: 0.448 kg; provider Ethylene, materials production, organic compound, at plant, kg
- Electricity, AC, 120 V: 0.240404 MJ; provider Electricity; at user; consumption mix - Electric Reliability Council of Texas, Inc. - BA
- Transport, train, diesel powered: 0.00148 t*km
- Hydrochloric acid, at plant, kg: 0.035 kg; provider Hydrochloric acid, HCl; MDI coproduct; at plant, 100% HCl
- Transport, combination truck, average fuel mix: 6.09e-5 t*km
- Hydrogen, at plant: 0.00524 kg; provider Chlorine; chlor-alkali electrolysis; at plant
  From COGEN
- Natural gas, combusted in industrial boiler [RNA]: 0.143572 m3; = 0.104371585+3.92E-02
- Oxygen, liquid, at plant [RNA]: 0.153 kg

## Inputs from nature
- Water [resource, water]: 4.7942 kg; = 4.73E0+6.42E-02
  water, filtered water, demineralized water
- Nitrogen [resource, air]: 0.13 kg
- Water [resource, water]: 0.141 kg
  from EDC subprocess

## Waste to treatment
- Disposal, inert solid waste, to inert material landfill: 0.00187 kg
- Disposal, solid waste to incineration without energy recovery: 0.000526491 kg; = 4.91E-7+5.26E-4
- Wastewater treatment level 1; Conventional plug flow activated sludge aggregate, solids reduction; at plant: 0.00191 m3; = 1.91E0/1000; provider Wastewater treatment; Conventional plug flow activated sludge, Level 1; at plant

## Emissions to nature
- Chloroform [emission, air]: 5.58e-7 kg
- Vinyl chloride [emission, air]: 4.02e-6 kg
- 1,2-Dichloroethane [emission, water]: 1.76e-10 kg
- Ammonia [emission, air]: 1.23e-5 kg
- Volatile organic compounds [emission, air]: 8.54e-6 kg
- 1,1,1-Trichloroethane [emission, air]: 1.08e-7 kg
- 1,3-Dichloropropene [emission, air]: 1.11e-8 kg
  1,3-Dichloropropylene
- Hexachloroethane [emission, air]: 1.42e-8 kg
- Carbon dioxide [emission, air]: 1.95e-6 kg
- Chlorine [emission, air]: 1.12e-5 kg
- Total Organic Carbon [emission, water]: 1.86e-6 kg
- Ethylbenzene [emission, air]: 8.93e-7 kg
- Biological Oxygen Demand [emission, water]: 4.82e-6 kg
- Chloroprene [emission, air]: 1.09e-7 kg
- Methanol [emission, air]: 1.03e-6 kg
- Methylene chloride [emission, air]: 1.16e-7 kg
- Hexane [emission, air]: 0.000153 kg
- Bis(2-chloroethyl) ether [emission, air]: 1.6e-9 kg
  dichloroethyl ether
- Acetaldehyde [emission, air]: 5.42e-8 kg
- Dioxins [emission, air]: 3e-13 kg
- Propylene [emission, air]: 1.75e-7 kg
  propylene
- Lead [emission, air]: 8.03e-8 kg
- 1,2-Dichloroethane [emission, air]: 2.77e-6 kg
  same as ethylene dichloride, 1,2-dichloroethane
- 1,1-Dichloroethylene [emission, air]: 6.68e-10 kg
- Benzene [emission, air]: 2.28e-7 kg
- Chlorine [emission, water]: 2.61e-8 kg
- Dichloroethane [emission, air]: 1.32e-5 kg
- Particulate matter, ≤ 10μm [emission, air]: 9.81e-6 kg
- Copper [emission, water]: 6.09e-8 kg
- Total suspended solids [emission, water]: 7.8e-5 kg
- Chloroform [emission, water]: 6e-9 kg
- Particulate matter, ≤ 2.5μm [emission, air]: 5.95e-6 kg
- Tribromoethene [emission, air]: 2.48e-8 kg
- Chloromethane [emission, air]: 3.6e-9 kg
- 1,2-Dichloropropane [emission, air]: 6.96e-9 kg
- Trichloroethylene [emission, air]: 7.76e-8 kg
- 1,1,2,2-Tetrachloroethane [emission, air]: 2.86e-8 kg
- Cumene [emission, air]: 5.33e-10 kg
- 1,1,2-Trichloroethane [emission, air]: 2.05e-7 kg
- Lead [emission, water]: 8.02e-8 kg
- Ethylene glycol [emission, air]: 7.82e-9 kg
- Sulfur dioxide [emission, air]: 2.29e-7 kg
- Organic compounds [emission, air]: 2.44e-7 kg
- Formaldehyde [emission, air]: 6.78e-8 kg
- Nitrogen oxides [emission, air]: 2.77e-5 kg
- Furan [emission, air]: 1.41e-15 kg
- Carbon tetrachloride [emission, air]: 3.48e-7 kg
- Zinc [emission, water]: 4.68e-9 kg
- Methane [emission, air]: 1.5e-8 kg
- p-Dichlorobenzene [emission, air]: 2.27e-10 kg
- Tetrachloroethylene [emission, air]: 1.22e-7 kg
- 1,1-Dichloroethane [emission, air]: 8.73e-9 kg
  same as ethylidene dichloride
- 1,3-Butadiyne [emission, air]: 5.84e-8 kg
  1,3-butadiene
- Toluene [emission, air]: 1.17e-8 kg
- Carbon monoxide [emission, air]: 6.05e-7 kg
  carbon monoxide, CO
- Ethylene [emission, air]: 1.1e-6 kg
- Chlorobenzene [emission, air]: 2.03e-7 kg
- Hydrochloric acid [emission, air]: 5.1e-6 kg
  hydrochloric acid
- Chloroethane [emission, air]: 2.23e-7 kg
- Sulfuric acid [emission, air]: 7.12e-10 kg
- Chloromethane [emission, air]: 1.92e-11 kg
  methyl chloride

## Inventory method
Attributional

## Modelling constants
Data was collected from four manufacturers which represent 100% of the S-PVC resin produced in 2022. A total of eight facilities provided their data for 2022 and the LCI was developed using mass allocation. Data was reviewed and verified by each of the four companies. EDC and VCM production typically occur concurrently and so the stages have been combined. Where EDC and VCM production are reported separately, the LCI for EDC is combined with a weighted average for the company. Then VCM production is calculated using the specified weight of EDC within the product recipe as an input. The final VCM product is included with the rest of the facilities for the industry average. The cogeneration process of electricity and steam is similar across the EDC/VCM plants to produce S-PVC resin. The cogeneration process produces 54% electricity and 46% steam. Emissions to water and air were considered within the scope of this study and were accounted for based off of quantities in annual emissions reporting from each company. Data validation was performed through mass balances.

## Completeness
The following cut-off criteria was used throughout the study. Processes whose total contribution to the final result, with respect to their mass and in relation to all considered impact categories, is less than 1% can be neglected. The sum of the neglected processes may not exceed 5% by mass and by 5% of the considered impact categories. Construction of capital equipment, maintenance of operation and support equipment, and human labor and employee commute are all excluded from this life cycle assessment. This assessment is cradle-to-gate and excludes any processes downstream of the manufacturer. No other known processes within the system boundary were excluded. All data was provided by the manufacturers and reviewed by the manufacturers again after the results had been calculated to ensure completeness. The mass balance for this process was calculated.

## Data selection
Data was collected from four manufacturers (eight facilities) which represent 100% of the S-PVC resin produced in the US in 2022.

## Data treatment
A weighted average was calculated from the primary data collected from the four manufacturers (eight facilities) of S-PVC in the US.

## Sampling procedure
The system boundary is cradle-to-gate and includes the use of raw materials entering the facilities, the transportation to get raw and supporting materials to the manufacturing facilities, and the processing inputs and outputs to produce EDC and VCM. Construction of capital equipment, maintenance of operation and support equipment, and human labor and employee commute are all excluded from this life cycle assessment. Uncertainty was not calculated.

## Intended application
Situation C1 - Accounting, with system-external interactions - The intended application is a purely descriptive accounting / documentation of the analyzed system including existing interactions with other systems in the LCI model.

The target audience of this model includes LCA practitioners, industry, and the general public. A full inventory of environmental flows are included; thus this unit process can be used for a full range of LCIA impact categories. The original study results were analyzed using the TRACI LCIA factors. These data are an update to the previously published dataset from 2021.

These data are intended to be used as an average dataset accepted by the North American plastics/chemical industry.

## Project
This process was developed as part of the Vinyl Institute's Suspension Grade PVC Resin Life Cycle Assessment.

## Sources
- Sustainable Solutions Corporation (2024) Suspension Grade PVC Resin Life Cycle Assessment
