# Enzyme, Glucoamylase, Novozyme Spirizyme

Dataset: openLCA process, unit process
Category: 31-33: Manufacturing/3251: Basic Chemical Manufacturing
Geography: Europe
Time period: 2003-12-31 to 2003-12-31
Allocation method: no allocation
Generated by: Daniel Inman
Published in: P.H. Nielsen
isCopyrightProtected: false
restrictionsDescription: All information can be accessed by everybody.

## General comment
based on Figure 3 "B" of reference document. Inventory in terms of equivalents.

## Technology
current

## Time period
2004

## Reference product
- Enzyme, Glucoamylase, Novozyme Spirizyme [RER]: 1 kg

## Inputs from technosphere
- Transformation, from pasture and meadow: 1 m2
- Transformation, to industrial area: 1 m2

## Inputs from nature
- Water [resource, water, subterranean]: 29 kg
- Coal [resource, ground, subterranean]: 65.7 MJ
  Data is fossil energy. Assumed it was all coal. This number does not affect the GHG emissions. This number is just for energy.

## Emissions to nature
- Ethylene [emission, air]: 0.0016 kg
  C2H4 eq
- Orthophosphate [emission, ground]: 0.026 kg
  Phosphate equiv.
- Carbon dioxide [emission, air]: 4.4 kg
  CO2 eq
- Sulfur dioxide [emission, air]: 0.009 kg
  SO2 eq

## Sources
- P.H. Nielsen
- Hsu, D.
