# Wastewater treatment; Conventional plug flow activated sludge, Level 1; at plant

Dataset: openLCA process, unit process, infrastructure
Category: 22: Utilities/2213: Water, Sewage and Other Systems
Geography: United States
Time period: 2015-01-01 to 2025-12-31
Data quality: US EPA - Process Pedigree Matrix (2;1)
Generated by: Franklin Associates, A Division of ERG
Owner: U.S. EPA
Published in: U.S. EPA 2023
isCopyrightProtected: false
restrictionsDescription: "These U.S. LCI Database Project data (""Data"") are provided by the National Renewable Energy Laboratory (""NREL""), operated by the Alliance for Sustainable Energy, LLC (""Alliance"") for the US Department of Energy (""DOE"") under Contract No. DE-AC36-08GO28308. The United States Government (the ""Government"") retains and the user acknowledges that the Government retains a non-exclusive, paid-up, irrevocable, worldwide license to publish or reproduce the published form of these data, or allow others to do so, for Government purposes.
Access to and use of these Data shall impose the following obligations on the user, as set forth in this Agreement. The user is granted the right, without any fee or cost, to use, copy, modify, alter, enhance and distribute these Data for any purpose whatsoever, provided that this entire notice appears in all copies of the Data. Any modification, alteration or enhancement of these data shall be identified and documented by the user. Further, the user agrees to credit the DOE/NREL/Alliance in any publication that results from the use of these Data. The names DOE/NREL/Alliance, however, may not be used in any advertising or publicity to endorse or promote any products or commercial entities unless specific written permission is obtained from DOE/NREL/Alliance. The user also understands that DOE/NREL/Alliance is not obligated to provide the user with any support, consulting, training or assistance of any kind with regard to the use of these Data or to provide the user with any updates, revisions or new versions of these Data.
YOU AGREE TO INDEMNIFY THE GOVERNMENT AND DOE/NREL/ALLIANCE, AND ITS SUBSIDIARIES, AFFILIATES, OFFICERS, AGENTS, AND EMPLOYEES AGAINST ANY CLAIM OR DEMAND, INCLUDING REASONABLE ATTORNEYS' FEES, RELATED TO YOUR USE OF THESE DATA. THESE DATA ARE PROVIDED BY DOE/NREL/ALLIANCE ""AS IS"" AND ANY EXPRESS OR IMPLIED WARRANTIES, INCLUDING BUT NOT LIMITED TO, THE IMPLIED WARRANTIES OF MERCHANTABILITY AND FITNESS FOR A PARTICULAR PURPOSE ARE DISCLAIMED. IN NO EVENT SHALL THE GOVERNMENT OR DOE/NREL/ALLIANCE BE LIABLE FOR ANY SPECIAL, INDIRECT OR CONSEQUENTIAL DAMAGES OR ANY DAMAGES WHATSOEVER, INCLUDING BUT NOT LIMITED TO CLAIMS ASSOCIATED WITH THE LOSS OF DATA OR PROFITS, WHICH MAY RESULT FROM AN ACTION IN CONTRACT, NEGLIGENCE OR OTHER TORTIOUS CLAIM THAT ARISES OUT OF OR IN CONNECTION WITH THE ACCESS, USE OR PERFORMANCE OF THESE DATA."

## General comment
This gate-to gate process reflects treatment of 1 cubic meter of wastewater, to the following specification:

Influent wastewater quality: Suspended solids - 220 mg/L, Biological oxygen demand - 220 mg/L, Total nitrogen - 40 mg/L N, Total phosphorus - 5 mg/L.

Level 1 Effluent quality: Suspended solids - 20 mg/L, Biological oxygen demand - 7.7 mg/L, Total nitrogen - 30 mg/L, Total phosphorus - 4.9 mg/L

Inventory data was generated for a theortical process configuration treating on average 10 million gallons per day of wastewater. Key information is available in process metadata. Full process documentation is available in EPA report number 832-R-21-006A.

System boundaries of the treatment process include energy, chemical, consumable inputs and greenhouse gas emissions for major primary, secondary, tertiary, disinfection and solids treatment processes. Release of treated effluent to surface water and landfill disposal of generated sludge are modeled in separate (linked) processes. Basic infrastructure is also included (excavation, concrete, steel). Operation of the sewage collection system, infrastructure disposal, and electrical and mechanical equipment (e.g. pumps body, control boxes, clarifier scraper arm) are outside of the system boundaries.

Wastewater treatment processes are available for five levels of treatment performance. Level one is the lowest standard. Level five produces the cleanest effluent.

## Technology
conventional plug flow activated sludge, Level 1: Treatment processes include: grit removal, clarifiers, activated sludge biological process, chlorination/dechlorination, gravity thickening, anaerobic digestion and centrifugation.

Level 1 Effluent quality- Suspended solids - 20 mg/L, Biological oxygen demand - 7.7 mg/L, Total nitrogen - 30 mg/L, Total phosphorus - 4.9 mg/L"

## Time period
Wastewater effluent quality standards will change over time and with geography. Current and future wastewater standards should be reflected in treatment levels establish for the level 1 through level 5 systems. Updating background electricity and input data should maintain process relevance so long as the target treatment system matches the defined system.

## Reference product
- Wastewater treatment level 1; Conventional plug flow activated sludge aggregate, solids reduction; at plant: 1 m3; input

## Inputs from technosphere
- Metal product manufacturing, average metal working: 3.23156e-5 kg
- Concrete, at plant: 5.01668e-9 m3; provider Concrete Bridge; USLCI to USEEIO
- Chlorine; chlor-alkali average, membrane cell; at plant: 0.0099905 kg
- Electricity, AC, 120 V: 0.736529 MJ; provider Electricity; at user; consumption mix - US - US
- Steel; sections, at plant: 3.23156e-5 kg
- Excavation, hydraulic digger: 1.66207e-5 m3; provider Excavation, hydraulic digger Bridge; USLCI to USEEIO
- Building construction, hall, steel construction: 4.70874e-5 m3; provider Building construction, hall, steel construction Bridge; USLCI to USEEIO
- Natural gas, combusted in industrial equipment: 0.0406707 m3
- Sodium hydrogen Sulfite, 40% in solution: 0.00375 kg; provider Sodium hydrogen Sulfite, 40% in solution Bridge; USLCI to USEEIO
  value reflects 40% solution state (not pure sodium hydrogen sulfite).
- Polymers, at plant: 0.00214243 kg; provider Polymers Bridge; USLCI to USEEIO

## Waste to treatment
- Effluent release; from wastewater treatment plant; at surface water: 1 m3; provider Effluent release; from conventional plug flow activated sludge, Level 1 wastewater treatment plant
- Sludge hauling and landfill; wastewater treatment unit: 1 m3; provider Sludge hauling and landfill; wastewater treatment unit; Level 1
- Biogas, burned in flare: 0.116337 m3

## Emissions to nature
- Methane [emission, air]: 0.00033 kg
  biological process emission
- Methane [emission, air]: 0.00250471 kg
  AD emission
- Nitrous oxide [emission, air]: 2.42e-5 kg
  biological process emission

## Inventory method
Attributional process. Gate-to-gate.

## Modelling constants
Inventory data was generated for a theortical process configuration treating on average 10 million gallons per day of wastewater. The CAPDET Works software package (maintained by Hydromantis) is the primary source of inventory data for process energy use, chemicals, infrastructure materials, sludge hauling and biogas production. Process greenhouse gas emissions were estimated using calculations from the IPCC greenhouse gas inventory guidelines.

## Completeness
Exclusion of mechanical and electrical equipment from the system boundary is the only known missing, non-trivial inventory item. CAPDET works balances mass to model effluent quality and sludge quantity. However, across the entire process a mass balance was not calculated.

## Data selection
All outputs of the CAPDET model that could be used to develop LCI data were included in the model. Additional data on process greenhouse gas emissions and biogas processing were developed from literature sources to supplement gaps in the inventory

## Data treatment
Outputs of the CAPDET model are reported on an annual (energy, chemicals) or lifetime (infrastructure) basis. Annual quantities are standardized to the functional unit by dividing by the average quantity of wastewater treated per year. For inventory data reported on a lifetime basis, quantities are standardized to the functional unit by amortizing the inventory item over the expected lifespan of the infrastructure component.

## Data collection
2014-2019

## Sampling procedure
System boundaries of the treatment process include all major primary, secondary, tertiary, disinfection and solids treatment processes. Release of treated effluent to surface water and landfill disposal of generated sludge are modeled in separate (linked) processes. Basic infrastructure is included (excavation, concrete, steel). Operation of the sewage collection system, infrastructure disposal, and electrical and mechanical equipment are outside of the system boundaries. Inventory data was derived from model runs in CAPDET Works and supplemented with values developed using basic engineering calculations and values derived from literature. Uncertainty data is not included for this process.

## Use advice
This process reflects wastewater treatment using Conventional plug flow activated sludge, Level 1 wastewater treatment technology. Impacts associated with effluent release and sludge disposal in a landfill are modeled in separate (linked) processes. Used in isolation this process will not reflect the full scope (gate-to-grave) of wastewater treatment impacts.

It is recommended that users update the electricity mix to reflect their region and a data year corresponding to the scope of their analysis.

Wastewater treatment processes are available for five levels of treatment performance. Level one refers to the lowest nutrient standard. Level five produces the cleanest effluent. If possible, select the level of wastewater treatment based on permit standards for the target wastewater treatment plant and the type of biological process used.

If comparing LCIA results against source: The linked background electricity dataset has significantly lower impacts than the grid in the original source. Additionally, significant changes in characterization factors occurred between USETox versions 1 and 2, which strongly influences toxicity results for this process.

## Intended application
This process is intended to be used as a background process by LCA practitioners, industry and the general public to reflect the impact of wastewater treatment within their product systems. This process must be used in conjunction with the associated effluent and sludge landfilling processes to model the full scope of wastewater treatment impacts. The inventory should be sufficient to model TRACI 2.1 and USETox impact categories.

Situation C2 - Accounting, without system-external interatctions. The intended application is a purely descriptive accounting / documentation of the analysed system excluding existing interactions with other systems in the LCI model.

## Project
Data were prepared by Eastern Research Group (ERG) on behalf of the U.S. EPA under Contract No. EP-C-14-022 WA 1-11, "LCA and Cost Assessment of Nutrient Removal Technologies"

## Sources
- CAPDETWorks Wastewater Model Version 3.
