# Butadiene, at plant

Dataset: openLCA process, unit process
Category: 31-33: Manufacturing/3251: Basic Chemical Manufacturing
Geography: Northern America
Time period: 2002-12-31 to 2002-12-31
Allocation method: no allocation
Generated by: Franklin Associates, A Division of ERG
Published in: THE PLASTICS DIVISION OF THE AMERICAN C
isCopyrightProtected: false
restrictionsDescription: All information can be accessed by everybody.

## General comment
Numerous coproduct streams are produced during this process. Butadiene is produced as a coproduct in ethylene production. Fuel gas and off-gas are two other coproducts produced that are exported to another process for fuel use. When the fuel coproducts are exported from the hydrocracker, they carry with them the allocated share of the inputs and outputs for their production. The ratio of the mass of the exported fuel over the total mass output is removed from the total inputs and outputs of the hydrocracker, and the remaining inputs and outputs are allocated over the material hydrocracker products. No energy credit is applied for the exported fuels, since both the inputs and outputs for the exported fuels have been removed from the data set. Complete inventory data and metadata are available in full in the final report and appendices, Cradle-to-Gate Life Cycle Inventory of Nine Plastic Resins and Four Polyurethane Precursors. This report has been extensively reviewed within Franklin Associates and has undergone partial critical review by ACC Plastics Division members and is available at: www.americanchemistry.com. Quantities may vary slightly between the reference to main source and and this module due to rounding. Important note: although most of the data in the US LCI database has undergone some sort of review, the database as a whole has not yet undergone a formal validation process. Please email comments to lci@nrel.gov.

## Technology
Steam cracking of hydrocarbons (including natural gas liquids and petroleum liquids)

## Geography
North America (US and Canada)

## Reference product
- Butadiene, at plant [RNA]: 1 kg

## Inputs from technosphere
- Diesel, combusted in industrial equipment [RNA]: 2.3111e-5 l
  Includes diesel fuel and distillate oil amounts.
- Transport, pipeline, natural gas [RNA]: 1.27924 t*km
- Petroleum refined, to material use, at refinery: 0.359688 kg; provider Petroleum refined, for material use, at plant
  Specific raw materials from oil refining and natural gas processing include ethane, propane, liquid feed, heavy raffinate, and DNG.
- Transport, pipeline, unspecified petroleum products [RNA]: 0.105029 t*km
- Transport, barge, diesel powered [RNA]: 0.0242841 t*km
- Petroleum refined, to energy use, at refinery: 0.08316 kg; provider Petroleum refined, for energy use, at plant
  A portion of the material feed combusts within the hydrocracker and produces an offgas, which provides an internal energy source.
- Electricity, at cogen, for natural gas turbine [US]: 0.0309436 kWh
- Natural gas, production mixture, to energy use: 0.14784 kg; provider Natural gas, processed, for energy use, at plant
  (same comment as for Petroleum refined, to energy use, at refinery)
- Transport, barge, residual fuel oil powered [RNA]: 0.0807446 t*km
- Transport, combination truck, diesel powered [RNA]: 0.0322447 t*km
- Transport, train, diesel powered [RNA]: 0.0251968 t*km
- Natural gas, combusted in industrial boiler, at hydrocracker, for butadiene [RNA]: 0.0756399 m3
- Gasoline, combusted in equipment [RNA]: 2.66126e-5 l
- Electricity, AC, 120 V: 0.977027 MJ; provider Electricity; at user; consumption mix - US - US
- Natural gas, production mixture, to material use: 0.647516 kg; provider Natural gas, processed, for material use, at plant
  (same comment as for Petroleum refined, to material use, at refinery)

## Inputs from nature
- Water [resource, water]: 0.817564 kg
  Consumptive use includes: water incorporated into the product, water evaporated during the process, and/or water used and released to a body other than that from which it was drawn.

## Waste to treatment
- Disposal, solid waste, unspecified, to municipal incineration: 0.00750419 kg
- Disposal, solid waste, unspecified, to waste-to-energy: 6.79853e-6 kg
- Disposal, solid waste, unspecified, to sanitary landfill: 4.21306e-5 kg

## Emissions to nature
- Ethylbenzene [emission, water]: 1e-8 kg
  This emission was reported by fewer than three companies. To indicate known emissions while protecting the confidentiality of individual company responses, the emission is reported only by order of magnitude.
- Suspended solids, inorganic [emission, water]: 1e-5 kg
  (same comment as for Ethylbenzene)
- Xylene [emission, water]: 1e-9 kg
  (same comment as for Ethylbenzene)
- Methane [emission, air]: 1e-6 kg
  (same comment as for Ethylbenzene)
- Total Organic Carbon [emission, water]: 1e-6 kg
  (same comment as for Ethylbenzene)
- Styrene [emission, water]: 1e-9 kg
  (same comment as for Ethylbenzene)
- HCFC-22 [emission, air]: 1e-9 kg
  (same comment as for Ethylbenzene)
- Chemical Oxygen Demand [emission, water]: 1e-5 kg
  (same comment as for Ethylbenzene)
- Volatile organic compounds [emission, air]: 1e-5, 1e-5 kg (2 entries)
  (same comment as for Ethylbenzene)
- Carbon monoxide [emission, air]: 1e-6 kg
  (same comment as for Ethylbenzene)
- Toluene [emission, water]: 1e-7 kg
  (same comment as for Ethylbenzene)
- Sulfur oxides [emission, air]: 1e-6 kg
  (same comment as for Ethylbenzene)
- Organic compounds [emission, air]: 1e-6 kg
  (same comment as for Ethylbenzene)
- Benzene [emission, water]: 1e-8 kg
  (same comment as for Ethylbenzene)
- Phenols [emission, water]: 1e-6 kg
  (same comment as for Ethylbenzene)
- Hydrogen [emission, air]: 1.42857e-5 MJ
  (same comment as for Ethylbenzene)
- Naphthalene [emission, water]: 1e-11 kg
  (same comment as for Ethylbenzene)
- Particulate matter [emission, air]: 1e-7 kg
  (same comment as for Ethylbenzene)
- Biological Oxygen Demand [emission, water]: 1e-5 kg
  (same comment as for Ethylbenzene)
- Acetone [emission, water]: 1e-11 kg
  (same comment as for Ethylbenzene)
- Particulate matter, > 2.5μm and ≤ 10μm [emission, air]: 0.0001 kg
  (same comment as for Ethylbenzene)

## Sampling procedure
Data collected from primary sources.

## Sources
- THE PLASTICS DIVISION OF THE AMERICAN C
