# Sodium chloride, at plant

Dataset: openLCA process, unit process
Category: 21: Mining, Quarrying, and Oil and Gas Extraction/2123: Nonmetallic Mineral Mining and Quarrying
Geography: Northern America
Time period: 2002-12-31 to 2002-12-31
Allocation method: no allocation
Generated by: Franklin Associates, A Division of ERG
Published in: THE PLASTICS DIVISION OF THE AMERICAN C
isCopyrightProtected: false
restrictionsDescription: All information can be accessed by everybody.

## General comment
Process inputs do not consider the fraction of mass that is extracted and returned to the mine as overburden. Complete inventory data and metadata are available in full in the final report and appendices, Cradle-to-Gate Life Cycle Inventory of Nine Plastic Resins and Four Polyurethane Precursors. This report has been extensively reviewed within Franklin Associates and has undergone partial critical review by ACC Plastics Division members and is available at: www.americanchemistry.com. Quantities may vary slightly between the reference to main source and and this module due to rounding. Important note: although most of the data in the US LCI database has undergone some sort of review, the database as a whole has not yet undergone a formal validation process. Please email comments to lci@nrel.gov.

## Technology
95 % solution mining of salt brine and 5 % underground mining of rock salt

## Geography
North America (US and Canada)

## Reference product
- Sodium chloride, at plant [RNA]: 1 kg
  Process inputs do not consider the fraction of mass that is extracted and returned to the mine as overburden.

## Inputs from technosphere
- Natural gas, combusted in industrial boiler [RNA]: 0.0247835 m3
- Diesel, combusted in industrial equipment [RNA]: 0.0100962 l
  Includes diesel fuel and distillate oil amounts.
- Bituminous coal, combusted in industrial boiler [RNA]: 0.0117 kg
- Electricity, AC, 120 V: 0.119841 MJ; provider Electricity; at user; consumption mix - US - US

## Inputs from nature
- Sodium chloride [resource, ground, subterranean]: 1 kg

## Sampling procedure
Data are from secondary sources.

## Sources
- THE PLASTICS DIVISION OF THE AMERICAN C
