# Dispensing of gasoline, at pump

Dataset: openLCA process, unit process
Category: 44-45: Retail Trade/4471: Gasoline Stations
Geography: United States
Time period: 2011-01-01 to 2011-12-31
Data quality: US EPA - Process Pedigree Matrix (4;2)
Exchange data quality scheme: US EPA - Flow Pedigree Matrix
Published in: Argonne National Laboratory (2024) R&D GREET
isCopyrightProtected: false
restrictionsDescription: These U.S. LCI Database Project data ("Data") are provided by the National Renewable Energy Laboratory ("NREL"), operated by the Alliance for Sustainable Energy, LLC ("Alliance") for the US Department of Energy ("DOE") under Contract No. DE-AC36-08GO28308. The United States Government (the "Government") retains and the user acknowledges that the Government retains a non-exclusive, paid-up, irrevocable, worldwide license to publish or reproduce the published form of these data, or allow others to do so, for Government purposes.
Access to and use of these Data shall impose the following obligations on the user, as set forth in this Agreement. The user is granted the right, without any fee or cost, to use, copy, modify, alter, enhance and distribute these Data for any purpose whatsoever, provided that this entire notice appears in all copies of the Data. Any modification, alteration or enhancement of these data shall be identified and documented by the user. Further, the user agrees to credit the DOE/NREL/Alliance in any publication that results from the use of these Data. The names DOE/NREL/Alliance, however, may not be used in any advertising or publicity to endorse or promote any products or commercial entities unless specific written permission is obtained from DOE/NREL/Alliance. The user also understands that DOE/NREL/Alliance is not obligated to provide the user with any support, consulting, training or assistance of any kind with regard to the use of these Data or to provide the user with any updates, revisions or new versions of these Data.
YOU AGREE TO INDEMNIFY THE GOVERNMENT AND DOE/NREL/ALLIANCE, AND ITS SUBSIDIARIES, AFFILIATES, OFFICERS, AGENTS, AND EMPLOYEES AGAINST ANY CLAIM OR DEMAND, INCLUDING REASONABLE ATTORNEYS' FEES, RELATED TO YOUR USE OF THESE DATA. THESE DATA ARE PROVIDED BY DOE/NREL/ALLIANCE "AS IS" AND ANY EXPRESS OR IMPLIED WARRANTIES, INCLUDING BUT NOT LIMITED TO, THE IMPLIED WARRANTIES OF MERCHANTABILITY AND FITNESS FOR A PARTICULAR PURPOSE ARE DISCLAIMED. IN NO EVENT SHALL THE GOVERNMENT OR DOE/NREL/ALLIANCE BE LIABLE FOR ANY SPECIAL, INDIRECT OR CONSEQUENTIAL DAMAGES OR ANY DAMAGES WHATSOEVER, INCLUDING BUT NOT LIMITED TO CLAIMS ASSOCIATED WITH THE LOSS OF DATA OR PROFITS, WHICH MAY RESULT FROM AN ACTION IN CONTRACT, NEGLIGENCE OR OTHER TORTIOUS CLAIM THAT ARISES OUT OF OR IN CONNECTION WITH THE ACCESS, USE OR PERFORMANCE OF THESE DATA.

## General comment
This process represents the transport of gasoline from refinery to end-user pump. Data for transportation and distribution of gasoline is sourced from R&D GREET 2024.

## Geography
Does not include Puerto Rico and the Virgin Islands.

## Time period
Data are from GREET published in 2024, but specific data for transportation and distribution are from FAF model in 2011.

## Parameters
- rail_share: 0.022
- pipeline_miles: 129
- pipeline: 140.398; = pipeline_miles *mi_to_km *pipeline_share
  t*km / t
- mi_to_km: 1.61
- truck_share: 1
- pipeline_share: 0.676
- tanker_share: 0.03
- rail: 5.313; = rail_miles *mi_to_km *rail_share
  t*km / t
- barge_share: 0.312
- rail_miles: 150
- tanker: 125.58; = tanker_miles *mi_to_km *tanker_share
  t*km / t
- truck: 48.3; = truck_miles *mi_to_km *truck_share
  t*km / t
- truck_miles: 30
- barge: 170.789; = barge_miles *mi_to_km *barge_share
  t*km / t
- barge_miles: 340
- tanker_miles: 2600

## Reference product
- Gasoline, dispensed at pump: 1 t

## Inputs from technosphere
- Gasoline, at refinery: 1 t; data quality (1,1,1,1,1); provider Petroleum refining, at refinery
- Transport, train, diesel powered: 5.313 t*km; = rail; data quality (2,4,1,2,4)
- Transport, pipeline, unspecified petroleum products: 140.398 t*km; = pipeline; data quality (2,4,1,2,4)
- Transport, barge, average fuel mix: 170.789 t*km; = barge; data quality (2,4,1,2,4)
- Transport, ocean freighter, average fuel mix: 125.58 t*km; = tanker; data quality (2,4,1,2,4)
- Transport, combination truck, average fuel mix: 48.3 t*km; = truck; data quality (2,4,1,2,4)

## Inventory method
Attributional

## Completeness
All data referring to refinery-to-pump fuel transportation methods are included. Data on emissions from dispensing are excluded.

## Data selection
Data are sourced from the "T_D_Flowcharts" tab of GREET for Gasoline blendstock.

## Data treatment
Note, because fuels can utilize different modes over multiple legs, shares of all modes, as indicated in the Parameters tab, can sum to over 100%.

## Data collection
Data collected for the year 2011

## Sampling procedure
The transport data in GREET is based on the U.S. DOT Federal Highway Administration’s Freight Analysis Framework (FAF) model from 2011. That model is based on the 2007 Commodity Flow Survey (CFS), which captures data on shipments originating from certain business establishments located in the 50 states and DC. The CFS definition of a shipment is "a single movement of goods, commodities, or products from an establishment owned or operated by the same company as the originating establishment." Shipments that originate and terminate in a foregin location but pass through the US are not included. Imported products are accounted for at the point that they leave the importer's initial domestic location for shipment to another location. Shipments that pass through foreign countries are included as long as the shipment originates and terminates in the US. Mileage calculated for these shipments exclude the international segment.

Shipment data was collected through a mailout/mailback questionnaire where establishments were asked to provide shipment information about a sample of individual outbound shipments during a specified week in each calendar quarter. The distance traveled by each freight shipment sampled for the 2007 CFS was estimated using routing algorithms and an integrated, intermodal transportation network created specifically for this purpose.

## Intended application
This process is applicable for modelling the fuel input into mobile equipment.

## Project
This process has been updated by the FLCAC Data Curator.

## Sources
- Argonne National Laboratory (2013) Update to Transportation Parameters
