# Electricity, bauxite mining regions

Dataset: openLCA process, unit process
Category: 22: Utilities/2211: Electric Power Generation, Transmission and Distribution
Geography: Global
Time period: 2003-12-31 to 2003-12-31
Allocation method: no allocation
Generated by: Franklin Associates, A Division of ERG
Published in: Franklin Associates, A Division of ERG (2007) LCI Primary Aluminum
isCopyrightProtected: false
restrictionsDescription: All information can be accessed by everybody.

## General comment
In order to calculate the fuels used to generate electricity for bauxite production, it is necessary to determine the percent of bauxite produced in each of the aforementioned countries. This quantity is calculated from the amount exported to the U.S. as bauxite ore and the amount used within each country to produce alumina, which is then exported to the U.S.
Important note: although most of the data in the US LCI database has
undergone some sort of review, the database as a whole has not yet
undergone a formal validation process.
Please email comments to lci@nrel.gov.

## Technology
Coal (2%), Nuclear (0.1%), Hydropower (22%), Fuel oil (75%), Natural gas (0.8%)

## Geography
Australia (2%), Jamaica (55 %), Guinea (30%), Brazil (3%), Suriname (1%), and Guyana (9%).

## Reference product
- Electricity, at bauxite mining regions [GLO]: 1 kWh

## Inputs from technosphere
- Electricity, bituminous coal, at power plant [RNA]: 0.020714 kWh
- Electricity, nuclear, at power plant [RNA]: 0.001179 kWh
- Electricity, from renewable source, unspecified: 0.010255 kWh
- Electricity, hydropower, at power plant, unspecified: 0.21579 kWh
- Electricity, diesel, at power plant [RNA]: 0.745 kWh
- Electricity, natural gas, at power plant [RNA]: 0.0076075 kWh

## Sources
- The Aluminum Association
- Franklin Associates, A Division of ERG (2007) LCI Primary Aluminum
- Energy Information Administration (EIA)
- IAI Statistical Report: Electrical Power
- US Geological Survey
- US EPA
