# Portland cement, at plant

Dataset: openLCA process, unit process
Category: 31-33: Manufacturing/3273: Cement and Concrete Product Manufacturing
Geography: Northern America
Time period: 1992-12-31 to 2003-12-31
Allocation method: no allocation
Generated by: Medgar L. Marceau and Martha G. VanGeem
Published in: Medgar L. Marceau
isCopyrightProtected: false
restrictionsDescription: All information can be accessed by everybody.

## General comment
Portland cement is a hydraulic cement composed primarily of hydraulic calcium silicates. Hydraulic cements harden by reacting chemically with water. During this reaction, cement combines with water to form a stonelike mass, called paste. When the paste (cement and water) is added to aggregates (sand and gravel, crushed stone, or other granular materials) it binds the aggregates together to form concrete, the most widely used construction material. Although the words “cement” and “concrete” are used interchangeably in everyday usage, cement is one of the constituents of concrete. Cement is a very fine powder and concrete is a stonelike material. Cement constitutes 8 to 15 percent of concrete’s total mass by weight. Using cement LCI data incorrectly as concrete LCI data is a serious error., 2002 for fuels and electricity consumption; 2000 for raw material consumption and transportation modes and distances; and 1993 to 2004 for emissions.
Important note: although most of the data in the US LCI database has undergone some sort of review, the database as a whole has not yet undergone a formal validation process.
Please email comments to lci@nrel.gov.

## Technology
Approximately 2002 technology.

## Geography
United States.

## Reference product
- Portland cement, at plant: 1 kg

## Inputs from technosphere
- Bituminous coal, combusted in industrial boiler [RNA]: 0.107 kg
- Foundry sand, at mine: 0.00382 kg
- Fly ash, unspecified origin: 0.0135 kg
- Residual fuel oil, combusted in industrial boiler [RNA]: 4.42e-5 l
- Recycled cement kiln dust: 0.00965 kg
- Slag, at blast furnace: 0.0198 kg
- Grinding aids, at plant: 0.00036 kg
- Refractory material, unspecified, at plant: 0.000647 kg
- Cement bags, at plant: 0.00068 kg
- Bottom ash, unspecified origin: 0.0101 kg
- Chains, at plant: 2.01e-5 kg
- Filter bags, at plant: 1.92e-5 kg
- Grinding media, at plant: 0.00014 kg
- Explosives, at plant: 0.000295 kg
- Electricity, AC, 120 V: 0.5184 MJ; provider Electricity; at user; consumption mix - US - US
- Petroleum coke, combusted in industrial boiler: 0.0223 kg
- Liquefied petroleum gas, combusted in industrial boiler [RNA]: 1.43e-5 l
- Diesel, combusted in industrial boiler [RNA]: 1.07e-6 m3
  Replaces CUTOFF Middle distillates, combusted in industrial boiler in prior USLCI version
- Lubricant feedstock, at refinery: 0.00013 kg
- Gasoline, combusted in equipment [RNA]: 0.000133 l
- Natural gas, combusted in industrial boiler [RNA]: 0.00557 m3

## Inputs from nature
- Limestone [resource, ground]: 1.37 kg
  Also includes gravel and marl (representing together 15% by mass), all approximated to limestone.
- Slate [resource, ground]: 0.00113 kg
- Iron [resource, ground]: 0.0135 kg
- Clay [resource, ground]: 0.0597 kg
- Shale [resource, ground]: 0.0522 kg
- Water [resource, water]: 0.0883, 0.752 kg (2 entries)
- Sand [resource, ground]: 0.0405 kg
- Gypsum [resource, ground]: 0.0615 kg
  Was initially reported as "Gypsum, anhydrite", at 0.0486kg/kg cement
- Raw material, unspecified [resource, non-FEDEFL, ground]: 0.0264 kg

## Waste to treatment
- Waste, tire derived, combusted in industrial boiler: 0.00337 kg
- Waste, solvents, combusted in industrial boiler: 0.00881 kg
- Waste, miscellaneous, combusted in industrial boiler: 0.00148 kg
- Waste, other solid, combusted in industrial boiler: 0.000934 kg
- Disposal, cement kiln dust, in residual material landfill: 0.0373 kg
- Waste, oil, combusted in industrial boiler: 4.87e-7 m3

## Emissions to nature
- Suspended solids, inorganic [emission, water]: 0.000234 kg
- Chloride [emission, water]: 0.000727 kg
- Nitrate compounds [emission, water]: 5.9e-6 kg
- Phenols [emission, water]: 2.2e-8 kg
- Particulate matter [emission, air, troposphere, rural]: 0.00235 kg
- Carbon dioxide [emission, air, troposphere, rural]: 0.553, 0.374 kg (2 entries)
- Volatile organic compounds [emission, air, troposphere, rural]: 5.02e-5 kg
- Aluminum [emission, water]: 8.6e-7 kg
- Zinc [emission, water]: 3.31e-8 kg
- Oils, unspecified [emission, non-FEDEFL, water]: 7.52e-6 kg
- Methane [emission, air, troposphere, rural]: 3.95e-5 kg
- Ammonia [emission, air, troposphere, rural]: 4.76e-6 kg
- Carbon monoxide [emission, air, troposphere, rural]: 0.0011 kg
- Particulate matter, ≤ 2.5μm [emission, air, troposphere, rural]: 9.11e-8 kg
- 2,3,7,8-Tetrachlorodibenzo-p-dioxin [emission, air, troposphere, rural]: 9.98e-11 kg
- Dissolved Organic Carbon [emission, water]: 1.38e-5 kg
- Mercury [emission, air, troposphere, rural]: 6.24e-8 kg
- Sulfate [emission, water]: 0.000616 kg
- Nitrogen oxides [emission, air, troposphere, rural]: 0.0025 kg
- Particulate matter, > 2.5μm and ≤ 10μm [emission, air, troposphere, rural]: 0.000296 kg
- Hydrochloric acid [emission, air, troposphere, rural]: 6.49e-5 kg
- Phosphorus [emission, water]: 5.51e-9 kg
- Ammonium [emission, water]: 9.48e-7 kg
- Sulfide [emission, water]: 6.61e-8 kg
- Sulfur dioxide [emission, air, troposphere, rural]: 0.00166 kg

## Sampling procedure
Varies

## Sources
- Medgar L. Marceau
