# Roundwood, hardwood, green, at mill, SE

Dataset: openLCA process, unit process
Category: 11: Agriculture, Forestry, Fishing and Hunting/1133: Logging
Geography: United States
Time period: 2004-12-31 to 2005-12-31
Allocation method: physical allocation
Generated by: Maureen Puetmann
Published in: Richard D. Bergman
isCopyrightProtected: false
restrictionsDescription: All information can be accessed by everybody.

## General comment
All weights given on an ovendry basis.
Both logs and bark were transported jointly - however, these were seperated in the model based on mass allocation. This unit process only accounts for the transport of logs and excludes the transport of bark.
Important note: although most of the data in the US LCI database has
undergone some sort of review, the database as a whole has not yet
undergone a formal validation process.
Please email comments to lci@nrel.gov.

## Technology
Average transport distance.

## Geography
SE = Southeast United States. The 8 states are Arkansas, Louisiana, Mississippi, Alabama, Tennessee, North Carolina, South Carolina, Georgia.

## Reference product
- Roundwood; hardwood; green; at mill [US]: 1 m3
  Based on a weighted average green density of 854 kg/m3

## By-products
- Bark; hardwood; green; at mill [US]: 21.6 kg
  Weight reported on an ovendry basis. Moisture content (ovendry basis) = 85%

## Inputs from technosphere
- Transport, combination truck, diesel powered [RNA]: 59 t*km
  Transport of green logs 60.4 km. 85% moisture content, od basis
- Roundwood, hardwood, average, at forest road [RNA]: 1 m3
  oven-dried weight. Wood specific gravity of 0.528 and 85% MC dry basis.
- Bark; hardwood; average; at forest road [US]: 21.6 kg; provider Bark, hardwood, average, at forest road, NE-NC
  Oven-dried weight; specific gravity of 0.558 and 85% MC ,od basis
- Transport, combination truck, diesel powered [RNA]: 2.42 t*km
  Transport of green bark 60.4 km. 85% moisture content, od basis

## Allocation factors
- economic, Roundwood; hardwood; green; at mill: 0.961
- causal, Roundwood; hardwood; green; at mill, for Transport, combination truck, diesel powered: 0.961
- causal, Bark; hardwood; green; at mill, for Bark; hardwood; average; at forest road: 0.039
- economic, Bark; hardwood; green; at mill: 0.039
- causal, Bark; hardwood; green; at mill, for Roundwood, hardwood, average, at forest road: 0.039
- causal, Bark; hardwood; green; at mill, for Transport, combination truck, diesel powered: 0.039
- causal, Roundwood; hardwood; green; at mill, for Roundwood, hardwood, average, at forest road: 0.961
- physical, Roundwood; hardwood; green; at mill: 0.961
- physical, Bark; hardwood; green; at mill: 0.039
- causal, Bark; hardwood; green; at mill, for Transport, combination truck, diesel powered: 0.039
- causal, Roundwood; hardwood; green; at mill, for Transport, combination truck, diesel powered: 0.961
- causal, Roundwood; hardwood; green; at mill, for Bark; hardwood; average; at forest road: 0.961

## Sampling procedure
Questionnaires from 12 mills from the 8 states of southeast region. Hardwood sawmills were members of the Hardwood Manufacturer Association (HMA).

## Intended application
Only mass allocation factors are available for the multi-functional processes (disregard economic allocation factor values-they are mass allocation factors).

## Sources
- Richard D. Bergman
- Maureen Puettmann
