# Melamine urea formaldehyde, MF, resin, neat, 60% solids

Dataset: openLCA process, unit process
Category: 31-33: Manufacturing/3252: Resin, Synthetic Rubber, and Artificial and Synthetic Fibers and Filaments Manufacturing
Geography: Northern America
Time period: 2004-12-31 to 2004-12-31
Allocation method: no allocation
Generated by: Maureen Puetmann
Published in: James B. Wilson
isCopyrightProtected: true
restrictionsDescription: All information can be accessed by everybody.

## General comment
MUF resin weight given on a liquid basis at 60% solids.

Important note: although most of the data in the US LCI database has
undergone some sort of review, the database as a whole has not yet
undergone a formal validation process.
Please email comments to lci@nrel.gov. This MUF process has been reviewed by 6 industry representatives and 2 reviewers from a peer review journal

## Technology
The resin manufacturing processes begin with the conversion of methanol by catalytic oxidation in a reactor vessel to produce an aqueous form of formaldehyde The methanol is first vaporized by warming, mixed with air, and then introduced into a reactor containing a metal catalyst of either silver or molybdenum/iron oxide in very small quantities. Upon exiting the reactor the formaldehyde is cooled and then sent to the absorber where it is absorbed into water to produce an aqueous solution. Heat is recovered during this process, excess steam is captured and used elsewhere in the manufacturing process. Various formaldehyde resins are then produced in a batch reactor by reacting formaldehyde with either urea, melamine, phenol, resorcinol or some combination of these. The process involves heating the mix and controlling the reaction by controlling the temperature, pH, ratio of formaldehyde to urea, phenol, melamine, resorcinol or some combination of these chemicals, and the rate of charging until the desired degree of polymerization is achieved. The reaction is quenched and then cooled. If needed, water is stripped off to provide the desired percentage of resin solids. Most of the process water is recycled and used within the production process. Very little waste is generated by resin production. Some production facilities used regenerative thermal oxidizers (RTOs), regenerative catalytic oxidizers (RCOs) and/or wet scrubbers as emission controllers to reduce the type and percentage of some emissions. RTOs and RCOs require the additional use of electricity and natural gas for their operation. It is noteworthy that essentially all production facilities started with methanol, only a very small amount (<1%) of formaldehyde was purchased for these operations, as such it was not included in the analysis.

## Geography
Average US, United States data

## Reference product
- Melamine urea formaldehyde, MF, resin, neat, 60% solids [RNA]: 1 kg
  MUF resin neat at 60% solids, the other 40% of weight is water, the molar ratio of F to U+M is typically 1.15-1.30 wt. average for moisture resistant resin, the molar ratio for this average resin is 1.16.

## Inputs from technosphere
- Liquefied petroleum gas, combusted in industrial boiler [RNA]: 1.55e-5 l
  forklifts
- Melamine urea formaldehyde, MF, hardener, at plant [RNA]: 0.081 kg
  100% solids
- Natural gas, combusted in industrial boiler [RNA]: 0.0135 m3
- Transport, combination truck, diesel powered: 0.181 t*km
  Chemical tranport, wet weights. Urea = 123 km; methanol = 260 km ; melamine = 1,989 km; other chemicals = 347 km
- Ammonium sulfate, at plant: 2.94e-5 kg
  neat liquid, 100% solids
- Methanol, at plant, kg: 0.304 kg
  100% solids
- Electricity, AC, 120 V: 0.0753 MJ; provider Electricity; at user; consumption mix - US - US
  for processing
- Sodium hydroxide; chlor-alkali electrolysis; at plant: 0.000209 kg; provider Chlorine; chlor-alkali electrolysis; at plant
  neat liquid, 100% solids
- Urea, at regional storehouse: 0.397 kg
  100% solids
- Formic acid, at plant: 0.000509 kg
  neat liquid, 100% solids
- Electricity, AC, 120 V: 0.0511 MJ; provider Electricity; at user; consumption mix - US - US
  for emissions control equipment (RTOs and RCOs)
- Transport, train, diesel powered: 0.779 t*km
  Chemical transport, wet weights. Urea = 792 km ; methanol =1990 km;

## Inputs from nature
- Water [resource, water]: 0.688 kg
  municiple water for process and cooling taken as 84% of total water use
- Water [resource, water, subterranean]: 0.103 kg
  well water for process and cooling taken as 16% of total water use

## Waste to treatment
- Disposal, solid waste, unspecified, to unspecified landfill: 5.09e-5 kg

## Emissions to nature
- Particulate matter [emission, air, troposphere, rural]: 1.65e-6 kg
- Methanol [emission, air, troposphere, rural]: 5.49e-6 kg
- Formaldehyde [emission, air, troposphere, rural]: 7.85e-6 kg
- Suspended solids, inorganic [emission, water]: 0.000239 kg
  solids in survey
- Biological Oxygen Demand [emission, water, saline water body, ocean]: 0.000662 kg
  BOD in survey
- Suspended solids, inorganic [emission, water]: 0.000394 kg
  TSS in survey
- Formaldehyde [emission, water]: 7.84e-5 kg
  HCHO in survey
- Nitrogen [emission, water]: 0.00013 kg
  NH3N in survey
- Dimethyl ether [emission, air, troposphere, rural]: 2.26e-6 kg
- Volatile organic compounds [emission, air, troposphere, rural]: 4.94e-5 kg
  a number of plants use an RTO and RCO which reduces VOC and HAP emissions to those given here

## Sampling procedure
The survey represent 60% of total U.S. production for MUF resin; the production facilities were representative of U.S. production practices.

## Sources
- James B. Wilson
- James B. Wilson
