# Switchgrass, carted, 2022

Dataset: openLCA process, unit process
Category: 11: Agriculture, Forestry, Fishing and Hunting/1151: Support Activities for Crop Production
Geography: Northern America
Time period: 1899-12-31 to 1899-12-31
Allocation method: no allocation
Generated by: Daniel Inman
Published in: Hsu, D.
isCopyrightProtected: false
restrictionsDescription: All information can be accessed by everybody.

## Geography
North America

## Reference product
- Switchgrass, carted [RNA]: 9070 kg; = 9.07*1000

## Inputs from technosphere
- Switchgrass, harvested, wet [RNA]: 9070 kg; = 9.07*1000
- Transport, combination truck, diesel powered [RNA]: 150.4 t*km
  Proxy: Transport, lorry >32t, EURO5/RER with US electricity U.
- Transport, tractor and trailer: 7.42 t*km

## Sources
- Jacobson, J.J.
- Hess, J.
- Hsu, D.
