# Sludge hauling and landfill; wastewater treatment unit; Level 1

Dataset: openLCA process, unit process
Category: 56: Administrative and Support and Waste Management and Remediation Services/5622: Waste Treatment and Disposal
Geography: United States
Time period: 2015-01-01 to 2025-12-31
Allocation method: physical allocation
Data quality: US EPA - Process Pedigree Matrix (2;2)
Generated by: Franklin Associates, A Division of ERG
Owner: U.S. EPA
Published in: U.S. EPA 2023
isCopyrightProtected: false
restrictionsDescription: These U.S. LCI Database Project data ("Data") are provided by the National Renewable Energy Laboratory ("NREL"), operated by the Alliance for Sustainable Energy, LLC ("Alliance") for the US Department of Energy ("DOE") under Contract No. DE-AC36-08GO28308. The United States Government (the "Government") retains and the user acknowledges that the Government retains a non-exclusive, paid-up, irrevocable, worldwide license to publish or reproduce the published form of these data, or allow others to do so, for Government purposes. Access to and use of these Data shall impose the following obligations on the user, as set forth in this Agreement. The user is granted the right, without any fee or cost, to use, copy, modify, alter, enhance and distribute these Data for any purpose whatsoever, provided that this entire notice appears in all copies of the Data. Any modification, alteration or enhancement of these data shall be identified and documented by the user. Further, the user agrees to credit the DOE/NREL/Alliance in any publication that results from the use of these Data. The names DOE/NREL/Alliance, however, may not be used in any advertising or publicity to endorse or promote any products or commercial entities unless specific written permission is obtained from DOE/NREL/Alliance. The user also understands that DOE/NREL/Alliance is not obligated to provide the user with any support, consulting, training or assistance of any kind with regard to the use of these Data or to provide the user with any updates, revisions or new versions of these Data. YOU AGREE TO INDEMNIFY THE GOVERNMENT AND DOE/NREL/ALLIANCE, AND ITS SUBSIDIARIES, AFFILIATES, OFFICERS, AGENTS, AND EMPLOYEES AGAINST ANY CLAIM OR DEMAND, INCLUDING REASONABLE ATTORNEYS' FEES, RELATED TO YOUR USE OF THESE DATA. THESE DATA ARE PROVIDED BY DOE/NREL/ALLIANCE "AS IS" AND ANY EXPRESS OR IMPLIED WARRANTIES, INCLUDING BUT NOT LIMITED TO, THE IMPLIED WARRANTIES OF MERCHANTABILITY AND FITNESS FOR A PARTICULAR PURPOSE ARE DISCLAIMED. IN NO EVENT SHALL THE GOVERNMENT OR DOE/NREL/ALLIANCE BE LIABLE FOR ANY SPECIAL, INDIRECT OR CONSEQUENTIAL DAMAGES OR ANY DAMAGES WHATSOEVER, INCLUDING BUT NOT LIMITED TO CLAIMS ASSOCIATED WITH THE LOSS OF DATA OR PROFITS, WHICH MAY RESULT FROM AN ACTION IN CONTRACT, NEGLIGENCE OR OTHER TORTIOUS CLAIM THAT ARISES OUT OF OR IN CONNECTION WITH THE ACCESS, USE OR PERFORMANCE OF THESE DATA.

## General comment
This gate-to gate process reflects landfill disposal of biosolids generated during the treatment of 1 cubic meter of wastewater by the (linked) conventional plug flow activated sludge, Level 1 treatment system. Inventory data was generated for a theortical process configuration treating on average 10 million gallons per day of wastewater. Key information is available in process metadata. Full process documentation is available in EPA report number 832-R-21-006A.

System boundaries of the disposal process include biosolids transport, basic infrastructure required for sludge storage at the WWTP, landfill fugitive methane emissions, emissions of toxic organics and heavy metals in landfill leachate, and the option to include an avoided electricity benefit associated with energy recovery of landfill gas.

## Technology
Sanitary Landfill with landfill gas collection. Sludge is trucked 50 miles, roundtrip, to the landfill.

## Time period
Avoided electricity is expected to be the most time sensitive parameter in the landfill LCI.

## Parameters
- Energy_Recovered: 0
  1 = included, 0 = excluded

## Reference product
- Sludge hauling and landfill; wastewater treatment unit: 1 m3; input

## Avoided products
- Electricity, AC, 120 V: 0 MJ; = 0.0817*Energy_Recovered; provider Electricity; at user; consumption mix - US - US

## Inputs from technosphere
- Excavation, hydraulic digger: 5.53353e-7 m3; provider Excavation, hydraulic digger Bridge; USLCI to USEEIO
- Transport, single unit truck, short-haul, diesel powered [RNA]: 0.086393 t*km
- Building construction, hall, steel construction: 3.76281e-5 m3; provider Building construction, hall, steel construction Bridge; USLCI to USEEIO
- Concrete, at plant: 2.39103e-10 m3; provider Concrete Bridge; USLCI to USEEIO

## Emissions to nature
- Gemfibrozil [emission, ground]: 2.8525e-8 kg
- Lead(II) [emission, ground]: 6.74339e-7 kg
- Estrone [emission, ground]: 2.06074e-10 kg
- 2-[4-[2-hydroxy-3-(propan-2-ylamino)propoxy]phenyl]acetamide [emission, ground]: 4.30071e-9 kg
- Zinc(II) [emission, ground]: 7.35363e-6 kg
- Octylphenol [emission, ground]: 4.13e-9 kg
- (4R,4aR,7aR,12bS)-9-methoxy-3-methyl-1,2,4,4a,5,6,7a,13-octahydro-4,12-methanobenzofuro[3,2-e]isoquinolin-7-one [emission, ground]: 6.875e-10 kg
- (3R,5R)-7-[2-(4-fluorophenyl)-4-[(2-hydroxyphenyl)carbamoyl]-3-phenyl-5-propan-2-ylpyrrol-1-yl]-3,5-dihydroxyheptanoic acid [emission, ground]: 7.5e-10 kg
- Di-n-octyl phthalate [emission, ground]: 1.2425e-8 kg
- Triclocarban [emission, ground]: 3.1125e-9 kg
- 4-Androstenedione [emission, ground]: 1.22348e-9 kg
- Diclofenac [emission, ground]: 7.78878e-9 kg
- (2-hydroxy-4-methoxyphenyl)-phenylmethanone [emission, ground]: 3.885e-9 kg
- Triclosan [emission, ground]: 6.70587e-9 kg
- (3R,5R)-7-[2-(4-fluorophenyl)-4-[(4-hydroxyphenyl)carbamoyl]-3-phenyl-5-propan-2-ylpyrrol-1-yl]-3,5-dihydroxyheptanoic acid [emission, ground]: 7.5e-10 kg
- N,N-Diethyl-m-toluamide [emission, ground]: 4.9625e-9 kg
- Mercury(II) [emission, ground]: 1.00181e-7 kg
- 1-(3,5,5,6,8,8-hexamethyl-6,7-dihydronaphthalen-2-yl)ethanone [emission, ground]: 5.88126e-9 kg
- Butyl benzyl phthalate [emission, ground]: 1.584e-10 kg
- 2,6-Di-tert-butyl-p-cresol [emission, ground]: 2.5625e-9 kg
- 1-(6-tert-butyl-1,1-dimethyl-2,3-dihydroinden-4-yl)ethanone [emission, ground]: 4.98313e-10 kg
- Diuron [emission, ground]: 4.0875e-10 kg
- Butylated hydroxyanisole [emission, ground]: 1e-9 kg
- 4,4'-Isopropylidenediphenol [emission, ground]: 1.26008e-8 kg
- Acetamide [emission, ground]: 5.23336e-8 kg
- Nickel(II) [emission, ground]: 4.59614e-7 kg
- Nonylphenol [emission, ground]: 6.51351e-9 kg
- Testosterone [emission, ground]: 5.2875e-10 kg
- Methane [emission, air]: 0.00255636 kg
- Copper(II) [emission, ground]: 2.01933e-6 kg
- Chromium(III) [emission, ground]: 1.87524e-6 kg
- Benzeneacetic acid, .alpha.-methyl-4-(2-methylpropyl)- [emission, ground]: 4.32039e-8 kg
- Sulfamethoxazole [emission, ground]: 5.27266e-11 kg
- Trimethoprim [emission, ground]: 1.1925e-10 kg
- 2-(4-chlorophenoxy)-2-methylpropanoic acid [emission, ground]: 1.8963e-9 kg
- Phenytoin [emission, ground]: 1.0625e-9 kg
- 3-[bis(2-carboxyethyl)phosphanyl]propanoic acid [emission, ground]: 1.525e-9 kg
- Tris(2-chloroethyl) phosphate [emission, ground]: 7.5e-9 kg
- 4,6,6,7,8,8-hexamethyl-1,3,4,7-tetrahydrocyclopenta[g]isochromene [emission, ground]: 1.53964e-8 kg
- 1-(1,1,2,3,3,6-hexamethyl-2H-inden-5-yl)ethanone [emission, ground]: 1.098e-10 kg
- (8S,9S,10R,13S,14S,17S)-17-acetyl-10,13-dimethyl-1,2,6,7,8,9,11,12,14,15,16,17-dodecahydrocyclopenta[a]phenanthren-3-one [emission, ground]: 1.16438e-10 kg
- (3R,5R)-7-[2-(4-fluorophenyl)-3-phenyl-4-(phenylcarbamoyl)-5-propan-2-ylpyrrol-1-yl]-3,5-dihydroxyheptanoic acid [emission, ground]: 2.475e-9 kg
- Benzophenone [emission, ground]: 2.715e-9 kg
- (2S)-2-(6-methoxynaphthalen-2-yl)propanoic acid [emission, ground]: 5.30786e-9 kg
- Estradiol [emission, ground]: 5.94e-11 kg
- Cadmium(II) [emission, ground]: 1.43529e-7 kg
- 1-(4-tert-butyl-2,6-dimethyl-3,5-dinitrophenyl)ethanone [emission, ground]: 3.71875e-10 kg
- Atrazine [emission, ground]: 6.875e-11 kg

## Inventory method
Attributional process. Gate-to-gate. Includes option to include avoided energy product associated with landfill gas collection and energy capture. Process defaults to exclude the avoided product.

## Modelling constants
Inventory data was generated for a theortical process configuration treating on average 10 million gallons per day of wastewater. The CAPDET Works software package (maintained by Hydromantis) is the source of inventory data for sludge transport and basic infrastructure. Landfill methane production was calculated using methods described in Appendix F of the study report. Fugitive methane emissions were estimated using methods from the IPCC greenhouse gas inventory guidelines. Emissions of disinfecton by-products, heavy metals and toxic organics were estimated based on typical influent concentrations, estimated removal within wastewater treatment processes and partitioning to sludge as identified in the literature. A 5% leakage rate was assumed for landfill leachate.

## Completeness
A mass balance was used to partition DBPs, toxic organics and heavy metals between biosolids, wastewater effluent and the share of each compound that biodegrades. Degradation by-products are not tracked within the inventory.

## Data selection
All outputs of the CAPDET model that could be used to develop LCI data were included in the model. Additional data on fugitive methane emissions to air and the partitioning of disinfection by-products, toxic organics and heavy metals to sludge and subsequent release in landfill leachate were developed from literature sources to supplement gaps in the inventory.

## Data treatment
Outputs of the CAPDET model are reported on an annual (energy, chemicals) or lifetime (infrastructure) basis. Annual quantities are standardized to the functional unit by dividing by the average quantity of wastewater treated per year. For inventory data reported on a lifetime basis, quantities are standardized to the functional unit by amortizing the inventory item over the expected lifespan of the infrastructure component. See Appendices B, C and D of the study report for a detailed explanation of the methods and data used to model the fate of disinfection by-products, heavy metals and toxic organics.

## Data collection
2014-2019

## Sampling procedure
"System boundaries of the treatment process include sludge transport, basic sludge storage infrastructure (excavation, concrete, steel), and toxic organic, metal and fugitive methane emissions from a landfill. Avoided energy benefits can be included by setting the value of the included process parameter to 1. To reflect the full scope of wastewater treatment impacts this process must be used with the associated wastwater treatment and effluent release processes. Inventory data was derived from model runs in CAPDET Works and supplemented with values developed using basic engineering calculations and values derived from literature. Uncertainty data is not included for this process.
"

## Use advice
This process reflects the landfilling of biosolids produced during the treatment of 1 m3 of wastewater in a Conventional plug flow activated sludge, Level 1 based treatment system. Impacts associated with effluent release and wastewater treatment are modeled in separate (linked) processes. This process is only intended to be used with the linked wastewater and effluent processes.

## Intended application
This process is intended to be used as a background process by LCA practitioners, industry and the general public to reflect the impact of wastewater treatment within their product systems. This process must be used in conjunction with the associated wastewater treatment and effluent release processes to model the full scope of wastewater treatment impacts. The inventory should be sufficient to model TRACI 2.1 and USETox impact categories.

Situation C2 - Accounting, without system-external interatctions. The intended application is a purely descriptive accounting / documentation of the analysed system excluding existing interactions with other systems in the LCI model.

## Project
Data were prepared by Eastern Research Group (ERG) on behalf of the U.S. EPA under Contract No. EP-C-14-022 WA 1-11, "LCA and Cost Assessment of Nutrient Removal Technologies"

## Sources
- CAPDETWorks Wastewater Model Version 3.
