# Crude oil, off-shore domestic, at extraction

Dataset: openLCA process, unit process
Category: 21: Mining, Quarrying, and Oil and Gas Extraction/2111: Oil and Gas Extraction
Geography: United States
Time period: 2006-01-01 to 2013-12-31
Allocation method: no allocation
Data quality: US EPA - Process Pedigree Matrix (4;1)
Generated by: Franklin Associates, A Division of ERG
Published in: Franklin Associates (2020). Cradle-to-Gate Life Cycle Analysis of Olefins
isCopyrightProtected: false
restrictionsDescription: These U.S. LCI Database Project data ("Data") are provided by the National Renewable Energy Laboratory ("NREL"), operated by the Alliance for Sustainable Energy, LLC ("Alliance") for the US Department of Energy ("DOE") under Contract No. DE-AC36-08GO28308. The United States Government (the "Government") retains and the user acknowledges that the Government retains a non-exclusive, paid-up, irrevocable, worldwide license to publish or reproduce the published form of these data, or allow others to do so, for Government purposes.
Access to and use of these Data shall impose the following obligations on the user, as set forth in this Agreement. The user is granted the right, without any fee or cost, to use, copy, modify, alter, enhance and distribute these Data for any purpose whatsoever, provided that this entire notice appears in all copies of the Data. Any modification, alteration or enhancement of these data shall be identified and documented by the user. Further, the user agrees to credit the DOE/NREL/Alliance in any publication that results from the use of these Data. The names DOE/NREL/Alliance, however, may not be used in any advertising or publicity to endorse or promote any products or commercial entities unless specific written permission is obtained from DOE/NREL/Alliance. The user also understands that DOE/NREL/Alliance is not obligated to provide the user with any support, consulting, training or assistance of any kind with regard to the use of these Data or to provide the user with any updates, revisions or new versions of these Data.
YOU AGREE TO INDEMNIFY THE GOVERNMENT AND DOE/NREL/ALLIANCE, AND ITS SUBSIDIARIES, AFFILIATES, OFFICERS, AGENTS, AND EMPLOYEES AGAINST ANY CLAIM OR DEMAND, INCLUDING REASONABLE ATTORNEYS' FEES, RELATED TO YOUR USE OF THESE DATA. THESE DATA ARE PROVIDED BY DOE/NREL/ALLIANCE "AS IS" AND ANY EXPRESS OR IMPLIED WARRANTIES, INCLUDING BUT NOT LIMITED TO, THE IMPLIED WARRANTIES OF MERCHANTABILITY AND FITNESS FOR A PARTICULAR PURPOSE ARE DISCLAIMED. IN NO EVENT SHALL THE GOVERNMENT OR DOE/NREL/ALLIANCE BE LIABLE FOR ANY SPECIAL, INDIRECT OR CONSEQUENTIAL DAMAGES OR ANY DAMAGES WHATSOEVER, INCLUDING BUT NOT LIMITED TO CLAIMS ASSOCIATED WITH THE LOSS OF DATA OR PROFITS, WHICH MAY RESULT FROM AN ACTION IN CONTRACT, NEGLIGENCE OR OTHER TORTIOUS CLAIM THAT ARISES OUT OF OR IN CONNECTION WITH THE ACCESS, USE OR PERFORMANCE OF THESE DATA.

## General comment
This cradle-to-gate unit process is for 1 kg of crude oil from domestic, off-shore sources. Crude oil extraction inputs include energy from natural gas, petroleum and other fossil fuels in addition to electricity use. The energy inputs are assumed to be the same for the domestic and imported on-shore and off-shore extraction processes. The energy inputs of this process are taken from GREET model 2017. The emission data for the process is adapted from inventory data compiled by the National Energy Technology Lab.

## Technology
Oil is produced by drilling into porous rock structures generally located several thousand feet underground. Once an oil deposit is located, numerous holes are drilled and lined with steel casing. Some oil is brought to the surface by natural pressure in the rock structure, although most oil requires energy to drive pumps that lift oil to the surface. Once oil is on the surface, it is separated from water and stored in tanks before being transported to a refinery. In some cases, it is immediately transferred to a pipeline that transports the oil to a larger terminal.

## Geography
This process is representative of U.S. domestic, off-shore crude oil extraction.

## Time period
This unit process is representative of data collected for crude oil extraction from 2006-2013.

## Reference product
- Crude oil, at extraction: 1 kg

## Inputs from technosphere
- Residual fuel oil, combusted in industrial boiler [RNA]: 2.24e-7 l
- Electricity, AC, 120 V: 0.1584 MJ; provider Electricity; at user; consumption mix - US - US
  This electricity value has been updated from the original report inventory due to an error.
- Gasoline, combusted in equipment [RNA]: 5.26e-7 l
- Diesel, combusted in industrial boiler [RNA]: 2.24e-7 l
- Diesel, combusted in industrial equipment [RNA]: 3.67e-6 l
  Includes diesel fuel and distillate oil amounts.
- Natural gas, combusted in industrial boiler [RNA]: 1.76e-5 m3

## Waste to treatment
- Disposal, solid waste, process, to sanitary landfill: 0.0247 kg

## Emissions to nature
- Nitrogen oxides [emission, air]: 0.00071 kg
- Particulate matter, > 2.5μm and ≤ 10μm [emission, air]: 1.61e-8 kg
- Carbon monoxide [emission, air]: 0.000605 kg
- Chlorine [emission, water]: 2.07e-10 kg
- Sulfur dioxide [emission, air]: 2.71e-5 kg
- Volatile organic compounds [emission, air]: 0.000181 kg
- Particulate matter, ≤ 2.5μm [emission, air]: 6.96141e-6 kg
- Carbon dioxide [emission, air]: 0.204 kg

## Inventory method
Attributional; cradle to gate process. Compatible with TRACI.

## Modelling constants
Secondary data adapted from from GREET and NETL.

## Completeness
TREATMENT OF MISSING ENVIRONMENTAL DATA: Elementary flows are cut-off at less than 1% based on environmental relevance.
TREATMENT OF MISSING TECHNOSPHERE DATA: Miscellaneous materials and additives, capital equipment, facilities and infrastructure, space conditioning, and support personnel requirements are not included in this system process. No gaps have been identified in this dataset.
MASS BALANCE: The mass balance was calculated by a straight comparison of inputs and outputs

## Data selection
Crude oil extraction data adapted from NETL and GREET datasets.

## Data treatment
Emission data for this process is adapted from inventory data compiled by the National Energy Technology Lab. The inventory for crude oil extraction accounts for emissions to air as reported in the NEI for U.S. extraction sites, greenhouse gas emissions from Cooney et. al. 2017, and emissions to water from EPA’s Discharge Monitoring Reports. Emissions data from each U.S. county were allocated between oil extraction and natural gas based on North American Industry Classification System (NAICS) and source classification codes included in the NEI. For cases in which not enough detail was provided from emissions records, emissions were allocated between oil and gas in that county based on the energy content of reported production.

Solid wastes include drilling wastes and associated wastes as calculated from statistics in EPA 2000 and API 2000. Drilling wastes include solids from brine water and drilling mud, while associated wastes are tank bottoms, contaminated soil and scale or sludges from radioactive materials.

No information was found pertaining to fresh water consumption used in onshore or offshore extraction, and so this is not included. Water is extracted with the oil and is called produced water. This produced water is a brine and so not included as consumed water.

## Data collection
Primary data from GREET was collected from 2006-2013.

## Sampling procedure
BOUNDARY CONDITIONS
The system boundary includes incoming fuel use, crude oil extraction, and process waste management. The following are excluded from the unit process boundary: miscellaneous materials and additives, capital equipment, facilities and infrastructure, space conditioning, and support personnel requirements.

DATA COLLECTION
Secondary data were collected from NETL, National Emissions Inventory, GREET 2017, EPA, and Cooney et al. 2017.

UNCERTAINTY ESTIMATION
No uncertainty analysis was carried out due to the lack of uncertainty data or probability distributions for key parameters, which are often only available as single point estimates from NETL.

## Intended application
The intended application for this process is for accounting purposes as described in Goal Situation C1 from the ILCD Handbook's Detailed Guidance. LCA studies with this intended application offer "purely descriptive documentation of the system under analysis (e.g., a product, sector or country), without being interested in any potential consequences on other parts of the economy.” The studies categorized under Goal Situation C1 do consider existing benefits outside the analyzed system such as recycling. A full inventory of environmental flows are included; thus this unit process can be used for a full range of LCIA impact categories. The target audience of this model includes LCA practitioners, industry, and the general public. For use as an average dataset accepted by the North American plastics/chemical industry. An inventory of environmental emission flows are included to the extent that the producers provided; thus this unit process can be used for a full range of LCIA impact categories. The original study results were analyzed using the TRACI LCIA factors.

## Project
This project was funded by and submitted to the American Chemistry Council. These data are a background dataset used in the Cradle-to-Gate Life Cycle Analysis of Olefins report. Submitted to the American Chemistry Council (ACC). 2020.

## Review 
Internal review of data entry proofreading, mass balance verification and data documentation.

## Sources
- Franklin Associates (2020). Cradle-to-Gate Life Cycle Analysis of Olefins
