# Bauxite, at mine

Dataset: openLCA process, unit process
Category: 21: Mining, Quarrying, and Oil and Gas Extraction/2123: Nonmetallic Mineral Mining and Quarrying
Geography: Global
Time period: 1997-12-31 to 1997-12-31
Allocation method: no allocation
Generated by: Franklin Associates, A Division of ERG
Published in: Franklin Associates, A Division of ERG (2007) LCI Primary Aluminum
isCopyrightProtected: false
restrictionsDescription: All information can be accessed by everybody.

## General comment
Aluminum is the most widely distributed metal in the earth’s crust, with only the nonmetallic elements oxygen and silicon surpassing it in abundance. However, bauxite ore is the only commercially exploited source of aluminum. Although other types of earth, including ordinary clay, contain aluminum, economics favor the use of bauxite. Bauxite is formed by the action of rain and erosion on materials containing aluminum oxide (alumina). The heavy rainfall and warm temperatures of the tropics provide nearly ideal conditions for this process, and most of the world’s bauxite is mined in these regions. Australia is the leading producer of bauxite, followed by Guinea, Jamaica, Brazil, and Guyana. Greater than 99 percent of the total bauxite imported by the U.S. is supplied by these countries. This analysis assumes that the Canadian supply of bauxite is similar to that of the U.S.

Important note: although most of the data in the US LCI database has
undergone some sort of review, the database as a whole has not yet
undergone a formal validation process.
Please email comments to lci@nrel.gov.

## Technology
Mining of bauxite ore.

## Geography
Australia (2%), Jamaica (55 %), Guinea (30%), Brazil (3%), Suriname (1%), and Guyana (9%).

## Reference product
- Bauxite, at mine [GLO]: 1 kg

## Inputs from technosphere
- Electricity, at bauxite mining regions [GLO]: 0.00039683 kWh; provider Electricity, bauxite mining regions
- Diesel, combusted in industrial boiler [RNA]: 0.0043396 l
- Gasoline, combusted in equipment [RNA]: 0.00026705 l
- Transport, ocean freighter, diesel powered [US]: 0.28081 t*km
- Residual fuel oil, combusted in industrial boiler [RNA]: 0.0012518 l
- Transport, ocean freighter, residual fuel oil powered [US]: 2.527 t*km
- Transport, train, diesel powered [RNA]: 0.34901 t*km

## Inputs from nature
- Bauxite [resource, ground, subterranean]: 1 kg

## Waste to treatment
- Disposal, solid waste, unspecified, to unspecified treatment: 0.13604 kg
  Overburden

## Emissions to nature
- Oils, unspecified [emission, non-FEDEFL, water]: 1.9e-9 kg
- Total dissolved solids [emission, water]: 2.1e-7 kg
- Nitrous oxide [emission, air]: 3.4e-7 kg
- Carbon dioxide [emission, air]: 0.00079 kg
- Suspended solids, inorganic [emission, water]: 1.5e-8 kg
- Surfactants [emission, water]: 2.5e-9 kg
- Nitrogen [emission, water]: 6.5e-10 kg
- Carbon monoxide [emission, air]: 3.2e-6 kg
- Nitrogen oxides [emission, air]: 4e-5 kg
- Sulfur oxides [emission, air]: 1.1e-6 kg
- Orthophosphate [emission, water]: 2.5e-9 kg
- Methane [emission, air]: 6.6e-6 kg
- Volatile organic compounds [emission, air]: 4.5e-7 kg
- Particulate matter [emission, air]: 0.00235 kg

## Sources
- US Geological Survey
- The Aluminum Association
- Franklin Associates, A Division of ERG (2007) LCI Primary Aluminum
- Energy Information Administration (EIA)
- IAI Statistical Report: Electrical Power
- US EPA
