# Biogas, burned in flare

Dataset: openLCA process, unit process
Category: 56: Administrative and Support and Waste Management and Remediation Services/5622: Waste Treatment and Disposal
Geography: United States
Time period: 2015-01-01 to 2025-12-31
Generated by: Franklin Associates, A Division of ERG
Owner: U.S. EPA
Published in: U.S. EPA 2023
isCopyrightProtected: false
restrictionsDescription: These U.S. LCI Database Project data ("Data") are provided by the National Renewable Energy Laboratory ("NREL"), operated by the Alliance for Sustainable Energy, LLC ("Alliance") for the US Department of Energy ("DOE") under Contract No. DE-AC36-08GO28308. The United States Government (the "Government") retains and the user acknowledges that the Government retains a non-exclusive, paid-up, irrevocable, worldwide license to publish or reproduce the published form of these data, or allow others to do so, for Government purposes. Access to and use of these Data shall impose the following obligations on the user, as set forth in this Agreement. The user is granted the right, without any fee or cost, to use, copy, modify, alter, enhance and distribute these Data for any purpose whatsoever, provided that this entire notice appears in all copies of the Data. Any modification, alteration or enhancement of these data shall be identified and documented by the user. Further, the user agrees to credit the DOE/NREL/Alliance in any publication that results from the use of these Data. The names DOE/NREL/Alliance, however, may not be used in any advertising or publicity to endorse or promote any products or commercial entities unless specific written permission is obtained from DOE/NREL/Alliance. The user also understands that DOE/NREL/Alliance is not obligated to provide the user with any support, consulting, training or assistance of any kind with regard to the use of these Data or to provide the user with any updates, revisions or new versions of these Data. YOU AGREE TO INDEMNIFY THE GOVERNMENT AND DOE/NREL/ALLIANCE, AND ITS SUBSIDIARIES, AFFILIATES, OFFICERS, AGENTS, AND EMPLOYEES AGAINST ANY CLAIM OR DEMAND, INCLUDING REASONABLE ATTORNEYS' FEES, RELATED TO YOUR USE OF THESE DATA. THESE DATA ARE PROVIDED BY DOE/NREL/ALLIANCE "AS IS" AND ANY EXPRESS OR IMPLIED WARRANTIES, INCLUDING BUT NOT LIMITED TO, THE IMPLIED WARRANTIES OF MERCHANTABILITY AND FITNESS FOR A PARTICULAR PURPOSE ARE DISCLAIMED. IN NO EVENT SHALL THE GOVERNMENT OR DOE/NREL/ALLIANCE BE LIABLE FOR ANY SPECIAL, INDIRECT OR CONSEQUENTIAL DAMAGES OR ANY DAMAGES WHATSOEVER, INCLUDING BUT NOT LIMITED TO CLAIMS ASSOCIATED WITH THE LOSS OF DATA OR PROFITS, WHICH MAY RESULT FROM AN ACTION IN CONTRACT, NEGLIGENCE OR OTHER TORTIOUS CLAIM THAT ARISES OUT OF OR IN CONNECTION WITH THE ACCESS, USE OR PERFORMANCE OF THESE DATA.

## General comment
This process represents the combustion of biogas in a flare. The emission factors were compiled by Environment Canada and are originally drawn from the US EPA's FIRE database.

## Technology
open flare (uncontrolled)

## Reference product
- Biogas, burned in flare: 1 m3; input

## Emissions to nature
- Hydrogen sulfide [emission, air]: 3.92e-6 kg
- Ammonia [emission, air]: 1.82e-5 kg
- Carbon monoxide [emission, air]: 0.00618 kg
- Particulate matter, ≤ 10μm [emission, air]: 0.000849 kg
- Nitrogen oxides [emission, air]: 0.0122 kg
- Sulfur oxides [emission, air]: 0.00043 kg
- Nitrous oxide [emission, air]: 0.000453 kg
- Polycyclic aromatic hydrocarbons [emission, air]: 8.714e-6 kg
- Volatile organic compounds [emission, air]: 2e-5 kg

## Inventory method
attributional

## Completeness
excludes flare infrastructure.

## Data selection
selected maximum emission value from cited studies.

## Data treatment
Values converted to be on the basis of whole biogas.

## Data collection
2014-2019

## Intended application
This process is intended to be used as a background process by LCA practitioners, industry and the general public to reflect the impact of anaerobic digestion biogas combustion.

## Project
Data were prepared by Eastern Research Group (ERG) on behalf of the U.S. EPA under Contract No. EP-C-14-022 WA 1-11, "LCA and Cost Assessment of Nutrient Removal Technologies"

## Sources
- U.S. EPA 2023
