# Ethanol, denatured, wheat straw, biochemical

Dataset: openLCA process, unit process
Category: 31-33: Manufacturing/3251: Basic Chemical Manufacturing
Geography: Northern America
Time period: 2008-12-31 to 2008-12-31
Allocation method: no allocation
Generated by: Daniel Inman
Published in: Hsu, D.
isCopyrightProtected: false
restrictionsDescription: All information can be accessed by everybody.

## Technology
modern

## Geography
North America

## Time period
2009

## Reference product
- Ethanol, denatured, wheat straw, biochemical [RNA]: 26100 kg

## Inputs from technosphere
- Hydrochloric acid, without water, in 30% solution state, at plant [RNA]: 0.333 kg
  boiler chemicals http://www.accepta.com/water_treatment_chemicals/boiler-water-treatment.asp
- Ethanol fermentation plant: 2.97e-5 Item(s)
  plant lifetime is 20 years. only need 1 hr. 90000 tons of ethanol is about 31 Mgal/yr in ecoinvent process.
- Enzyme, Cellulase, Novozyme Celluclast [RER]: 571 kg
  calculated based on regression fit of several aspen sensitivity runs.
- Phosphorous fertilizer, production mix, at plant [RNA]: 163 kg
  Proxy: Diammonium phosphate, as N, at regional storehouse/RER with US electricity U
- Chemicals organic, at plant: 24.9 kg
  waste water chemicals. assumed 50% organic.
- Chemicals inorganic, at plant: 1.9 kg
  cooling tower chemicals. assumed all were inorganic.
- Sodium hydroxide; chlor-alkali electrolysis; at plant: 0.333 kg; provider Chlorine; chlor-alkali electrolysis; at plant
  boiler chemicals http://www.accepta.com/water_treatment_chemicals/boiler-water-treatment.asp. Proxy: Sodium hydroxide, 50% in H2O, production mix, at plant/RER with US electricity U
- Electricity, AC, 120 V: 70560 MJ; provider Electricity; at user; consumption mix - US - US
  Proxy: Electricity, medium voltage, at grid/US with US electricity U
- Wheat straw, at conversion plant [RNA]: 98000 kg; = 98.0*1000; provider Wheat straw, at conversion plant, 2022
  Tentatively assume 50/50 mix of spring and winter wheat
- Corn steep liquor [RNA]: 1300 kg
- Sulphite, at plant: 0.333 kg
  (same comment as for Hydrochloric acid, without water, in 30% solution state, at plant)
- Sulfuric acid, at plant [RNA]: 3340 kg
- Combustion, wet wood residue, AP-42 [RNA]: 649.914 MJ; = 616000.0*0.0010550559
  HHV is from GREET for corn stover. From http://www1.eere.energy.gov/biomass/docs/energy_analysis.ppt#346,8,Feedstock Potential, 37% of feed energy is in non-ethanol producing reactants.
  Converted to MJ from BTU units originally submitted - USLCI Curator January 2021
- Gasoline, at refinery: 464 l; provider Petroleum refining, at refinery
  About a 0.6% impurity content in product stream (water, CO2, alcohols)
- Quicklime, at plant [RNA]: 2440 kg
  proxy: Lime, hydrated, packed, at plant/CH with US electricity U
- Energy, output: 70560 MJ
  from electricity

## Inputs from nature
- Water [resource, water, subterranean]: 180000 kg
  calculated based on regression fit of several aspen sensitivity runs.
- Oxygen [resource, air]: 62100 kg
  calculated based on regression fit of several aspen sensitivity runs.
- Nitrogen [resource, air]: 210000 kg
  calculated based on regression fit of several aspen sensitivity runs.
- Water [resource, water, subterranean]: 6290 kg
  Water brought in with enzyme stream. calculated based on regression fit of several aspen sensitivity runs.

## Waste to treatment
- Disposal, inert waste, 5% water, to inert material landfill: 15800 kg
  gypsum waste. calculated based on regression fit of several aspen sensitivity runs.

## Emissions to nature
- Nitrogen dioxide [emission, air]: 54.4 kg
- Sulfuric acid [emission, air]: 1.55 kg
- Methane [emission, air]: 3.84 kg
- Carbon monoxide [emission, air]: 54.4 kg
- Acetic acid [emission, air]: 110 kg
- Sulfur dioxide [emission, air]: 100 kg
- Nitrogen [emission, air]: 211000 kg
- Oxygen [emission, air]: 16200 kg
- Organic compounds [emission, air]: 1400 kg
  furfural, glyceral, sccacid, csl, xylose, solslds, lgnsol, HMF, arabanose, galactose, glucoolig, cellob, xylolig, extract, protein
- Orthophosphate [emission, air]: 149 kg
  placeholder for diammonium phosphate
- Water [emission, water]: 215000 kg
- Carbon dioxide [emission, air]: 82200 kg
- Methyl lactate [emission, air]: 16.2 kg
  placeholder for lactic acid

## Sources
- Hess, J.
- Hsu, D.
