# Transport, train, diesel powered

Dataset: openLCA process, unit process
Category: 48-49: Transportation and Warehousing/4821: Rail Transportation
Geography: United States
Time period: 2012-01-01 to 2012-12-31
Allocation method: no allocation
Data quality: US EPA - Process Pedigree Matrix (4;5)
Generated by: Franklin Associates, A Division of ERG
Owner: Argonne National Laboratory
Published in: Argonne National Laboratory, 2023, GREET
isCopyrightProtected: false
restrictionsDescription: These U.S. LCI Database Project data ("Data") are provided by the National Renewable Energy Laboratory ("NREL"), operated by the Alliance for Sustainable Energy, LLC ("Alliance") for the US Department of Energy ("DOE") under Contract No. DE-AC36-08GO28308. The United States Government (the "Government") retains and the user acknowledges that the Government retains a non-exclusive, paid-up, irrevocable, worldwide license to publish or reproduce the published form of these data, or allow others to do so, for Government purposes.
Access to and use of these Data shall impose the following obligations on the user, as set forth in this Agreement. The user is granted the right, without any fee or cost, to use, copy, modify, alter, enhance and distribute these Data for any purpose whatsoever, provided that this entire notice appears in all copies of the Data. Any modification, alteration or enhancement of these data shall be identified and documented by the user. Further, the user agrees to credit the DOE/NREL/Alliance in any publication that results from the use of these Data. The names DOE/NREL/Alliance, however, may not be used in any advertising or publicity to endorse or promote any products or commercial entities unless specific written permission is obtained from DOE/NREL/Alliance. The user also understands that DOE/NREL/Alliance is not obligated to provide the user with any support, consulting, training or assistance of any kind with regard to the use of these Data or to provide the user with any updates, revisions or new versions of these Data.
YOU AGREE TO INDEMNIFY THE GOVERNMENT AND DOE/NREL/ALLIANCE, AND ITS SUBSIDIARIES, AFFILIATES, OFFICERS, AGENTS, AND EMPLOYEES AGAINST ANY CLAIM OR DEMAND, INCLUDING REASONABLE ATTORNEYS' FEES, RELATED TO YOUR USE OF THESE DATA. THESE DATA ARE PROVIDED BY DOE/NREL/ALLIANCE "AS IS" AND ANY EXPRESS OR IMPLIED WARRANTIES, INCLUDING BUT NOT LIMITED TO, THE IMPLIED WARRANTIES OF MERCHANTABILITY AND FITNESS FOR A PARTICULAR PURPOSE ARE DISCLAIMED. IN NO EVENT SHALL THE GOVERNMENT OR DOE/NREL/ALLIANCE BE LIABLE FOR ANY SPECIAL, INDIRECT OR CONSEQUENTIAL DAMAGES OR ANY DAMAGES WHATSOEVER, INCLUDING BUT NOT LIMITED TO CLAIMS ASSOCIATED WITH THE LOSS OF DATA OR PROFITS, WHICH MAY RESULT FROM AN ACTION IN CONTRACT, NEGLIGENCE OR OTHER TORTIOUS CLAIM THAT ARISES OUT OF OR IN CONNECTION WITH THE ACCESS, USE OR PERFORMANCE OF THESE DATA.

## General comment
This cradle-to-gate unit process is for the transport of 1 tonne of freight 1 kilometer via diesel powered rail. This data is from The Greenhouse Gases, Regulated Emissions, and Energy Use in Transportation 2023 Model (GREET).

## Technology
Combustion of diesel in a freight train. The energy intensity per ton-kilometer for freight railroad is calculated as: (Fuel Use * Heating Value)/Revenue Ton Kilometers.

## Geography
This process is representative of freight train transport in the United States.

## Time period
This unit process is representative of freight train operation and fuel consumption in the year 2012.

## Reference product
- Transport, train, diesel powered [RNA]: 1 t*km

## Inputs from technosphere
- Diesel, at refinery: 0.006482 l; provider Petroleum refining, at refinery

## Emissions to nature
- Methane [emission, air]: 1.27612e-6 kg
- Nitrous oxide [emission, air]: 3.98689e-7 kg
- Volatile organic compounds [emission, air]: 5.38316e-6 kg
- Carbon monoxide [emission, air]: 9.24424e-6 kg
- Particulate matter, ≤ 10μm [emission, air]: 1.2833e-6 kg
- Nitrogen oxides [emission, air]: 7.78836e-5 kg
- Sulfur oxides [emission, air]: 1.01427e-7 kg
- Carbon dioxide [emission, air]: 0.0145877 kg
- Particulate matter, ≤ 2.5μm [emission, air]: 1.2448e-6 kg
- Total Organic Carbon [emission, air]: 1.10289e-6 kg
- Carbon black [emission, air]: 1.04563e-7 kg

## Inventory method
Cradle-to-gate

## Modelling constants
This process was adapted from GREET, 2023.

## Completeness
TREATMENT OF MISSING ENVIRONMENTAL DATA: Unknown. Refer to GREET, 2023

TREATMENT OF MISSING TECHNOSPHERE DATA: Unknown. Refer to GREET, 2023

MASS BALANCE: Unknown. Refer to GREET, 2023

## Data selection
This dataset was sourced from GREET, 2023. No data was excluded.

## Data treatment
Unit conversions were applied.

## Data collection
Data from GREET was collected in 2012. GREET also references data from the following years: 1995, 2000, 2005, and 2010; it is unclear what data was collected in this years.

## Sampling procedure
BOUNDARY CONDITIONS: Pump to wheel, includes combustion emissions

DATA COLLECTION: The data for total revenue ton-kilometers and fuel consumption by year are obtained from Railroad Facts 2013 published by Association of American Railroads (2014) and were published in the GREET model in 2014.

UNCERTAINTY ESTIMATION: Unknown. Refer to GREET, 2023

## Intended application
The intended application for this process is for accounting purposes as described in Goal Situation C1 from the ILCD Handbook's Detailed Guidance. LCA studies with this intended application offer "purely descriptive documentation of the system under analysis (e.g., a product, sector or country), without being interested in any potential consequences on other parts of the economy.” The studies categorized under Goal Situation C1 do consider existing benefits outside the analyzed system such as recycling. These data are an update to a previously published dataset.

## Project
USLCI curator updates

## Sources
- Argonne National Laboratory, 2023, GREET
- Association of American Railroads, 2014
- Argonne National Laboratory, 2013
- American Public Transportation Association, 2014
- Oak Ridge National Laboratory, 2014
- Argonne National Laboratory, 2012
- Federal Transit Administration, 2012
