# RFO, combusted in industrial boiler, at pulp and paper mill (EXCL.)

Dataset: openLCA process, unit process
Category: 31-33: Manufacturing/3221: Pulp, Paper, and Paperboard Mills
Geography: Northern America
Time period: 1997-12-31 to 2000-12-31
Allocation method: no allocation
Generated by: Caroline Gaudreault
Published in: Franklin Associates (2003) Residual Oil Industrial Combustion
isCopyrightProtected: false
restrictionsDescription: All information can be accessed by everybody.

## General comment
This process was built to be used within the processes named "Fuels burned at bleached kraft market pulp mill", "Fuels burned at uncoated freesheet paper mill", "Fuels burned at coated freesheet paper mill", "Fuels burned at uncoated mechanical paper mill", "Fuels burned at coated mechanical paper mill" and "Fuels burned at bag and sack paper mill". It was built from the process named "Residual fuel oil (RFO), combusted in industrial boiler" v.1.6 available in the US LCI database. Transport and waste processes were removed. The following emissions to air were excluded (excl.): Sulfur oxidesand Nitrogen oxides. These processes and emissions are reported in pulp and paper mill process chain in which this process is integrated.
Important note: although most of the data in the US LCI database has
undergone some sort of review, the database as a whole has not yet
undergone a formal validation process.
Please email comments to lci@nrel.gov.

## Technology
Residual oil combustion in average industrial boiler

## Geography
United States

## Reference product
- RFO, combusted in industrial boiler, at pulp and paper mill (EXCL.) [RNA]: 1 l

## Inputs from technosphere
- Residual fuel oil, at refinery [RNA]: 1 l; provider Petroleum refining, at refinery

## Emissions to nature
- Volatile organic compounds [emission, air]: 3.5907e-5 kg
- Formaldehyde [emission, air]: 3.9543e-6 kg
- Chromium [emission, air]: 1.0125e-7 kg
- Naphthalene [emission, air]: 1.354e-7 kg
- Arsenic [emission, air]: 1.5817e-7 kg
- Hydrochloric acid [emission, air]: 8.3807e-5 kg
- Particulate matter, > 2.5μm and ≤ 10μm [emission, air]: 0.00024267 kg
- Cadmium [emission, air]: 4.7691e-8 kg
- Mercury [emission, air]: 1.354e-8 kg
- Manganese [emission, air]: 3.5948e-7 kg
- Suspended solids, inorganic [emission, water]: 1.2872e-6 kg
- Beryllium [emission, air]: 3.3312e-9 kg
- Benzene [emission, air]: 2.5643e-8 kg
- Tetrachloroethylene [emission, air]: 8.3916e-9 kg
- Cobalt [emission, air]: 7.2136e-7 kg
- Chloride [emission, water]: 8.5811e-9 kg
- Methylene chloride [emission, air]: 5.7773e-7 kg
- Iron [emission, water]: 4.2906e-8 kg
- Oils, unspecified [emission, water]: 6.4359e-7 kg
- Methane [emission, air]: 0.00012784 kg
- Nitrous oxide [emission, air]: 1.4205e-5 kg
- Selenium [emission, air]: 8.1841e-8 kg
- Phenols [emission, air]: 4.3531e-7 kg
- Radionuclides [emission, air]: 0.099393 kBq
- 2,3,7,8-Tetrachlorodibenzo-p-dioxin [emission, air]: 1.7914e-12 kg
- Copper(I) [emission, water]: 4.2906e-8 kg
- Nickel [emission, air]: 1.0125e-5 kg
- Carbon monoxide [emission, air]: 0.00063922 kg
- Carbon dioxide [emission, air]: 3.262 kg
- Lead [emission, air]: 1.8094e-7 kg

## Sources
- Franklin Associates (2003) Residual Oil Industrial Combustion
- Center for Transportation Research, Argo
- EIA
- AF&PA (2010). Printing & Writing Papers LCA
- U.S. EPA Office of Solid Waste and Emerg
- U.S. EPA
- U.S. EPA
