# Fuels, burned at unbleached kraft bag sack paper, average production, at mill

Dataset: openLCA process, unit process
Category: 31-33: Manufacturing/3221: Pulp, Paper, and Paperboard Mills
Geography: Northern America
Time period: 2005-12-31 to 2005-12-31
Allocation method: no allocation
Generated by: Caroline Gaudreault
Published in: AF&PA (2010). LCA North American Unbleached Grocery Bags
isCopyrightProtected: false
restrictionsDescription: All information can be accessed by everybody.

## General comment
Unbleached kraft bag and sack paper, average North American production, at mill. All flows are production-weighted means. Data were developed for a full LCA that was critically reviewed. Reviewers were: • Martha Stevenson, Chairperson – Private Consultant to the public interest with ten years of experience in sustainability, environmental management, packaging and materials recovery; led the development of the Design Guidelines for Sustainable Packaging and the COMPASS software used to compare the environmental impacts of package designs; • Pascal Lesage – Life cycle assessment consultant, Researcher at École Polytechnique de Montréal [at the Inter-University Research Centre for the Life Cycle of Products, Processes and Services (CIRAIG) in Montreal]; and • Dale Phenicie, Environmental Affairs Consulting – Consultant with 35 years of experience in environmental protection and process consulting for the forest products industry. Has served on several U.S. EPA Task Forces dealing with water quality issues and authored several AF&PA Environmental, Health and Safety/Sustainability reports.

## Technology
current technology mix for unbleached kraft bag and sack paper

## Time period
Primary data collected from participating companies and associations for their operational activities are representative for 2006 and 2007.

## Reference product
- Fuels, burned at unbleached kraft bag sack paper, average production, at mill [RNA]: 11045 MJ

## Inputs from technosphere
- Gasoline, combusted in equipment, at pulp and paper mill (EXCL.) [RNA]: 8.058 l
  Gasoline and kerosene, assumed to be gasoline.
- Hog fuel, pur., combusted in industrial boiler, at pulp and paper mill (EXCL.) [RNA]: 132.77 kg
  Purchased hogged fuel. Typically from wood products manufacturing.
- Diesel, combusted in industrial boiler, at pulp and paper mill (EXCL.) [RNA]: 4.4041 l
  Other fossil fuels assumed to be diesel.
- Natural gas, combusted in industrial boiler, at pulp and paper mill (EXCL.) [RNA]: 70.235 m3
- LPG, combusted in industrial boiler, at pulp and paper mill (EXCL.) [RNA]: 0.73606 l
- Hog fuel, self-gen., combusted in ind. boiler, at pulp and paper mill (EXCL.) [RNA]: 76.544 kg
  Combustion of self-generated hogged fuel from pulpwood. Wood inputs are accounted for in the process named Unbleached kraft sack paper, average production, at mill
- RFO, combusted in industrial boiler, at pulp and paper mill (EXCL.) [RNA]: 48.156 l
  All combusted on site. Actually received at supplier, not refinery.
- Bituminous coal, combusted in industrial boiler, at pulp and paper mill (EXCL.) [RNA]: 51.363 kg
- Diesel, combusted in industrial boiler, at pulp and paper mill (EXCL.) [RNA]: 2.012 l
  Proxy for light fuel oil.

## Emissions to nature
- Phenol [emission, air]: 0.0059892 kg
  From black liquor recovery, non-recyclable paper combustion and wastewater residuals combustion
- Silver [emission, air]: 5.1989e-5 kg
  (same comment as for Phenol)
- Copper [emission, air]: 1.2353e-5 kg
  (same comment as for Phenol)
- Arsenic [emission, air]: 1.3226e-6 kg
  (same comment as for Phenol)
- Mercury [emission, air]: 1.4058e-6 kg
  (same comment as for Phenol)
- Nitrogen dioxide [emission, air]: 1.7837 kg
  From all combustion processes at pulp and paper mill.
- Beryllium [emission, air]: 0.00072785 kg
  (same comment as for Phenol)
- Styrene [emission, air]: 0.00010814 kg
  (same comment as for Phenol)
- Methanol [emission, air]: 0.064051 kg
  (same comment as for Phenol)
- Chloroform [emission, air]: 1.2145e-5 kg
  (same comment as for Phenol)
- Cadmium [emission, air]: 3.7432e-5 kg
  (same comment as for Phenol)
- Cresol [emission, air]: 0.001776 kg
  (same comment as for Phenol)
- Trisodium phosphate [emission, air]: 0.011687 kg
  (same comment as for Phenol)
- Sulfur dioxide [emission, air]: 2.1755 kg
  From all combustion processes at pulp and paper mill.
- Barium [emission, air]: 7.1953e-6 kg
  (same comment as for Phenol)
- Vanadium [emission, air]: 7.0706e-7 kg
  (same comment as for Phenol)
- Carbon dioxide [emission, air]: 1183 kg
  (same comment as for Phenol)
- 2,3,7,8-Tetrachlorodibenzo-p-dioxin [emission, air]: 4.1342e-15 kg
  (same comment as for Phenol)
- Hydrochloric acid [emission, air]: 0.035353 kg
  (same comment as for Phenol)
- Hexachlorobenzene [emission, air]: 5.8228e-12 kg
  (same comment as for Phenol)
- Methane [emission, air]: 0.028931 kg
  (same comment as for Phenol)
- Hydrogen sulfide [emission, air]: 0.18808 kg
  Total reduced sulfur assumed to be hydrogen sulfide. From all combustion processes at pulp and paper mill.
- Toluene [emission, air]: 0.00030486 kg
  (same comment as for Phenol)
- Antimony [emission, air]: 4.1592e-5 kg
  (same comment as for Phenol)
- Cumene [emission, air]: 0.00039096 kg
  (same comment as for Phenol)
- Chromium [emission, air]: 5.1989e-6 kg
  (same comment as for Phenol)
- 1,1,2-Trichloroethane [emission, air]: 4.991e-6 kg
  (same comment as for Phenol)
- 1,1,1-Trichloroethane [emission, air]: 2.1503e-5 kg
  (same comment as for Phenol)
- Polycyclic organic matter [emission, air]: 0.00013392 kg
  (same comment as for Phenol)
- Sulfuric acid [emission, air]: 0.012186 kg
  (same comment as for Phenol)
- Lead [emission, air]: 4.0801e-6 kg
  (same comment as for Phenol)
- Nitrous oxide [emission, air]: 0.023122 kg
  (same comment as for Phenol)
- Hydrofluoric acid [emission, air]: 0.00054069 kg
  (same comment as for Phenol)
- Xylene [emission, air]: 0.00044919 kg
  (same comment as for Phenol)
- Acrolein [emission, air]: 0.00015306 kg
  (same comment as for Phenol)
- Acetaldehyde [emission, air]: 0.00703 kg
  (same comment as for Phenol)
- Biphenyl [emission, air]: 7.5281e-5 kg
  (same comment as for Phenol)
- Formaldehyde [emission, air]: 0.00324 kg
  (same comment as for Phenol)
- Carbon tetrachloride [emission, air]: 2.0879e-5 kg
  (same comment as for Phenol)
- Carbon disulfide [emission, air]: 0.0002745 kg
  (same comment as for Phenol)
- Nickel [emission, air]: 1.0023e-5 kg
  (same comment as for Phenol)
- Hexane [emission, air]: 0.0002142 kg
  (same comment as for Phenol)
- Selenium [emission, air]: 0.00082351 kg
  (same comment as for Phenol)
- Methylene chloride [emission, air]: 9.1501e-5 kg
  (same comment as for Phenol)
- Carbon monoxide [emission, air]: 0.078608 kg
  (same comment as for Phenol)
- Benzo[ghi]perylene [emission, air]: 1.6179e-6 kg
  (same comment as for Phenol)
- Tetrachloroethylene [emission, air]: 2.4955e-7 kg
  (same comment as for Phenol)
- Trichloroethylene [emission, air]: 1.1521e-5 kg
  (same comment as for Phenol)
- Propionaldehyde [emission, air]: 0.0027118 kg
  (same comment as for Phenol)
- 1,2,4-Trichlorobenzene [emission, air]: 6.2387e-5 kg
  (same comment as for Phenol)
- Zinc [emission, air]: 2.4955e-5 kg
  (same comment as for Phenol)
- Methyl isobutyl ketone [emission, air]: 0.00019548 kg
  (same comment as for Phenol)
- Naphthalene [emission, air]: 6.821e-5 kg
  (same comment as for Phenol)
- Benzene [emission, air]: 0.000366 kg
  (same comment as for Phenol)
- Chloromethane [emission, air]: 0.021336 kg
  (same comment as for Phenol)
- Manganese [emission, air]: 2.5496e-5 kg
  (same comment as for Phenol)

## Sampling procedure
The survey included results from 9 mills representing 1.17 million short tons per year (TPY), nearly 89% of 2006/2007 North American production volume.

## Sources
- AF&PA (2010). LCA North American Unbleached Grocery Bags
