# White mineral oil, at plant

Dataset: openLCA process, unit process
Category: 31-33: Manufacturing/3241: Petroleum and Coal Products Manufacturing
Geography: Northern America
Time period: 1988-12-31 to 1991-12-31
Allocation method: no allocation
Generated by: Franklin Associates, A Division of ERG
Published in: THE PLASTICS DIVISION OF THE AMERICAN C
isCopyrightProtected: false
restrictionsDescription: All information can be accessed by everybody.

## General comment
Complete inventory data and metadata are available in full in the final report and appendices, Cradle-to-Gate Life Cycle Inventory of Nine Plastic Resins and Four Polyurethane Precursors. This report has been extensively reviewed within Franklin Associates and has undergone partial critical review by ACC Plastics Division members and is available at: www.americanchemistry.com. Quantities may vary slightly between the reference to main source and and this module due to rounding. Important note: although most of the data in the US LCI database has undergone some sort of review, the database as a whole has not yet undergone a formal validation process. Please email comments to lci@nrel.gov.

## Technology
Distillation of crude oil followed by vacuum distillation and hydrotreating, deasphalting, and dewaxing processes

## Geography
North America (US and Canada)

## Reference product
- White mineral oil, at plant [RNA]: 1 kg
  MATERIAL USE

## Inputs from technosphere
- Transport, combination truck, diesel powered [RNA]: 0.0439 t*km
- Transport, train, diesel powered [RNA]: 0.028 t*km
- Residual fuel oil, combusted in industrial boiler [RNA]: 0.182 l
- Petroleum refined, to material use, at refinery: 1 kg; provider Petroleum refined, for material use, at plant
- Liquefied petroleum gas, combusted in industrial boiler [RNA]: 0.00776 l
- Transport, pipeline, unspecified petroleum products [RNA]: 0.345 t*km
- Electricity, AC, 120 V: 1.4904 MJ; provider Electricity; at user; consumption mix - US - US
- Natural gas, combusted in industrial boiler [RNA]: 0.0746 m3

## Emissions to nature
- Methyl ethyl ketone [emission, air]: 0.0001 kg
- Volatile organic compounds [emission, air]: 0.0001 kg
- Phenols [emission, water]: 9e-7 kg
- Chromium [emission, water]: 1.04e-6 kg
- Chromium(VI) [emission, water]: 8.7e-8 kg

## Sampling procedure
Data are from secondary sources.

## Sources
- THE PLASTICS DIVISION OF THE AMERICAN C
