# Soybean oil, crude, degummed, at plant

Dataset: openLCA process, unit process
Category: 31-33: Manufacturing/3112: Grain and Oilseed Milling
Geography: Northern America
Time period: 2006-12-31 to 2006-12-31
Allocation method: physical allocation
Generated by: James Pollack, PE
Published in: Omni Tech International
isCopyrightProtected: false
restrictionsDescription: All information can be accessed by everybody.

## General comment
1. The study (Main Data Source) underwent external peer review prior to this submission to the US LCI database.
2. CARBON SEQUESTRATION should be accounted for after the product is built in its LCA model, and should be included depending on the use of end of life fate of that product. For example, a soy-based resin may retain the sequestered carbon indefinitely, while a soy-based biodiesel releases the sequestered carbon at use phase.
Biomass carbon contents are as follows:
CRUDE SOY OIL: 77% C --> 2.823 kg CO2/kg crude soy oil;
SOY MEAL: 48% C --> 1.76 kg CO2/kg meal;
REFINED SOY OIL: 80.6% C --> 2.955 kg CO2/kg refined soy oil;
BIODIESEL: 77% C --> 2.823 kg CO2/kg biodiesel.
3 ALLOCATION: THE VALUES IN THE "FLOW INFO" SHEET ARE NOT ALLOCATED, BUT THE DEFAULT ALLOCATION IS ON A PHYSICAL BASIS. FOR SENSITIVITY, OR DEPENDING ON YOUR GOAL AND SCOPE, ECONOMIC ALLOCATION MAY ALSO BE USED. FOR EXAMPLE: DECEMBER 2009 ECONOMIC ALLOCATION VALUES WOULD BE: CRUDE OIL: 38%, MEAL: 62%. LCA PRACTITIONERS ARE ENCOURAGED TO RESEARCH AND USE THE LATEST ECONOMIC DATA BEFORE APPLYING ECONOMIC ALLOCATION FACTORS.

## Technology
Representative of current NA production (which has a mix of newer and older technologies)

## Geography
North America (Data was collected by the National Oilseed Processors Association (NOPA).)

## Reference product
- Soy meal, at plant [RNA]: 4131 kg

## By-products
- Soybean oil, crude, degummed, at plant [RNA]: 1000 kg

## Inputs from technosphere
- Residual fuel oil, combusted in industrial boiler [RNA]: 1.51352 l
- Transport, combination truck, diesel powered [RNA]: 1685 t*km
- Heat, from landfill gas: 31.5699 MJ
- Natural gas, combusted in industrial boiler [RNA]: 107.268 m3
- Electricity, AC, 120 V: 1040.4 MJ; provider Electricity; at user; consumption mix - US - US
- Diesel, combusted in industrial boiler [RNA]: 0.816762 l
- Heat, from biomass: 63.1399 MJ
- Hexane, at plant: 2.96 kg
  NOPA's hexane input and air emissions numbers are based on EPA's Vegetable Oil MACT limit of 0.2 gallon of hexane lost/ton of soybeans processed with an assumed specific gravity of hexane of 5.65 pounds/gallon. The MACT limit is a "total loss" limit that reflects total hexane disappearance, the vast majority of which is via air emissions.
- Bituminous coal, combusted in industrial boiler [RNA]: 81.5366 kg
- Soybean grains, at field [RNA]: 5236 kg
  represents 1000 bushels of soybeans

## Inputs from nature
- Water [resource, water]: 2.547e6 kg
  NOPA data reflect individual facility metered water use, which includes water used in cooling towers, steam production, and other process-related equipment.

## Waste to treatment
- Disposal, solid waste, unspecified, to unspecified landfill: 8.7 kg

## Emissions to nature
- Oils, unspecified [emission, non-FEDEFL, water]: 0.14 kg
- Hexane [emission, air]: 2.96 kg

## Allocation factors
- causal, Soybean oil, crude, degummed, at plant, for Transport, combination truck, diesel powered: 0.194894
- causal, Soybean oil, crude, degummed, at plant, for Bituminous coal, combusted in industrial boiler: 0.194894
- causal, Soy meal, at plant, for Residual fuel oil, combusted in industrial boiler: 0.805106
- causal, Soy meal, at plant, for Natural gas, combusted in industrial boiler: 0.805106
- causal, Soybean oil, crude, degummed, at plant, for Residual fuel oil, combusted in industrial boiler: 0.194894
- causal, Soybean oil, crude, degummed, at plant, for Heat, from landfill gas: 0.194894
- causal, Soy meal, at plant, for Heat, from biomass: 0.805106
- physical, Soy meal, at plant: 0.805106
- causal, Soy meal, at plant, for Diesel, combusted in industrial boiler: 0.805106
- causal, Soybean oil, crude, degummed, at plant, for Water: 0.194894
- economic, Soy meal, at plant: 0.805106
- causal, Soy meal, at plant, for Transport, combination truck, diesel powered: 0.805106
- causal, Soybean oil, crude, degummed, at plant, for Oils, unspecified: 0.194894
- causal, Soybean oil, crude, degummed, at plant, for Soybean grains, at field: 0.194894
- causal, Soy meal, at plant, for Soybean grains, at field: 0.805106
- causal, Soybean oil, crude, degummed, at plant, for Natural gas, combusted in industrial boiler: 0.194894
- causal, Soy meal, at plant, for Heat, from landfill gas: 0.805106
- causal, Soybean oil, crude, degummed, at plant, for Hexane, at plant: 0.194894
- causal, Soybean oil, crude, degummed, at plant, for Disposal, solid waste, unspecified, to unspecified landfill: 0.194894
- causal, Soybean oil, crude, degummed, at plant, for Electricity, AC, 120 V: 0.194894
- causal, Soy meal, at plant, for Hexane: 0.805106
- causal, Soybean oil, crude, degummed, at plant, for Heat, from biomass: 0.194894
- economic, Soybean oil, crude, degummed, at plant: 0.194894
- causal, Soy meal, at plant, for Hexane, at plant: 0.805106
- causal, Soy meal, at plant, for Water: 0.805106
- causal, Soy meal, at plant, for Disposal, solid waste, unspecified, to unspecified landfill: 0.805106
- causal, Soy meal, at plant, for Electricity, AC, 120 V: 0.805106
- causal, Soybean oil, crude, degummed, at plant, for Hexane: 0.194894
- causal, Soy meal, at plant, for Oils, unspecified: 0.805106
- causal, Soy meal, at plant, for Bituminous coal, combusted in industrial boiler: 0.805106
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
## Sources
- Omni Tech International
