# Corn grain, at conversion plant, 2022

Dataset: openLCA process, unit process
Category: 48-49: Transportation and Warehousing/4842: Specialized Freight Trucking
Geography: Northern America
Time period: 2009-12-31 to 2099-12-31
Allocation method: no allocation
Generated by: Garvin Heath
Published in: Hsu, D.
isCopyrightProtected: false
restrictionsDescription: All information can be accessed by everybody.

## General comment
This process transports corn grain to the conversion plant. It does so using transportation modal allocation from the USDA Ethanol Backgrounder (2007), assuming this current allocation will apply in 2022. Distances for each mode are from a combination of references; still missing a good distance estimate for barge, but since the share of barge transportation is ~2%, the final result will not be sensititive to this parameter.Infrastructure impacts are included in this process by calling the Ecoinvent "transport" processes.
The production of corn grain feedstock utilized in this transport process allocates inputs to the stover and grain based on the amount of ethanol that can be produced from each co-product (so-called "EtOH allocation").

## Technology
future

## Geography
North America

## Time period
2010

## Reference product
- Corn grain, at conversion plant [RNA]: 1000 kg; = 1.0*1000

## Inputs from technosphere
- Transport, train, diesel powered [RNA]: 200 t*km
  This process uses European train data extrapolated to US by ecoinvent. This process relates to "average" (current) trains, even though emissions will presumably be considerably lower in 2022. Assumes backhauling of gasoline (i.e., no attributable empty return trip). Assumes 2005 modal allocation and distances apply to 2022.
- Transport, barge, diesel powered [RNA]: 11.3 t*km
  assuming barge is for dry goods, barge tanker for liquid. This process relates to "average" (current) barges, even though emissions will presumably be considerably lower in 2022. Assumes backhauling of gasoline (i.e., no attributable empty return trip). Assumes 2005 modal allocation and distances apply to 2022.
- Corn grain, harvested and stored [RNA]: 1000 kg
- Transport, combination truck, diesel powered [RNA]: 67 t*km
  This is the most stringest European emission standard for lorries, though presumably considerably higher than standards in place in 2022. Assumes backhauling of gasoline (i.e., no attributable empty return trip). Assumes 2005 modal allocation and distances apply to 2022.

## Sources
- Hsu, D.
