# Alumina, at plant

Dataset: openLCA process, unit process
Category: 31-33: Manufacturing/3313: Alumina and Aluminum Production and Processing
Geography: Northern America
Time period: 1997-12-31 to 1997-12-31
Allocation method: no allocation
Generated by: Franklin Associates, A Division of ERG
Published in: Franklin Associates, A Division of ERG (2007) LCI Primary Aluminum
isCopyrightProtected: false
restrictionsDescription: All information can be accessed by everybody.

## General comment
Before it can be used in the manufacture of metallic aluminum, bauxite ore must be refined to nearly pure aluminum oxide, usually called alumina. The Bayer process is the preferred method for bauxite refining. Bauxite is crushed and dissolved in digesters using strong caustic soda and lime solution. The undissolved residue, known as red mud, is filtered out. Sodium aluminate remains in solution, where it is hydrolyzed and precipitated as aluminum hydroxide, which is then calcined to alumina in a rotary kiln. Red mud filtered from the digester liquid is considered solid waste in this analysis. Red mud production rates vary depending on the quality of the ore and the level of alumina recovery.
Important note: although most of the data in the US LCI database has undergone some sort of review, the database as a whole has not yet undergone a formal validation process.
Please email comments to lci@nrel.gov.

## Technology
Bayer process for extracting alumina from bauxite.

## Geography
US (49%), Australia (32%), Jamaica (5%), Suriname (13%), and Brazil (1%).

## Reference product
- Alumina, at plant [RNA]: 1 kg

## Inputs from technosphere
- Sodium hydroxide; chlor-alkali electrolysis; at plant: 0.0739 kg; provider Chlorine; chlor-alkali electrolysis; at plant
- Natural gas, combusted in industrial boiler [RNA]: 0.22512 m3
- Gasoline, combusted in equipment [RNA]: 2.3367e-5 l
- Transport, ocean freighter, diesel powered [US]: 0.28097 t*km
- Electricity, alumina refining regions [RNA]: 0.10913 kWh
- Quicklime, at plant [RNA]: 0.0457 kg
- Transport, ocean freighter, residual fuel oil powered [US]: 2.529 t*km
- Residual fuel oil, combusted in industrial boiler [RNA]: 0.09931 l
- Transport, train, diesel powered: 0.4867 t*km
- Bituminous coal, combusted in industrial boiler [RNA]: 0.00859 kg
- Diesel, combusted in industrial boiler [RNA]: 0.0016691 l
- Bauxite, at mine [GLO]: 2.64 kg

## Waste to treatment
- Disposal, solid waste, unspecified, to unspecified treatment: 1.125 kg

## Emissions to nature
- Particulate matter [emission, air]: 0.00045 kg
- Oils, unspecified [emission, non-FEDEFL, water]: 3.9e-7 kg
- Chemical Oxygen Demand [emission, water]: 4.6e-5 kg
- Sodium(I) [emission, water]: 0.00196 kg
- Total dissolved solids [emission, water]: 1e-5 kg
- Biological Oxygen Demand [emission, water]: 6.1e-15 kg
- Phenol [emission, water]: 3.9e-10 kg
- Sulfate [emission, water]: 0.00175 kg
- Methane [emission, air]: 1.7e-5 kg
- Calcium(II) [emission, water]: 5.8e-6 kg
- Mercury [emission, air]: 2.1e-8 kg
- Chlorofluorocarbons [emission, air]: 3.35e-10 kg
- Metals [emission, water]: 6.9e-5 kg
- Chloride [emission, water]: 7.6e-6 kg
- Volatile organic compounds [emission, air]: 4.7e-5 kg
- Fluoride [emission, water]: 7.9e-7 kg
  0
- Mercury [emission, water]: 6.1e-10 kg
- Nitrous oxide [emission, air]: 2.2e-7 kg
- Iron [emission, water]: 1.6e-8 kg
- Hydrochlorofluorocarbons [emission, air]: 3.35e-10 kg
- Suspended solids, inorganic [emission, water]: 0.00013 kg
- Acid compounds [emission, water]: 6.1e-5 kg

## Sources
- The Aluminum Association
- US EPA
- Franklin Associates, A Division of ERG (2007) LCI Primary Aluminum
- US Geological Survey
- Energy Information Administration (EIA)
- IAI Statistical Report: Electrical Power
