# Forest residue, dried, stored

Dataset: openLCA process, unit process
Category: 11: Agriculture, Forestry, Fishing and Hunting/1132: Forest Nurseries and Gathering of Forest Products
Geography: Northern America
Time period: 2007-12-31 to 2007-12-31
Allocation method: no allocation
Generated by: Daniel Inman
Published in: Hsu, D.
isCopyrightProtected: false
restrictionsDescription: All information can be accessed by everybody.

## Technology
average

## Geography
North America

## Time period
2008

## Reference product
- Forest residue, dried, stored [RNA]: 772 kg; = 0.772*1000

## Inputs from technosphere
- Fodder loading, by self-loading trailer: 2.2653 m3
- Forest residue, processed and loaded, at landing system [RNA]: 908 kg; = 0.908*1000
- Conveyor belt, at plant: 3.4747e-5 m
- Transport, combination truck, diesel powered [RNA]: 29.2 t*km
  1.12 is conversion from metric tons to short tons.
- Dried roughage store, non ventilated: 9.5711e-8 m3

## Emissions to nature
- Water [emission, air, troposphere, rural]: 136 kg; = 0.136*1000
  field dried to 35% is default. Source: personal communication with Jake Jacobson, INL

## Sources
- Hsu, D.
