# Quicklime, at plant

Dataset: openLCA process, unit process
Category: 31-33: Manufacturing/3274: Lime and Gypsum Product Manufacturing
Geography: Northern America
Time period: 1991-12-31 to 2001-12-31
Allocation method: no allocation
Generated by: Franklin Associates, A Division of ERG
Published in: Franklin Associates (2004) Limestone Mining & Lime Production
isCopyrightProtected: false
restrictionsDescription: All information can be accessed by everybody.

## General comment
This module shows limestone mining and lime production as 2 separate unit processes, and also shows it as 1 cradle-to-gate process., Lime is manufactured by calcining in a rotary kiln.
Important note: although most of the data in the US LCI database has
undergone some sort of review, the database as a whole has not yet
undergone a formal validation process.
Please email comments to lci@nrel.gov.

## Technology
Includes calcination of limestone in a rotary kiln to produce lime.

## Geography
United States

## Reference product
- Quicklime, at plant [RNA]: 1 kg

## Inputs from technosphere
- Transport, train, diesel powered [RNA]: 0.0161 t*km
- Electricity, AC, 120 V: 0.24408 MJ; provider Electricity; at user; consumption mix - US - US
- Transport, barge, average fuel mix [RNA]: 0.0241 t*km
- Natural gas, combusted in industrial boiler [RNA]: 0.021 m3
- Liquefied petroleum gas, combusted in industrial boiler [RNA]: 3.22e-5 l
- Limestone, at mine [RNA]: 1.87 kg
  The quantity of limestone required for the production of 1,000 lbs of lime was estimated from the calcining chemistry: 100 lbs of limestone (CaCO3) yield 56 lbs of lime (CaO) and 44 lbs of carbon dioxide (CO2). Also, a 95% oxides content of limestone was assumed.
- Bituminous coal, combusted in industrial boiler [RNA]: 0.172 kg
- Diesel, combusted in industrial boiler [RNA]: 0.000945 l
- Transport, combination truck, diesel powered [RNA]: 0.0805 t*km

## Waste to treatment
- Disposal, solid waste, unspecified, to sanitary landfill: 0.005 kg

## Emissions to nature
- Sulfur dioxide [emission, air]: 0.00015 kg
- Carbon dioxide [emission, air]: 0.768 kg
- Particulate matter [emission, air]: 5.63e-5 kg

## Sources
- unspecified
- U.S. EPA
- U.S. Energy Information Administration
- Franklin Associates (2004) Limestone Mining & Lime Production
- U.S. EPA
- U.S. Department of Energy, Office of Ene
- U.S. EPA
- US Geological Survey
- unspecified
