# Switchgrass, production, US, 2022

Dataset: openLCA process, unit process
Category: 11: Agriculture, Forestry, Fishing and Hunting/1119: Other Crop Farming
Geography: Northern America
Time period: 2009-12-31 to 2100-12-30
Allocation method: no allocation
Generated by: Daniel Inman
Published in: Hsu, D.
isCopyrightProtected: false
restrictionsDescription: All information can be accessed by everybody.

## General comment
US switchgrass production (1 hectare) for 2022. Based on projections from Sokhansanj et al. 2009 and MacLaughlin and Kszos 2005. The mean swithgrass yield in the US in 2008 was estimated to be 11.3 Mg per ha, this includes both upland and lowland varieties. The projected 2022 yield was determined by the following (2022 yield = (2008 yield)*(1+.02)^14, where the 2008 yield = 11.2 Mg per hectare, 0.02 is the 2% annual yield improvement, and 14 is the number of years. The annual rate of yield increase is estimated to be 2%. This process Includes all crop productin processes from field preperation to harvest and baling. Assuming a 10-year stand. Transport and storage of bales is not included.

## Technology
Future technology

## Geography
North America

## Time period
2010 and after

## Reference product
- Switchgrass, production [RNA]: 14800 kg

## Inputs from technosphere
- Transformation, from pasture and meadow: 3330 m2; = 0.333*10000
  transformation is equally divided between between the land classes. This is temporary pending better information
- Tillage, rotary cultivator: 1000 m2; = 0.1*10000
  assuming only plowed once in 10yr
- Fertilizer, switchgrass [RNA]: 10000 m2; = 1.0*10000; provider Fertilizer, switchgrass, 2022
- Transformation, from arable: 3330 m2; = 0.333*10000
  (same comment as for Transformation, from pasture and meadow)
- Planting, switchgrass [RNA]: 10000 m2; = 1.0*10000; provider Planting, switchgrass, 2022
- Transformation, from permanent crop: 3330 m2; = 0.333*10000
  (same comment as for Transformation, from pasture and meadow)
- Pesticide, switchgrass [RNA]: 10000 m2; = 1.0*10000
  Fertilizer data based on ISU 2000 and Perrin et al., 2008
- Tillage, rolling: 1000 m2; = 0.1*10000
  assuming only plowed once in 10yr

## Inputs from nature
- Carbon dioxide [resource, air]: 21800 kg
  Carbon balance, based on SG being 48% C, whole plant-NREL compositional analysis. Adjusted for 15% moisture
- Land use [resource, ground, human-dominated, agricultural]: 100000 m2*a; = 10.0*10000
  occupation based on 10 years of production
- Biomass [resource, biotic]: 13426.8 kg
  energy balance for switchgrass. From Pyllis database http://www.ecn.nl/phyllis/

## Sources
- Hsu, D.
