# Chlorine; chlor-alkali electrolysis; at plant

Dataset: openLCA process, unit process
Category: 31-33: Manufacturing/3251: Basic Chemical Manufacturing
Geography: United States
Time period: 2022-01-01 to 2022-12-31
Allocation method: physical allocation
Data quality: US EPA - Process Pedigree Matrix (3;1)
Generated by: Sustainable Solutions Corporation
Owner: Vinyl Institute
Published in: Sustainable Solutions Corporation (2024) Suspension Grade PVC Resin Life Cycle Assessment
isCopyrightProtected: false
restrictionsDescription: These U.S. LCI Database Project data ("Data") are provided by the National Renewable Energy Laboratory ("NREL"), operated by the Alliance for Sustainable Energy, LLC ("Alliance") for the US Department of Energy ("DOE") under Contract No. DE-AC36-08GO28308. The United States Government (the "Government") retains and the user acknowledges that the Government retains a non-exclusive, paid-up, irrevocable, worldwide license to publish or reproduce the published form of these data, or allow others to do so, for Government purposes.
Access to and use of these Data shall impose the following obligations on the user, as set forth in this Agreement. The user is granted the right, without any fee or cost, to use, copy, modify, alter, enhance and distribute these Data for any purpose whatsoever, provided that this entire notice appears in all copies of the Data. Any modification, alteration or enhancement of these data shall be identified and documented by the user. Further, the user agrees to credit the DOE/NREL/Alliance in any publication that results from the use of these Data. The names DOE/NREL/Alliance, however, may not be used in any advertising or publicity to endorse or promote any products or commercial entities unless specific written permission is obtained from DOE/NREL/Alliance. The user also understands that DOE/NREL/Alliance is not obligated to provide the user with any support, consulting, training or assistance of any kind with regard to the use of these Data or to provide the user with any updates, revisions or new versions of these Data.
YOU AGREE TO INDEMNIFY THE GOVERNMENT AND DOE/NREL/ALLIANCE, AND ITS SUBSIDIARIES, AFFILIATES, OFFICERS, AGENTS, AND EMPLOYEES AGAINST ANY CLAIM OR DEMAND, INCLUDING REASONABLE ATTORNEYS' FEES, RELATED TO YOUR USE OF THESE DATA. THESE DATA ARE PROVIDED BY DOE/NREL/ALLIANCE "AS IS" AND ANY EXPRESS OR IMPLIED WARRANTIES, INCLUDING BUT NOT LIMITED TO, THE IMPLIED WARRANTIES OF MERCHANTABILITY AND FITNESS FOR A PARTICULAR PURPOSE ARE DISCLAIMED. IN NO EVENT SHALL THE GOVERNMENT OR DOE/NREL/ALLIANCE BE LIABLE FOR ANY SPECIAL, INDIRECT OR CONSEQUENTIAL DAMAGES OR ANY DAMAGES WHATSOEVER, INCLUDING BUT NOT LIMITED TO CLAIMS ASSOCIATED WITH THE LOSS OF DATA OR PROFITS, WHICH MAY RESULT FROM AN ACTION IN CONTRACT, NEGLIGENCE OR OTHER TORTIOUS CLAIM THAT ARISES OUT OF OR IN CONNECTION WITH THE ACCESS, USE OR PERFORMANCE OF THESE DATA.

## General comment
This unit process represents the production of 1 kg of electrolysis outputs which includes chlorine, sodium hydrozide, and hydrogen. This dataset was developed for chlorine use in PVC manufacturing. This process represents all chlorine produced by the suspension grade PVC resin manufacturers in the United States. Both membrane and diaphragm cell technologies are used, with membrane cells being the more common technology. The studied system includes all processes involved in the chloralkali electrolysis production process, including incoming transport. Mass allocation is used to allocated inputs and outputs among the three products: chlorine, sodium hydroxide, and hydrogen.

## Technology
This process represents the chloralkali process used to produce chlorine for the use in suspension grade PVC resin. Both membrane and diaphragm cell technologies are used, with membrane cells being the more common technology. Co-products include hydrogen and sodium hydroxide. Mass allocation was used to determine the impacts of each co-product.

In the chlor-alkali process, a brine solution (aqueous sodium chloride) undergoes electrolysis to produce chlorine gas, hydrogen gas, and sodium hydroxide. Commercially, two main types of electrolytic cells are used for the chlor-alkali process: diaphragm cells and membrane cells. Membrane cells were developed more recently and are the most commonly used process today. While the treatment of the chlorine and hydrogen gases from processes using both cells are similar, with membrane cells, the sodium hydroxide can be more easily concentrated with less energy.

Several chlor-alkali facilities utilize cogeneration as a method of producing steam and electricity. Cogeneration is the simultaneous generation of electricity and steam. Within the chlor-alkali plants, electricity, natural gas, hydrogen, water, and sulfuric acid are inputs for the cogeneration process. Based on plant data collected on the cogeneration process at two chlor-alkali plants, the output energy is 49% steam and 51% electricity. This process was assumed to be the same across chlor-alkali plants.

## Geography
This data represents six manufacturing sites located in Texas and Louisiana.

## Time period
This data represents operations for the 2022 calendar year.

## Reference product
- Chlorine; chlor-alkali electrolysis; at plant: 0.441802 kg

## By-products
- Sodium hydroxide; chlor-alkali electrolysis; at plant: 0.552897 kg
- Hydrogen, at plant: 0.0192498 kg

## Inputs from technosphere
- Paper, bag and sack, unbleached kraft, average production, at mill [RNA]: 5.01505e-5 kg
  Proxy for alpha cellulose
- Calcium chloride, 38%, at plant: 2.5866e-6 kg
- Carbon monoxide, at plant [RNA]: 0.000198526 kg
  Proxy for carbon dioxide
- Natural gas, combusted in industrial boiler [RNA]: 0.0402045 m3; = 0.387973315090374/9.65
  Steam produced from cogen. Assumed 9.65 kg steam/m3 natural gas.
- Electricity, AC, 120 V: 0.514748 kWh; provider Electricity; at user; consumption mix - Midcontinent Independent System Operator, Inc. - BA
- Transport, combination truck, average fuel mix: 0.018429 kg*km; = 18.4290167156447/1000
- Sodium chloride, at plant [RNA]: 0.829957 kg
- Ammonia, steam reforming, liquid, at plant: 4.98e-6 kg
- Sulfuric acid, at plant [RNA]: 0.00337846 kg
- Nitrogen, at plant: 0.00501186 kg
- Hydrogen, at plant: 0.00106229 kg; provider Chlorine; chlor-alkali electrolysis; at plant
- Hydrochloric acid, at plant, kg: 0.0369817 kg; provider Hydrochloric acid, HCl; MDI coproduct; at plant, 100% HCl
- Flocculant, at plant: 2.30973e-6 kg
- Sodium borohydride, at plant: 4.13954e-6 kg
- Ethylene glycol, at plant, kg: 9.43339e-7 kg; provider Ethylene glycol, materials production, organic compound, at plant, kg
  Proxy for propylene glycol
- Electricity, at cogen, for natural gas turbine [US]: 0.823332 kWh
  Electricity from cogen
- Magnesium chloride, at plant: 1.65591e-7 kg
- Natural gas, combusted in industrial boiler [RNA]: 275.088 btu; = 0.000275088436300113*1000000
- Natural gas, combusted in industrial boiler [RNA]: 0.00943756 m3; = 0.0896568370477656/9.5
  Purchased steam from natural gas. Assumed 9.65 kg steam/m3 natural gas.
- Sodium hydrogen sulfite, 40% in solution: 0.000384216 kg; provider Sodium hydrogen Sulfite, 40% in solution Bridge; USLCI to USEEIO
- Cobalt chloride, at plant: 7.41e-8 kg

## Inputs from nature
- Water, fresh [resource, water]: 1.27818 kg
  includes water, industrial water, demineralized water, deionized water

## Waste to treatment
- Disposal, brine sludge, to unspecified treatment: 0.000647513 kg
- Disposal, hazardous waste: 0.0320546 kg
- Wastewater treatment level 1; Conventional plug flow activated sludge aggregate, solids reduction; at plant: 1.19432 l; provider Wastewater treatment; Conventional plug flow activated sludge, Level 1; at plant
- Disposal, general plant waste, to unspecified treatment: 0.62599 kg
- Disposal, solid waste, unspecified, to municipal incineration: 3.95047e-7 kg
- Recycling, solid waste, to recycling or reuse: 0.000115985 kg

## Emissions to nature
- Hydrochloric acid [emission, air]: 2.58147e-6 kg
- Sulfuric acid [emission, air]: 2.54888e-10 kg
- 1,1,2-Trichloroethane [emission, air]: 3.14496e-8 kg
- Particulate matter, ≤ 2.5μm [emission, air]: 4.77859e-7 kg
- Acetaldehyde [emission, air]: 3.95283e-8 kg
- 1,1-Dichloroethylene [emission, air]: 4.87422e-10 kg
- Particulate matter, ≤ 10μm [emission, air]: 5.18921e-7 kg
- Nitrogen oxides [emission, air]: 1.0458e-6 kg
- Vinyl chloride [emission, air]: 9.13502e-7 kg
- Chlorobenzene [emission, air]: 1.26214e-9 kg
- Ethylene glycol [emission, air]: 5.65687e-9 kg
- Benzene [emission, air]: 8.37904e-8 kg
- 1,3-Butadiene [emission, air]: 4.25816e-8 kg
- Carbon tetrachloride [emission, air]: 1.21364e-8 kg
- p-Dichlorobenzene [emission, air]: 1.65944e-10 kg
- Formaldehyde [emission, air]: 4.48064e-8 kg
- Total suspended solids [emission, water]: 5.51971e-5 kg
- Carbon monoxide [emission, air]: 6.71107e-7 kg
- Lead [emission, water]: 5.85475e-8 kg
- Biological Oxygen Demand [emission, water]: 2.88277e-6 kg
- Tetrachloroethylene [emission, air]: 6.99613e-11 kg
- Chlorine [emission, water]: 1.60266e-8 kg
- Toluene [emission, air]: 8.29097e-9 kg
- Chloroform [emission, water]: 4.37627e-9 kg
- Sulfur dioxide [emission, air]: 4.36284e-8 kg
- Cumene [emission, air]: 3.88601e-10 kg
- Chloroform [emission, air]: 2.00555e-8 kg
- 1,1-Dichloroethane [emission, air]: 6.36943e-9 kg
- Hexachloroethane [emission, air]: 1.03935e-8 kg
- Copper [emission, water]: 3.79671e-8 kg
- 1,2-Dichloroethane [emission, air]: 6.54226e-7 kg
- Methanol [emission, air]: 7.5389e-7 kg
- Lead [emission, air]: 5.86089e-8 kg
- 1,1,2,2-Tetrachloroethane [emission, air]: 6.35033e-10 kg
- Ethylene [emission, air]: 6.71817e-7 kg
- Chloroprene [emission, air]: 2.0397e-10 kg
- Chlorine [emission, air]: 3.61474e-6 kg
- Chloroethane [emission, air]: 5.59532e-8 kg
- Volatile organic compounds [emission, air]: 3.31961e-7 kg
- Hexane [emission, air]: 1.08362e-6 kg
- Ammonia [emission, air]: 9.3041e-6 kg
- Bis(2-chloroethyl) ether [emission, air]: 3.14205e-10 kg
- Propylene [emission, air]: 5.40529e-8 kg

## Allocation factors
- causal, Chlorine; chlor-alkali electrolysis; at plant, for 1,1-Dichloroethane: 0.435724
- causal, Chlorine; chlor-alkali electrolysis; at plant, for Chlorine: 0.435724
- causal, Sodium hydroxide; chlor-alkali electrolysis; at plant, for Ethylene glycol: 0.545291
- causal, Sodium hydroxide; chlor-alkali electrolysis; at plant, for Sodium chloride, at plant: 0.545291
- causal, Sodium hydroxide; chlor-alkali electrolysis; at plant, for Ethylene glycol, at plant, kg: 0.545291
- causal, Sodium hydroxide; chlor-alkali electrolysis; at plant, for Cobalt chloride, at plant: 0.545291
- causal, Chlorine; chlor-alkali electrolysis; at plant, for Chloroprene: 0.435724
- causal, Chlorine; chlor-alkali electrolysis; at plant, for Sodium borohydride, at plant: 0.435724
- causal, Sodium hydroxide; chlor-alkali electrolysis; at plant, for Sulfuric acid, at plant: 0.545291
- causal, Sodium hydroxide; chlor-alkali electrolysis; at plant, for Ammonia: 0.545291
- causal, Sodium hydroxide; chlor-alkali electrolysis; at plant, for Calcium chloride, 38%, at plant: 0.545291
- economic, Hydrogen, at plant: 0.018985
- causal, Hydrogen, at plant, for p-Dichlorobenzene: 0.018985
- causal, Chlorine; chlor-alkali electrolysis; at plant, for Magnesium chloride, at plant: 0.435724
- causal, Hydrogen, at plant, for Ethylene glycol, at plant, kg: 0.018985
- causal, Hydrogen, at plant, for Volatile organic compounds: 0.018985
- causal, Hydrogen, at plant, for Hexachloroethane: 0.018985
- causal, Sodium hydroxide; chlor-alkali electrolysis; at plant, for Particulate matter, ≤ 10μm: 0.545291
- causal, Hydrogen, at plant, for Recycling, solid waste, to recycling or reuse: 0.018985
- causal, Sodium hydroxide; chlor-alkali electrolysis; at plant, for Hydrogen, at plant: 0.545291
- causal, Chlorine; chlor-alkali electrolysis; at plant, for Chlorine: 0.435724
- causal, Sodium hydroxide; chlor-alkali electrolysis; at plant, for Disposal, brine sludge, to unspecified treatment: 0.545291
- causal, Sodium hydroxide; chlor-alkali electrolysis; at plant, for Hydrochloric acid: 0.545291
- causal, Hydrogen, at plant, for Particulate matter, ≤ 2.5μm: 0.018985
- causal, Chlorine; chlor-alkali electrolysis; at plant, for Chlorobenzene: 0.435724
- causal, Sodium hydroxide; chlor-alkali electrolysis; at plant, for 1,1,2,2-Tetrachloroethane: 0.545291
- causal, Hydrogen, at plant, for Sulfuric acid: 0.018985
- causal, Sodium hydroxide; chlor-alkali electrolysis; at plant, for Disposal, general plant waste, to unspecified treatment: 0.545291
- causal, Chlorine; chlor-alkali electrolysis; at plant, for Wastewater treatment level 1; Conventional plug flow activated sludge aggregate, solids reduction; at plant: 0.435724
- causal, Hydrogen, at plant, for Tetrachloroethylene: 0.018985
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
## Inventory method
Attributional

## Modelling constants
Data was collected from four manufacturers which represent 100% of the S-PVC resin produced in the US in 2022. A total of six facilities provided their data for 2022 and the LCI was developed using mass allocation. Data was reviewed and verified by each of the four companies. Mass allocation is used to allocate inputs and outputs to the coproducts produced within the chlor-alkali process. The hydrogen produced as a coproduct is used as an onsite fuel or as a fuel within a downstream process to produce the S-PVC resin. The cogeneration process of electricity and steam is similar across the chlor-alkali plants to produce S-PVC resin. The cogeneration process was analyzed based off of inputs and outputs provided by two sites and assumed to be consistent across all sites and companies. The cogeneration process produces 51% electricity and 49% steam. Emissions to water and air were considered within the scope of this study and were accounted for based off of quantities in annual emissions reporting from each company. Data validation was performed through mass balances.

## Completeness
The following cut-off criteria was used throughout the study. Processes whose total contribution to the final result, with respect to their mass and in relation to all considered impact categories, is less than 1% can be neglected. The sum of the neglected processes may not exceed 5% by mass and by 5% of the considered impact categories. Construction of capital equipment, maintenance of operation and support equipment, and human labor and employee commute are all excluded from this life cycle assessment. This assessment is cradle-to-gate and excludes any processes downstream of the manufacturer.
No other known processes within the system boundary were excluded. All data was provided by the manufacturers and reviewed by the manufacturers again after the results had been calculated to ensure completeness. The mass balance for this process was calculated.

## Data treatment
A weighted average was calculated from the primary data collected from the four manufacturers (six plants) of S-PVC in the US.

## Sampling procedure
The system boundary is cradle-to-gate and includes the use of raw materials entering the facilities, the transportation to get raw and supporting materials to the manufacturing facilities, and the processing inputs and outputs to the electrolysis process. Construction of capital equipment, maintenance of operation and support equipment, and human labor and employee commute are all excluded from this life cycle assessment. Data was collected from four S-PVC manufacturers (6 plants). Uncertainty was not calculated.

## Intended application
Situation C1 - Accounting, with system-external interactions - The intended application is a purely descriptive accounting / documentation of the analyzed system including existing interactions with other systems in the LCI model.

The target audience of this model includes LCA practitioners, industry, and the general public. A full inventory of environmental flows are included; thus this unit process can be used for a full range of LCIA impact categories. The original study results were analyzed using the TRACI LCIA factors. These data are an update to the previously published dataset from 2021.

These data are intended to be used as an average dataset accepted by the North American plastics/chemical industry.

## Project
This process was developed as part of the Vinyl Institute's Suspension Grade PVC Resin Life Cycle Assessment.

## Sources
- Sustainable Solutions Corporation (2024) Suspension Grade PVC Resin Life Cycle Assessment
