# Pesticide, switchgrass

Dataset: openLCA process, unit process
Category: 11: Agriculture, Forestry, Fishing and Hunting/1151: Support Activities for Crop Production
Geography: Northern America
Time period: 2009-12-31 to 2100-12-30
Allocation method: no allocation
Generated by: Daniel Inman
Published in: Hsu, D.
isCopyrightProtected: false
restrictionsDescription: All information can be accessed by everybody.

## General comment
Application of pesticides (herbicides and insecticides) to one hectare of switchgrass. Data are based on Perrin et al 2008

## Technology
modern

## Geography
North America

## Time period
2010 and after

## Reference product
- Pesticide, switchgrass [RNA]: 10000 m2; = 1.0*10000
  Assuming pesticides applied via sprayer each Year

## Inputs from technosphere
- 2,4-D, at regional storehouse: 0.5 kg
  Assuming 2,4-D is applied annually to help control broad leaf weeds. (Perrin et al, 2008)
- Transport, combination truck, diesel powered [RNA]: 0.266 t*km
  transport to field of 2-4-D
- Application of plant protection products, by field sprayer: 10000 m2; = 1.0*10000

## Emissions to nature
- 2,4-D [emission, ground, human-dominated, agricultural]: 0.5 kg
  Assuming 2,4-D is applied annually to help control broad leaf weeds. (Perrin et al, 2008)

## Sources
- Downs, H. W.
- Cassler, M. D
- Hsu, D.
