# Fuel grade uranium, at regional storage

Dataset: openLCA process, unit process
Category: 31-33: Manufacturing/3251: Basic Chemical Manufacturing
Geography: Northern America
Time period: 1980-12-31 to 2001-12-31
Allocation method: no allocation
Generated by: Franklin Associates, A Division of ERG
Published in: Franklin Associates (2003) Uranium Fuel Production
isCopyrightProtected: false
restrictionsDescription: All information can be accessed by everybody.

## General comment
Important note: although most of the data in the US LCI database has
undergone some sort of review, the database as a whole has not yet
undergone a formal validation process.
Please email comments to lci@nrel.gov.

## Technology
Represents the front-end of the nuclear fuel cycle (from uranium mining through UO2 fuel fabrication). Uranium mining technologies are weighted by market shares of conventional and solution mining methods. Uranium enrichment is performed by gaseous diffusion.

## Geography
United States

## Reference product
- Fuel grade uranium, at regional storage [RNA]: 1 kg

## Inputs from technosphere
- Residual fuel oil, combusted in industrial boiler [RNA]: 0.111 l
- Diesel, combusted in industrial boiler [RNA]: 20.6 l
- Transport, ocean freighter, diesel powered [US]: 7.89 t*km
- Bituminous coal, combusted in industrial boiler [RNA]: 22.7 kg
- Transport, combination truck, diesel powered [RNA]: 27.9 t*km
- Natural gas, combusted in industrial boiler [RNA]: 184 m3
- Electricity, AC, 120 V: 14688 MJ; provider Electricity; at user; consumption mix - US - US
- Transport, ocean freighter, residual fuel oil powered [US]: 71 t*km

## Inputs from nature
- Uranium oxide [resource, ground]: 3.6188e6 MJ

## Emissions to nature
- Hydrocarbons [emission, air]: 3.34 kg
- Mercury [emission, water]: 0.00016 kg
- Carbon monoxide [emission, air]: 0.466 kg
- Ammonium chloride [emission, air]: 0.578 kg
- Lead [emission, water]: 0.0159 kg
- Radionuclides [emission, air]: 6.5126e14 kBq
- Chloride [emission, water]: 0.797 kg
- Copper(I) [emission, water]: 0.114 kg
- Ammonium [emission, water]: 0.124 kg
- Formaldehyde [emission, air]: 0.00212 kg
- Sulfur oxides [emission, air]: 0.0177 kg
- Suspended solids, inorganic [emission, water]: 7.66 kg
- Sodium(I) [emission, water]: 0.358 kg
- Nitrogen [emission, water]: 0.308 kg
- Selenium [emission, water]: 0.0433 kg
- Manganese [emission, water]: 1.39 kg
- Cadmium(II) [emission, water]: 0.00189 kg
- Fluoride [emission, air]: 0.013 kg
- Carbon dioxide [emission, air]: 29.4 kg
- Particulate matter [emission, air]: 16.9 kg
- Sulfur dioxide [emission, air]: 49.7 kg
- Acetic acid [emission, air]: 0.00212 kg
- Zinc [emission, water]: 0.193 kg
- Fluoride [emission, water]: 2.01 kg
- Iron [emission, water]: 7.35 kg
- Kerosene [emission, air]: 0.277 kg
- Calcium(II) [emission, water]: 0.0768 kg
- Aluminum [emission, water]: 4.54 kg
- Nitrogen oxides [emission, air]: 13.8 kg
- Arsenic(V) [emission, water]: 0.00377 kg
- Ammonia [emission, air]: 0.167 kg
- Sulfate [emission, water]: 250 kg
- Ammonia [emission, water]: 0.108 kg
- Radionuclides [emission, water]: 18000 kBq

## Sampling procedure
Data on different elementary flows come from different sources

## Sources
- U.S. Department of Commerce
- Franklin Associates (2003) Uranium Fuel Production
- U.S. Energy Information Administration
- unspecified
- U.S. Department of Energy
