# Steel, billets, at plant

Dataset: openLCA process, unit process
Category: 31-33: Manufacturing/3311: Iron and Steel Mills and Ferroalloy Manufacturing
Geography: Northern America
Time period: 1992-12-31 to 2001-12-31
Allocation method: no allocation
Generated by: Jamie Meil
Published in: Markus Engineering Services & ATHENA Institute (2003). Steel Production
isCopyrightProtected: false
restrictionsDescription: All information can be accessed by everybody.

## General comment
Important note: although most of the data in the US LCI database has
undergone some sort of review, the database as a whole has not yet
undergone a formal validation process.
Please email comments to lci@nrel.gov.

## Technology
Data represent U.S and Canadian average technologies.

## Geography
North America

## Reference product
- Steel, billets, at plant [RNA]: 1 kg

## Inputs from technosphere
- Steel scrap, at plant: 0.284 kg

## Inputs from nature
- Natural gas [resource, air, subterranean]: 2.29091 MJ
- Iron [resource, ground, subterranean]: 1.228 kg
- Coal, bituminous [resource, ground, subterranean]: 2.5788, 15.0928 MJ (2 entries)
- Uranium [resource, ground, subterranean]: 3.8588e-7 kg
- Wood [resource, biotic]: 0.00011554 kg
- Crude oil [resource, water, subterranean]: 2.63941 MJ
- Limestone [resource, ground, subterranean]: 0.19109 kg
- Oxygen [resource, air]: 0.08798 kg
- Energy, hydro [resource, water]: 0.038458 kWh

## Waste to treatment
- Disposal, BOF dust, to unspecified treatment: 0.016361 kg
- Disposal, BOF slag, to unspecified treatment: 0.07938 kg
- Disposal, slag, to unspecified treatment: 0.20925 kg
- Disposal, solid waste, unspecified, to unspecified treatment: 0.04829 kg

## Emissions to nature
- Arsenic [emission, air]: 1.215e-8 kg
- Benzo[a]pyrene [emission, water]: 5.5346e-6 kg
- Orthophosphate [emission, water]: -7.4088e-6 kg
- Carbon dioxide [emission, air]: 0.00014729, 2.022 kg (2 entries)
- Benzene [emission, water]: -5.1817e-5 kg
- Phenol [emission, water]: 4.7408e-9 kg
- Naphthalene [emission, water]: -4.2336e-5 kg
- Acrolein [emission, air]: 3.3296e-9 kg
- Nitrate [emission, water]: 3.1973e-8 kg
- Manganese [emission, air]: 3.7926e-8 kg
- Lead [emission, air]: 1.2083e-8 kg
- Radionuclides [emission, air]: 10.31 kBq
- Cadmium [emission, air]: 3.4619e-9 kg
- Volatile organic compounds [emission, air]: 0.0008357, 0.00019867 kg (2 entries)
- Ammonia [emission, air]: 1.1753e-6 kg
- Hydrochloric acid [emission, air]: 1.6868e-5 kg
- Particulate matter, > 2.5μm and ≤ 10μm [emission, air]: 5.8433e-5 kg
- Benzene [emission, air]: 4.7849e-9 kg
- Selenium [emission, air]: 2.4035e-8 kg
- Formaldehyde [emission, air]: 4.41e-6, 1.9206e-6 kg (2 entries)
- Dimethylnitramine [emission, air]: 7.056e-10 kg
- Chlorine [emission, air]: 1.2745e-8 kg
- Fluoride [emission, water]: 0.00018765 kg
- Cyanide [emission, water]: 0.00063284 kg
- Naphthalene [emission, air]: 2.4696e-10 kg
- Carbon monoxide [emission, air]: 0.00031973, 0.023814 kg (2 entries)
- Sodium(I) [emission, water]: 1.3473e-7 kg
- Trichloroethylene [emission, air]: 3.1532e-9 kg
- Tetrachloroethylene [emission, air]: 3.1752e-9 kg
- Organic compounds [emission, air]: 1.1179e-7, 3.7044e-6 kg (2 entries)
- Methane [emission, air]: 0.00085334 kg
- Chromium [emission, air]: 1.9448e-8 kg
- Cobalt [emission, air]: 5.0715e-9 kg
- Methylene chloride [emission, air]: 1.4156e-8 kg
- Sulfate [emission, water]: 0.00013473 kg
- Nitrogen [emission, water]: 0.00069017 kg
- Mercury [emission, water]: 9.261e-12 kg
- Organic compounds [emission, water]: 9.1728e-6 kg
- Manganese [emission, water]: 7.6514e-6 kg
- Hydrogen ion [emission, water]: 6.8576e-11 kg
- Metals [emission, air]: 5.9756e-8 kg
- Total dissolved solids [emission, water]: 0.002624 kg
- Oils, unspecified [emission, non-FEDEFL, water]: 0.017838 kg
- Nitrogen oxides [emission, air]: 0.0022271 kg
- Sulfur dioxide [emission, air]: 0.00074088 kg
- Calcium(II) [emission, water]: 7.3206e-8 kg
- Phenols [emission, water]: 6.5268e-6 kg
- Chromium [emission, water]: -1.5523e-6 kg
- Phenol [emission, air]: 9.7682e-9 kg
- Chromate [emission, water]: 3.0209e-9 kg
- 2,3,7,8-Tetrachlorodibenzo-p-dioxin [emission, air]: 1.8235e-14 kg
- Kerosene [emission, air]: 8.5113e-8 kg
- Mercury [emission, air]: 6.5048e-9 kg
- Sulfuric acid [emission, water]: 2.2712e-6 kg
- Cadmium(II) [emission, water]: 1.1819e-7 kg
- Hydrofluoric acid [emission, air]: 2.3373e-6 kg
- Nickel(II) [emission, water]: 1.4707e-6 kg
- Suspended solids, inorganic [emission, water]: 0.035501 kg
- Carbon tetrachloride [emission, air]: 5.3141e-9 kg
- Antimony [emission, air]: 1.7883e-9 kg
- Boron [emission, water]: 9.1067e-6 kg
- Chloride [emission, water]: 0.0067473 kg
- Beryllium [emission, air]: 1.398e-9 kg
- Nitrous oxide [emission, air]: 2.0837e-6 kg
- Metals [emission, water]: 1.4619e-6 kg
- Nickel [emission, air]: 5.6007e-8 kg
- Phosphorus [emission, water]: 1.3936e-5 kg
- Ammonia [emission, water]: 2.5799e-7 kg
- Chemical Oxygen Demand [emission, water]: 0.0019933 kg
- Sulfur oxides [emission, air]: 0.0031532 kg
- Lead [emission, water]: 0.00013473 kg
- Ammonium [emission, water]: -0.012172 kg
- Zinc(II) [emission, water]: -6.4386e-5 kg
- Iron [emission, water]: 0.00023814 kg
- Particulate matter [emission, air]: 0.00029635 kg
- Biological Oxygen Demand [emission, water]: 3.2193e-6 kg
- Sulfide [emission, water]: 0.0018632 kg

## Sources
- Franklin Associates Ltd. (2001) Franklin USA 98
- Markus Engineering Services & ATHENA Institute (2003). Steel Production
