# Effluent release; from conventional plug flow activated sludge, Level 1 wastewater treatment plant

Dataset: openLCA process, unit process
Category: 22: Utilities/2213: Water, Sewage and Other Systems
Geography: United States
Time period: 2015-01-01 to 2025-12-31
Allocation method: physical allocation
Data quality: US EPA - Process Pedigree Matrix (2;1)
Generated by: Franklin Associates, A Division of ERG
Owner: U.S. EPA
Published in: U.S. EPA 2023
isCopyrightProtected: false
restrictionsDescription: These U.S. LCI Database Project data ("Data") are provided by the National Renewable Energy Laboratory ("NREL"), operated by the Alliance for Sustainable Energy, LLC ("Alliance") for the US Department of Energy ("DOE") under Contract No. DE-AC36-08GO28308. The United States Government (the "Government") retains and the user acknowledges that the Government retains a non-exclusive, paid-up, irrevocable, worldwide license to publish or reproduce the published form of these data, or allow others to do so, for Government purposes. Access to and use of these Data shall impose the following obligations on the user, as set forth in this Agreement. The user is granted the right, without any fee or cost, to use, copy, modify, alter, enhance and distribute these Data for any purpose whatsoever, provided that this entire notice appears in all copies of the Data. Any modification, alteration or enhancement of these data shall be identified and documented by the user. Further, the user agrees to credit the DOE/NREL/Alliance in any publication that results from the use of these Data. The names DOE/NREL/Alliance, however, may not be used in any advertising or publicity to endorse or promote any products or commercial entities unless specific written permission is obtained from DOE/NREL/Alliance. The user also understands that DOE/NREL/Alliance is not obligated to provide the user with any support, consulting, training or assistance of any kind with regard to the use of these Data or to provide the user with any updates, revisions or new versions of these Data. YOU AGREE TO INDEMNIFY THE GOVERNMENT AND DOE/NREL/ALLIANCE, AND ITS SUBSIDIARIES, AFFILIATES, OFFICERS, AGENTS, AND EMPLOYEES AGAINST ANY CLAIM OR DEMAND, INCLUDING REASONABLE ATTORNEYS' FEES, RELATED TO YOUR USE OF THESE DATA. THESE DATA ARE PROVIDED BY DOE/NREL/ALLIANCE "AS IS" AND ANY EXPRESS OR IMPLIED WARRANTIES, INCLUDING BUT NOT LIMITED TO, THE IMPLIED WARRANTIES OF MERCHANTABILITY AND FITNESS FOR A PARTICULAR PURPOSE ARE DISCLAIMED. IN NO EVENT SHALL THE GOVERNMENT OR DOE/NREL/ALLIANCE BE LIABLE FOR ANY SPECIAL, INDIRECT OR CONSEQUENTIAL DAMAGES OR ANY DAMAGES WHATSOEVER, INCLUDING BUT NOT LIMITED TO CLAIMS ASSOCIATED WITH THE LOSS OF DATA OR PROFITS, WHICH MAY RESULT FROM AN ACTION IN CONTRACT, NEGLIGENCE OR OTHER TORTIOUS CLAIM THAT ARISES OUT OF OR IN CONNECTION WITH THE ACCESS, USE OR PERFORMANCE OF THESE DATA.

## General comment
This gate-to gate process reflects the pollutant emissions associated with the release of 1 cubic meter of wastewater treated to the following specification:

Level 1 Effluent quality: Suspended solids - 20 mg/L, Biological oxygen demand - 7.7 mg/L, Total nitrogen - 30 mg/L, Total phosphorus - 4.9 mg/L

Inventory data was generated for a theortical process configuration treating on average 10 million gallons per day of wastewater. Key information is available in process metadata. Full process documentation is available in EPA report number 832-R-21-006A.

This process only reflects pollutant emissions and must be utilized with the associated wastewater treatment process and sludge disposal process to reflect the full scope of wastewater treatment impacts. Reported emissions to water include solids, biological and chemical oxygen demand, nutrients, heavy metals, disinfection by-products, and a subset of toxic organic compounds. The process also reports nitrous oxide emissions associated with the release of nitrogen compounds to surface water.

## Technology
conventional plug flow activated sludge, Level 1: Treatment processes include: grit removal, clarifiers, activated sludge biological process, chlorination/dechlorination, gravity thickening, anaerobic digestion and centrifugation.

Level 1 Effluent quality- Suspended solids - 20 mg/L, Biological oxygen demand - 7.7 mg/L, Total nitrogen - 30 mg/L, Total phosphorus - 4.9 mg/L

## Time period
Wastewater effluent quality standards will change over time and with geography. Current and future wastewater standards should be reflected in treatment levels establish for the level 1-level 5 systems.

## Reference product
- Effluent release; from wastewater treatment plant; at surface water: 1 m3; input

## Emissions to nature
- Triclosan [emission, water, fresh water body]: 2.36295e-7 kg
- Copper(II) [emission, water, fresh water body]: 2.47858e-5 kg
- (2S)-2-(6-methoxynaphthalen-2-yl)propanoic acid [emission, water, fresh water body]: 7.00288e-7 kg
- Estradiol [emission, water, fresh water body]: 1.32e-9 kg
- Butyl benzyl phthalate [emission, water, fresh water body]: 2.2e-8 kg
- (3R,5R)-7-[2-(4-fluorophenyl)-4-[(2-hydroxyphenyl)carbamoyl]-3-phenyl-5-propan-2-ylpyrrol-1-yl]-3,5-dihydroxyheptanoic acid [emission, water, fresh water body]: 6e-8 kg
- Octylphenol [emission, water, fresh water body]: 8.26e-8 kg
- Butylated hydroxyanisole [emission, water, fresh water body]: 8e-8 kg
- Carbamazepine [emission, water, fresh water body]: 6.87e-7 kg
- Phenytoin [emission, water, fresh water body]: 8.5e-8 kg
- 3-[bis(2-carboxyethyl)phosphanyl]propanoic acid [emission, water, fresh water body]: 1.22e-7 kg
- Diuron [emission, water, fresh water body]: 7.63e-8 kg
- Zinc(II) [emission, water, fresh water body]: 0.000202927 kg
- Chloroacetonitrile [emission, water, fresh water body]: 3.2231e-5 kg
- 1-(3,5,5,6,8,8-hexamethyl-6,7-dihydronaphthalen-2-yl)ethanone [emission, water, fresh water body]: 1.31856e-7 kg
- (3R,5R)-7-[2-(4-fluorophenyl)-3-phenyl-4-(phenylcarbamoyl)-5-propan-2-ylpyrrol-1-yl]-3,5-dihydroxyheptanoic acid [emission, water, fresh water body]: 2.2e-8 kg
- Estrone [emission, water, fresh water body]: 9.4478e-9 kg
- Iopromide [emission, water, fresh water body]: 5.3e-8 kg
- Chemical Oxygen Demand [emission, water]: 0.0277 kg
- Nitrogen [emission, water, fresh water body, river]: 0.0154 kg
- Ammonia [emission, water]: 0.0149 kg
- 2-[4-[2-hydroxy-3-(propan-2-ylamino)propoxy]phenyl]acetamide [emission, water, fresh water body]: 3.2055e-7 kg
- Di-n-octyl phthalate [emission, water, fresh water body]: 4.26e-7 kg
- Chromium(III) [emission, water, fresh water body]: 2.14952e-5 kg
- Gemfibrozil [emission, water, fresh water body]: 4.89e-7 kg
- Nitrous oxide [emission, air]: 0.000237732 kg
- [2-(carbamoyloxymethyl)-2-methylpentyl] carbamate [emission, water, fresh water body]: 3.5e-7 kg
- (2-hydroxy-4-methoxyphenyl)-phenylmethanone [emission, water, fresh water body]: 7.77e-8 kg
- Diclofenac [emission, water, fresh water body]: 4.85453e-7 kg
- Lead(II) [emission, water, fresh water body]: 7.41609e-6 kg
- 1-(6-tert-butyl-1,1-dimethyl-2,3-dihydroinden-4-yl)ethanone [emission, water, fresh water body]: 2.7135e-8 kg
- Tris(2-chloroethyl) phosphate [emission, water, fresh water body]: 6e-7 kg
- Atrazine [emission, water, fresh water body]: 1.45e-8 kg
- Trimethoprim [emission, water, fresh water body]: 4.24e-7 kg
- 4,6,6,7,8,8-hexamethyl-1,3,4,7-tetrahydrocyclopenta[g]isochromene [emission, water, fresh water body]: 5.10917e-7 kg
- 2-(4-chlorophenoxy)-2-methylpropanoic acid [emission, water, fresh water body]: 1.42296e-7 kg
- Sulfamethoxazole [emission, water, fresh water body]: 2.14094e-7 kg
- Phosphorus [emission, water]: 0.00494 kg
- Cadmium(II) [emission, water, fresh water body]: 2.02942e-6 kg
- Chloral hydrate [emission, water, fresh water body]: 9.47146e-5 kg
- Acetamide [emission, water, fresh water body]: 9.3505e-8 kg
- 1-(4-tert-butyl-2,6-dimethyl-3,5-dinitrophenyl)ethanone [emission, water, fresh water body]: 8.925e-8 kg
- Trichloroacetic acid [emission, water, fresh water body]: 0.000127043 kg
- (3R,5R)-7-[2-(4-fluorophenyl)-4-[(4-hydroxyphenyl)carbamoyl]-3-phenyl-5-propan-2-ylpyrrol-1-yl]-3,5-dihydroxyheptanoic acid [emission, water, fresh water body]: 6e-8 kg
- Mercury(II) [emission, water, fresh water body]: 1.79638e-6 kg
- Dichloroacetic acid [emission, water, fresh water body]: 0.000144551 kg
- Total suspended solids [emission, water]: 0.02 kg
- (4R,4aR,7aR,12bS)-9-methoxy-3-methyl-1,2,4,4a,5,6,7a,13-octahydro-4,12-methanobenzofuro[3,2-e]isoquinolin-7-one [emission, water, fresh water body]: 5.5e-8 kg
- N-Nitrosodimethylamine [emission, water, fresh water body]: 6.92392e-7 kg
- Benzeneacetic acid, .alpha.-methyl-4-(2-methylpropyl)- [emission, water, fresh water body]: 9.67692e-8 kg
- 2,2-dichloroacetaldehyde [emission, water, fresh water body]: 8.84667e-6 kg
- Trihalomethanes (four), total [emission, water, fresh water body]: 0.000203961 kg
- Benzophenone [emission, water, fresh water body]: 5.43e-8 kg
- 4,4'-Isopropylidenediphenol [emission, water, fresh water body]: 1.22456e-7 kg
- Biological Oxygen Demand [emission, water]: 0.00771 kg
- Testosterone [emission, water, fresh water body]: 4.7e-9 kg
- (8S,9S,10R,13S,14S,17S)-17-acetyl-10,13-dimethyl-1,2,6,7,8,9,11,12,14,15,16,17-dodecahydrocyclopenta[a]phenanthren-3-one [emission, water, fresh water body]: 6.85e-10 kg
- N,N-Diethyl-m-toluamide [emission, water, fresh water body]: 1.985e-7 kg
- Nonylphenol [emission, water, fresh water body]: 5.1467e-7 kg
- Nickel(II) [emission, water, fresh water body]: 1.46077e-5 kg
- Triclocarban [emission, water, fresh water body]: 2.075e-7 kg
- 4-Androstenedione [emission, water, fresh water body]: 2.12121e-9 kg
- 1-(1,1,2,3,3,6-hexamethyl-2H-inden-5-yl)ethanone [emission, water, fresh water body]: 8.7216e-8 kg
- 2,6-Di-tert-butyl-p-cresol [emission, water, fresh water body]: 2.05e-7 kg

## Inventory method
Attributional process. Gate-to-gate.

## Modelling constants
Inventory data was generated for a theortical process configuration treating on average 10 million gallons per day of wastewater. The CAPDET Works software package (maintained by Hydromantis) is the source of inventory data for biological oxygen demand, chemical oxygen demand, solids, and nutrients. Process greenhouse gas emissions were estimated using calculations from the IPCC greenhouse gas inventory guidelines. Emissions of disinfecton by-products, heavy metals and toxic organics were estimated based on typical influent concentrations and estimated removal within wastewater treatment processes identified in the literature.

## Completeness
A subset of common, well-studied toxic organics is included in the inventory. The sum of all pollutants contained in the effluent is less than 0.01% of the mass of treated effluent. CAPDET works balances mass to model effluent quality and sludge quantity. A mass balance was used to partition DBPs, toxic organics and heavy metals between biosolids, wastewater effluent and the share of each compound that biodegrades. Degradation by-products are not tracked within the inventory.

## Data selection
All outputs of the CAPDET model that could be used to develop LCI data were included in the model. Additional data on nitrous oxide emissions to air and the release of disinfection by-products, toxic organics and heavy metals were developed from literature sources to supplement gaps in the inventory.

## Data treatment
Output of the CAPDET Wastewater Treatment Costing software is normalized to be on the basis of the functional unit, which is 1 cubic meter of treated wastewater. For entries associated with infrastructure assumptions had to be made regarding the mass and material details associated with CAPDET output.

## Data collection
2014-2019

## Sampling procedure
The system boundaries of this process only include pollutant emissions and must be utilized with the associated wastewater treatment process and sludge disposal process to reflect the full scope of wastewater treatment impacts. Reported emissions to water include solids, biological and chemical oxygen demand, nutrients, heavy metals, disinfection by-products, and a subset of toxic organic compounds. The process also reports nitrous oxide emissions associated with the release of nitrogen compounds to surface water. Inventory data was derived from model runs in CAPDET Works and supplemented with values developed using basic engineering calculations and values derived from literature. Uncertainty data is not included for this process. Low, median and high estimates of heavy metal, disinfection by-product and toxic organic concentrations in wastewater can be found in the study report.

## Use advice
This process only reflects effluent emissions following wastewater treatment for the associated wastewater treatment process:Conventional plug flow activated sludge, Level 1. This process cannot be used in isolation to reflect the impacts of wastewater treatment. Emissions of disinfection by-products, heavy metals and toxic organics were estimated based on typical influent concentrations and estimated removal within wastewater treatment processes identified in the literature. The inventory includes both BOD and COD. If including these compounds in characterized eutrophication impacts, only one of the two compounds should be characterized.

## Intended application
This process is intended to be used as a background process by LCA practitioners, industry and the general public to reflect the impact of wastewater treatment within their product systems. This process must be used in conjunction with the associated wastewater treatment and sludge landfilling processes to model the full scope of wastewater treatment impacts. The inventory should be sufficient to model TRACI 2.1 and USETox impact categories.

Situation C2 - Accounting, without system-external interatctions. The intended application is a purely descriptive accounting / documentation of the analysed system excluding existing interactions with other systems in the LCI model.

## Project
Data were prepared by Eastern Research Group (ERG) on behalf of the U.S. EPA under Contract No. EP-C-14-022 WA 1-11, "LCA and Cost Assessment of Nutrient Removal Technologies"

## Sources
- CAPDETWorks Wastewater Model Version 3.
