# Corn stover, carted

Dataset: openLCA process, unit process
Category: 11: Agriculture, Forestry, Fishing and Hunting/1151: Support Activities for Crop Production
Geography: Northern America
Time period: 2007-12-31 to 2021-12-31
Allocation method: no allocation
Generated by: Daniel Inman
Published in: Hsu, D.
isCopyrightProtected: false
restrictionsDescription: All information can be accessed by everybody.

## Technology
modern

## Geography
North America

## Time period
2008

## Reference product
- Corn stover, carted [RNA]: 1710 kg; = 1.71*1000

## Inputs from technosphere
- Transport, combination truck, diesel powered [RNA]: 28.177 t*km
  1.12 is conversion from metric tons to short tons.
- Corn stover, production [RNA]: 1330 kg; provider Corn stover, production, average, US, 2022
- Baling: 4050 m2; = 0.405*10000
  ha of corn stover calculated based on mass ratio, then scaled by the amount of stover (0.46) per mass of corn grain. Impact of baling is slightly overstated because it involves tractor--INL design report has baler behind the harvester.
- Transport, tractor and trailer: 1.3957 t*km
  1.12 is conversion from metric tons to short tons.

## Sources
- Hess, J.
- Hsu, D.
