# Containerboard, average production, at mill

Dataset: openLCA process, unit process
Category: 31-33: Manufacturing/3221: Pulp, Paper, and Paperboard Mills
Geography: United States
Time period: 2013-12-31 to 2014-12-30
Allocation method: economic allocation
Exchange data quality scheme: US EPA - Flow Pedigree Matrix
Generated by: Caroline Gaudreault
Owner: Corrugated Packaging Alliance (CPA)
Published in: NCASI (2017) LCA Average Corrugated Product
isCopyrightProtected: true
restrictionsDescription: All information can be accessed by everybody.

## General comment
Containerboard (linerboard and corrugating medium), average U.S. production, at mill. By-products were allocated 0% of the impacts to enable the user to choose and apply their own allocation method more easily. All flows are production-weighted means. Data were developed for a full LCA that was critically reviewed by Lindita Bushi, Athena Institute.

The unit process includes pulp production from wood and recovered paper, papermaking, and preparation for shipping to customers. Net purchased energy is included, but upstream flows associated with its generation are excluded. Flows associated with transportation of inputs from the technosphere are included. Product transportation is excluded.

## Technology
Current technology mix for containerboard

## Geography
United States

## Time period
Primary data was collected from participating companies and associations for their operational activities representative of 2014.

## Reference product
- Containerboard, average production, at mill [US]: 1.10516 kg

## By-products
- Turpentine, from industry-average containerboard [US]: 0.00120802 kg
  Produced as byproduct of containerboard production. Sold i.e., not used on site. Allocation set to 0%.
- Tall oil, from industry-average containerboard [US]: 0.0155585 kg
  (same comment as for Turpentine, from industry-average containerboard)

## Inputs from technosphere
- Chips; softwood; green; at sawmill [US]: 0.0980478 kg
  northern SWD chips, dry mass. Wood (logs and chips) usage in the process is distrubuted as follows: 51% ends up in pulp, 11% in self-generated hogged fuel, and 37% in black liquor.
- Residual fuel oil, at refinery [RNA]: 2.62e-6 m3; provider Petroleum refining, at refinery
- Aluminium sulphate, powder, at plant: 0.00267443 kg
  i.e.: Aluminium sulphate, powder, at plant
- Transport, barge, diesel powered [RNA]: 0.0165715 t*km
  Recovered fiber to pulp and paper mills: 1.2% of total mass travels 824 km. Chemicals: 6.8% of total mass travels 336 km. Residuals to management : 1.2% of total mass travels 824 km
- Old corrugated containers: 0.557821 kg
  Consists of converting wastes (pre-consumer OCC) and post-cosumer old corrugated containers (OCC)
- Bituminous coal, at mine [RNA]: 0.0387932 kg
- Wood chips; hardwood; green; at sawmill [US]: 0.0560569 kg; provider Sawn lumber, hardwood, rough, green, at sawmill, SE
  northern HWD chips, dry mass. Wood (logs and chips) usage in the process is distrubuted as follows: 51% ends up in pulp, 11% in self-generated hogged fuel, and 37% in black liquor.
- Diesel, at refinery: 8.17e-10 m3; provider Petroleum refining, at refinery
- Pitch despergents, in paper production: 6.01e-5 kg
- Pulp, kraft market, bleached, average production, at mill [RNA]: 0.000723067 kg
  bleached kraft market pulp
- Transport, ocean freighter, diesel powered [US]: 0.00212456 t*km
  Chemicals: 2.5% of total mass travel 2020 km
- Bark; softwood; green; at sawmill [US]: 0.119937 kg
  Proxy for purchased hogged fuel. Self-generated hogged fuel (manufacturing) and black liquor solids are not included here but rather in total wood inputs.
- Sulfuric acid, at plant [RNA]: 0.0117028 kg
- Forest residue, processed and loaded, at landing system [RNA]: 0.0141883 kg
  For energy requirements: purchased: 0.006649412 kg, self-generated: 0.003550538 kg
- Natural gas, production mixture, to energy use: 0.108566 m3; provider Natural gas, processed, for energy use, at plant
- Sodium hydroxide; chlor-alkali electrolysis; at plant: 0.0076855 kg; provider Chlorine; chlor-alkali electrolysis; at plant
- Melamine urea formaldehyde, MF, resin, neat, 60% solids [RNA]: 0.000706402 kg
  Proxy for strength agents, recognizing this process is for wood products and not paper products.
- Quicklime, at plant [RNA]: 0.00899538 kg
- Recycled non-deinked pulp: 0.00415904 kg
- Transport, train, diesel powered: 0.183076 t*km
  Wood logs to P&P (pulp and paper) mills: 3.2% of total mass travels 2828 km. Wood chips to P&P mills: 4.8% of total mass travels 1989 km. Recovered fiber to P&P mills: 11.0% of total mass travels 589 km. Pulp to P&P mills: 21.4% of total mass travels 1347 km. Chemicals: 31.3% of total mass travels 1355 km. Residuals to management: 11.0% of total mass travels 589 km.
- Softwood logs with bark; harvested at average intensity site; at mill [US]: 0.00128457 m3
  0.580623221 dry kg, 452 dry kg/m3. Includes bark and wood transformed in black liquor, all used for energy onsite.
- Wood chips; hardwood; green; at sawmill [US]: 0.0475768 kg; provider Sawn lumber, hardwood, rough, green, at sawmill, SE
  hardwood SWD chips. Wood (logs and chips) usage in the process is distrubuted as follows: 51% ends up in pulp, 11% in self-generated hogged fuel, and 37% in black liquor.
- Wood fuel, unspecified [RNA]: 0.00706234 kg
  proxy for unspecified biomass
- Electricity, hydropower, at run-of-river power plant: 0.00353188 MJ
  For self-generated hydro. i.e.: Electricity, hydropower, at run-of-river power plant
- Recovered paper, mixed: 0.0112229 kg
  Broad category that often includes items such as discarded mail, telephone books, paper board, magazines, and catalogs
- Maize starch, at plant: 0.00542012 kg
  i.e. : Maize starch, at plant
- Unspecified additive: 0.00552275 kg
  Includes a variety of papermaking fillers.
- Roundwood, hardwood, average, at forest road [RNA]: 3.82846e-5 m3
  0.023889571 dry kg, 624 dry kg/m3 (http://www.corrim.org/pubs/reports/2010/phase2/Module_C.pdf), includes bark and wood transformed into black liquor, all used for energy
- Sulphate pulp, unbleached, at plant: 0.000127237 kg
  i.e. : Sulphate pulp, unbleached, at plant
- Transport, combination truck, diesel powered: 0.65831 t*km
  Wood logs to P&P (pulp and paper) mills: 96.8% of total mass travels 145 km. Wood chips to P&P mills: 95.2% of total mass travels 259 km. Recovered fiber to P&P mills: 87.8% of total mass travels 201 km. Pulp to P&P mills: 78.6% of total mass travels 267 km. Chemicals: 59.5% of total mass travels 208km. Residuals to management: 87.8% of total mass travels 201km. Purchased hogged fuel, other biomass: 100% of total mass travels 145km.
- Soda powder, at plant [RNA]: 0.0036412 kg
- Liquefied petroleum gas, at refinery: 1.1e-7 m3; provider Petroleum refining, at refinery
- Chips; softwood; green; at sawmill [US]: 0.222834 kg
  southern SWD chips. Wood (logs and chips) usage in the process is distrubuted as follows: 51% ends up in pulp, 11% in self-generated hogged fuel, and 37% in black liquor.
- Electricity, AC, 120 V: 1.59786 MJ; = 1.359937463+0.046461804+0.263182311-0.071718049; provider Electricity; at user; consumption mix - US - US
  Net purchased, National average grid, Medium voltage: <50 kV
- Gasoline, at refinery: 1.15e-8 m3; provider Petroleum refining, at refinery
- Recovered paper, pulp substitutes: 0.00648011 kg
  High-grade paper that often consists of shavings and clippings from converting operations at paper mills and print shops
- Unspecified polymer: 0.000706402 kg
  Strength agents
- Roundwood, hardwood, average, at forest road [RNA]: 0.000184992 m3
  Proxy for southeast.
  0.119874923 dry kg, 648 dry kg/m3
  (http://www.corrim.org/pubs/reports/2010/phase2/Module_L.pdf)
  Includes bark and wood transformed into onsite energy.
- Steam, purchased by containerboard mills: 0.775293 MJ

## Inputs from nature
- Water [resource, water]: 1.83525 kg
  Equal to output of cooling water. Energy for treating water is included in the unit process.
- Water [resource, water]: 0.0291777 m3
  Calculated as total intake - cooling. Energy for treating water is included in the unit process.

## Waste to treatment
- Disposal, coal ash, to uns. beneficial use: 0.00177322 kg
- Disposal, wood ash, to uns. beneficial use: 0.00915243 kg
- Disposal, other solid waste from plant, to uns. beneficial use: 0.00760416 kg
- Disposal, wastewater treatment plant residuals, to uns. beneficial use: 0.00461073 kg
- Disposal, other solid waste from plant, to uns. incinerator: 0.0063076 kg
- Disposal, coal ash, to uns. landfill: 0.00395127 kg
- Disposal, wastewater treatment plant residuals, to uns. land application: 0.0138943 kg
- Disposal, wastewater treatment plant residuals, to uns. landfill: 0.0128094 kg
- Disposal, wood ash mixture, pure, 0% water, to sanitary landfill: 0.0144098 kg
  i.e.: Disposal, wood ash mixture, pure, 0% water, to sanitary landfill
- Disposal, coal ash, to uns. land application: 0.000637607 kg
- Disposal, other solid waste from plant, to uns. landfill: 0.0334067 kg
- Disposal, other solid waste from plant, to uns. land application: 0.00143806 kg
- Disposal, wood ash mixture, pure, 0% water, to uns. land application: 0.00232528 kg
  i.e.: Disposal, wood ash mixture, pure, 0% water, to landfarming

## Emissions to nature
- Molybdenum [emission, air]: 7.48e-7 kg
- Acetaldehyde [emission, air]: 4.68e-5 kg
- Zinc [emission, water]: 1.04e-6 kg
- Chlorine [emission, air]: 1.58e-7 kg
- Chloroform [emission, air]: 3.42e-6 kg
- Di(2-ethylhexyl) phthalate [emission, air]: 1.42e-9 kg
- 1,2-Dichloroethane [emission, air]: 7.76e-10 kg
- 2,3,7,8-Tetrachlorodibenzo-p-dioxin [emission, air]: 5.76e-15 kg
- Iron [emission, water]: 1.35e-10 kg
- Cobalt [emission, air]: 1.35e-8 kg
- Acrolein [emission, air]: 3.29e-6 kg
- Lead [emission, water]: 1.02e-7 kg
- Fluorene [emission, air]: 1.77e-11 kg
- Pyrene [emission, air]: 6.4e-12 kg
- Suspended solids, inorganic [emission, water]: 0.00134524 kg
- Nitrogen oxides [emission, air]: 0.00159749 kg
- Tin [emission, air]: 4.56e-8 kg
- Naphthalene [emission, air]: 1.67e-9 kg
- Carbon monoxide [emission, air]: 0.000263056 kg
- Manganese [emission, water]: 7.74e-6 kg
- Copper [emission, water]: 7.39e-8 kg
- Magnesium [emission, air]: 1.09e-6 kg
- Methyl bromide [emission, air]: 4.01e-8 kg
- Ethylbenzene [emission, air]: 1.82e-9 kg
- Dimethyl sulfate [emission, air]: 9.31e-10 kg
- Phenanthrene [emission, air]: 5.24e-11 kg
- Isophorone [emission, air]: 1.13e-8 kg
- Oils, unspecified [emission, non-FEDEFL, water]: 4.1e-8 kg
- Benzene [emission, air]: 6.02e-6 kg
- Nickel [emission, air]: 7.04e-7 kg
- Water [emission, air]: 3.31227 kg
- Arsenic [emission, water]: 5.64e-8 kg
- Methyl ethyl ketone [emission, air]: 7.56e-9 kg
- Vinyl chloride [emission, air]: 1.75e-7 kg
- Propionaldehyde [emission, air]: 3.16e-6 kg
- Particulate matter, > 10μm [emission, air]: 0.000192132 kg
- Antimony [emission, air]: 4.24e-9 kg
- Radionuclides [emission, air]: 0.701847 kBq
- Methane [emission, air]: 1.29e-5, 0.000184479 kg (2 entries)
- Particulate matter, > 2.5μm and ≤ 10μm [emission, air]: 0.000121224 kg
- Energy, heat [emission, air]: 0.0721686 MJ
- Volatile organic compounds [emission, air]: 1.52e-5, 0.000193573 kg (2 entries)
- Polycyclic aromatic hydrocarbons [emission, air]: 2.07e-5 kg
- Vanadium [emission, water]: 1.23e-7 kg
- Hydrochloric acid [emission, air]: 5.52e-5 kg
- Water [emission, water]: 1.83525, 26.9905 kg (2 entries)
- Phosphorus [emission, air]: 5.06e-7 kg
- Chloride [emission, water]: 2.71e-11 kg
- Benzyl chloride [emission, air]: 1.36e-8 kg
  The chloromethylbenzene (a.k.a., chlorotoluene) isomer (o-, m-, and p-) mix has toxicity factors that are potentially relevant but not yet available in existing methods.
- Strontium [emission, air]: 1.28e-7 kg
- Titanium [emission, air]: 1.6e-7 kg
- Xylene [emission, air]: 1.62e-6 kg
- Vanadium [emission, air]: 1.51e-7 kg
- Chromium(VI) [emission, air]: 9.23e-9 kg
- Phenol [emission, air]: 9.17e-6 kg
- Barium [emission, air]: 3.03e-7 kg
- Propylene [emission, air]: 4.45e-10 kg
- Zinc [emission, air]: 9.78e-7 kg
- 2,4-Dinitrotoluene [emission, air]: 5.43e-12 kg
- Acetone [emission, air]: 8.85e-5 kg
- Methyl tert-butyl ether [emission, air]: 6.79e-10 kg
- Selenium [emission, air]: 6.21e-7 kg
- Fluoride [emission, air]: 8.65e-7 kg
- Beryllium [emission, air]: 5.6e-9 kg
- Adsorbable organic halides [emission, water]: 6.18e-6 kg
- Formaldehyde [emission, air]: 1.82e-5 kg
- Chlorobenzene [emission, air]: 4.27e-10 kg
- Barium [emission, water]: 1.09e-6 kg
- Methyl methacrylate [emission, air]: 3.88e-10 kg
- Hydrazine [emission, air]: 3.3e-9 kg
- Hydrogen sulfide [emission, air]: 0.000177154 kg
- Nitrogen [emission, water]: 0.000207744 kg
- Mercury [emission, water]: 4.64e-11 kg
- Thallium [emission, air]: 2e-9 kg
- Hexane [emission, air]: 2.35e-5 kg
- Boron [emission, air]: 5.78e-7 kg
- Benzo[a]pyrene [emission, air]: 7.35e-9 kg
- Manganese [emission, air]: 4.97e-7 kg
- Phosphorus [emission, water]: 3.57e-5 kg
- Arsenic [emission, air]: 2.76e-8 kg
- Biological Oxygen Demand [emission, water]: 0.000976084 kg
- 1,1,1-Trichloroethane [emission, air]: 1.49e-7 kg
- Acenaphthylene [emission, air]: 4.85e-12 kg
- Iron [emission, air]: 1.91e-7 kg
- Sulfur dioxide [emission, air]: 0.00118467 kg
- Anthracene [emission, air]: 4.07e-12 kg
- Carbon disulfide [emission, air]: 3.23e-6 kg
- Methylene chloride [emission, air]: 7.48e-9 kg
- Biphenyl [emission, air]: 3.3e-11 kg
- Carbon dioxide [emission, air]: 1.24826, 0.337425 kg (2 entries)
- Cadmium [emission, air]: 2.44e-7 kg
- Chromium [emission, air]: 4.73e-8 kg
- Nitrous oxide [emission, air]: 5.15e-5 kg
- Benz[a]anthracene [emission, air]: 1.55e-12 kg
- Lead [emission, air]: 4.42e-7 kg
- Chrysene [emission, air]: 2.37e-12 kg
- Particulate matter [emission, air]: 1.33e-10 kg
- Vinyl acetate [emission, air]: 1.47e-10 kg
- Benzofluoranthene [emission, air]: 2.13e-12 kg
- Hydrofluoric acid [emission, air]: 1.8e-5 kg
- Toluene [emission, air]: 2.68e-5 kg
- Cyanide [emission, air]: 6.03e-8 kg
- 2-Chloroacetophenone [emission, air]: 1.36e-10 kg
- Fluoranthene [emission, air]: 1.38e-11 kg
- Chloromethane [emission, air]: 2.06e-7 kg
- Hexachlorobenzene [emission, air]: 6.63e-9 kg
- Methanol [emission, air]: 0.000791807 kg
- Acetophenone [emission, air]: 2.91e-10 kg
- Ammonia [emission, air]: 6.74e-5 kg
- Tribromomethane [emission, air]: 7.56e-10 kg
- 1,3-Butadiene [emission, air]: 1.22e-7 kg
- Benzo[ghi]perylene [emission, air]: 5.24e-13 kg
- Mercury [emission, air]: 1.18e-7 kg
- Organic compounds [emission, air]: 1.17e-7 kg
- Indeno[1,2,3-cd]pyrene [emission, air]: 1.18e-12 kg
- Cumene [emission, air]: 2.2e-6 kg
- Acenaphthene [emission, air]: 1.2e-7 kg
- Mercaptans [emission, air]: 4.21e-6 kg
- Copper [emission, air]: 6.51e-7 kg
- Particulate matter, ≤ 2.5μm [emission, air]: 0.000314609 kg
- Ethylene dibromide [emission, air]: 2.33e-11 kg
- Chromium [emission, water]: 6.63e-8 kg
- Styrene [emission, air]: 5.08e-6 kg
- Tetrachloroethylene [emission, air]: 1.9e-6 kg
- Nickel [emission, water]: 5.9e-8 kg

## Allocation factors
- causal, Containerboard, average production, at mill, for Melamine urea formaldehyde, MF, resin, neat, 60% solids: 1
- causal, Containerboard, average production, at mill, for Titanium: 1
- causal, Turpentine, from industry-average containerboard, for Pyrene: 0
- causal, Tall oil, from industry-average containerboard, for Unspecified polymer: 0
- causal, Containerboard, average production, at mill, for Disposal, wastewater treatment plant residuals, to uns. land application: 1
- causal, Containerboard, average production, at mill, for Benzofluoranthene: 1
- causal, Turpentine, from industry-average containerboard, for Chromium: 0
- causal, Turpentine, from industry-average containerboard, for Nickel: 0
- causal, Containerboard, average production, at mill, for 1,1,1-Trichloroethane: 1
- causal, Tall oil, from industry-average containerboard, for Hydrofluoric acid: 0
- causal, Turpentine, from industry-average containerboard, for Zinc: 0
- causal, Tall oil, from industry-average containerboard, for Acenaphthylene: 0
- causal, Containerboard, average production, at mill, for Transport, ocean freighter, diesel powered: 1
- causal, Tall oil, from industry-average containerboard, for Copper: 0
- causal, Turpentine, from industry-average containerboard, for Manganese: 0
- causal, Tall oil, from industry-average containerboard, for Volatile organic compounds: 0
- causal, Containerboard, average production, at mill, for Tin: 1
- causal, Tall oil, from industry-average containerboard, for Mercury: 0
- causal, Containerboard, average production, at mill, for Vinyl acetate: 1
- causal, Tall oil, from industry-average containerboard, for Bark; softwood; green; at sawmill: 0
- causal, Turpentine, from industry-average containerboard, for Energy, heat: 0
- causal, Tall oil, from industry-average containerboard, for Methane: 0
- causal, Containerboard, average production, at mill, for Fluoride: 1
- causal, Turpentine, from industry-average containerboard, for Transport, train, diesel powered: 0
- causal, Tall oil, from industry-average containerboard, for Acenaphthene: 0
- causal, Tall oil, from industry-average containerboard, for Carbon dioxide: 0
- causal, Containerboard, average production, at mill, for Chromium: 1
- causal, Containerboard, average production, at mill, for Particulate matter, > 2.5μm and ≤ 10μm: 1
- causal, Containerboard, average production, at mill, for Propylene: 1
- causal, Containerboard, average production, at mill, for Disposal, coal ash, to uns. beneficial use: 1
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
## Inventory method
Attributional

## Modelling constants
his process is generated per survey data detailing production, energy and raw material inputs from 42 containerboard mills representing 70% of overal production volume for 2014. Based on the survey data collected directly from the mills, the utilization rate (quantity of recovered fiber used per unit of production) in 2014 was 0.52 kg/kg containerboard produced and used in the U.S. (or 0.58 kg/kg of corrugated product). This resulted in a utilization rate of 0.48 kg/kg total containerboard produced in the U.S. This compares to a value of 0.47 kg/kg containerboard reported by AF&PA (2015). Recovered fiber used in 2014 containerboard production comes from three main sources: converting wastes, post-consumer old corrugated containers and recovery from other product systems.

## Completeness
TREATMENT OF MISSING ENVIRONMENTAL DATA: All known air-related substances associated with combustion, which are deemed significant through U.S. EPA’s TRI (SARA 313) regulation and other national and international combustion-related air contaminant programs, were included for containerboard production.
TREATMENT OF MISSING TECHNOSPHERE DATA: The data collection was performed in a way that ensured that any flow contributing to more than 1% of the mass inputs of those processes was included, except for chemicals, where only those chemicals contributing more than 10% of the total dry mass of chemicals used in each containerboard component were included. No chemicals with significant individual contribution to any environmental indicator (i.e. > 5%) were ignored. In addition, the mills were asked to report the total mass of "other fillers" required to calculate the average carbon content of containerboard. No significant energy input was omitted. Capital equipment and maintenance, maintenance and operation of support equipment, or transport of employees were excluded. In addition, the study did not include energy related to the use of the packaging product, nor that of the product packaged by it. Other overhead functions such as HVAC and lighting were included to the extent they are considered in total mill energy usage as reported by participating companies.
MASS BALANCE: Water, fiber and carbon balances were performed for the containerboard production and converting unit processes. Where adequate, the results of the mass balances were used to correct the collected data.

## Data treatment
Primary data were from survey data odetailing production, energy and raw material inputs from 42 containerboard mills representing 70% of overal production volume for 2014. Data on water inputs, environmental loads, solid waste management, and energy (quantity and types of fuels) for the relevant pulp and paper mills were drawn from responses to the 2014 AF&PA Enironmental, Health, and Safety (EHS) Survey. Information on quantity of energy used, fiber input, furnish production, and chemical consumption (quantity and type) at the department level were collected in a supplemental survey. Data regarding the emissions of toxic substances (as defined by the U.S. Toxics Release Inventory-TRI) were modeled using U.S. LCI and NCASI information. It was assumed that the mills for which data were collected were spread out geographically in a way that was representative of the average. Data on nutrient content of treated wastewater effluents from pulp and paper mills were derived from available information in the U.S. EPA Permit Compliance System database https://www.epa.gov/enviro/pcs-icis-overview; these data are insufficient to allow characterization of effluents from the specific mills in the database, but they do allow general characterization of effluents from U.S. pulp and paper mills. Data submitted by the industry in connection with the TSCA Inventory Update Rule (IUR, www.epa.gov/iur/) were used to estimate quantities of kraft pulping co-products produced (e.g., tall oil and turpentine); the IUR data were not sufficient to characterize every mill in the database, but were sufficient to characterize kraft pulping processes in general. Information provided via the surveys was quality-assured (QA) using a combination of cross-checking with data previously submitted to the AF&PA EHS survey (which had previously been subjected to a quality-assurance protocol) and by evaluating internal consistency of various data elements based on engineering principles. This process resulted in the inclusion of data for all the 42 containerboard mills. Purchased electricity was assigned upstream loads for the electrical grid serving the specific facilities on which the LCA is based (based on eGrid regions). Containerboard facility location was used to determine the applicable region-specific emission factor. Facility electricity use by product (pro-rated by production mass) was then used to develop the overall electricity mix by product grade, which was different for the industryaverage corrugated products and the product made from 100%-recycled fiber. The load for electricity and steam sold by those facilities was not included in the study. The average quantities of individual fuels consumed during production of steam by the utility CHP plants serving the containerboard mills were estimated using detailed facility information from the 2010 LCA, the US EPA eGRID database, and the Efficiency Method as recommended by the WRI/WBCSD GHG Protocol. Foreground transportation distances were modeled using the 2012 Commodity Flow Survey (CFS) (U.S. Department of Transportation and U.S. Department of Commerce, 2015) and the CORRIM database.

## Data collection
All primary data and secondary data were collected from 2015-2016 for the reference year 2014.

## Sampling procedure
BOUNDARY CONDITIONS: The system boundary includes: debarking and chipping of wood delivered to mills; on-site virgin pulp production in a high-pressure/temperature digester; on-site recycled pulp production/re-pulping; papermaking and conversion (feeding through headbox and wire section, pressing, pre-drying, size pressing, final drying, and winding); and supporting activities (on-site steam and power production, effluent treatment, on-site residual managment, etc.).
DATA COLLECTION: Primary data were from survey data detailing production, energy and raw material inputs from 42 containerboard mills representing 70% of overal production volume for 2014. Data on water inputs, environmental loads, solid waste management, and energy (quantity and types of fuels) for the relevant pulp and paper mills were drawn from responses to the 2014 AF&PA Enironmental, Health, and Safety (EHS) Survey. Information on quantity of energy used, fiber input, furnish production, and chemical consumption (quantity and type) at the department level were collected in a supplemental survey. Data regarding the emissions of toxic substances (as defined by the U.S. Toxics Release Inventory-TRI) were modeled using U.S. LCI and NCASI information. Data were recorded as production-weighted means. Foreground transportation distances were modeled using the 2012 Commodity Flow Survey (CFS) (U.S. Department of Transportation and U.S. Department of Commerce, 2015) and the CORRIM database.
UNCERTAINTY ESTIMATION: Most transportation distances were based on U.S. Census data, which are averaged across different categories.

## Intended application
In order to respond to increasing interest among product manufacturers and consumer retail markets in selecting more sustainable packaging options, CPA engaged NCASI to update the results of a LCA they published in 2014 that relied primarily on 2010 data to the most recent available data (i.e., 2014 data). SITUATION A -- MICRO-LEVEL DECISION SUPPORT: The intended application for this process is for micro-level decision support as described in Goal Situation A from the ILCD Handbook's Detailed Guidance. These data were developed as specific, average or generic unit process LCI results for use in answering internal company product-related questions. A full inventory of environmental flows are included, thus this unit process can be used for a full range of LCIA impact categories, on the fate and transport considerations have been applied. The original study results were analyzed using the TRACI LCIA factors.

## Project
This LCA was commissioned by the Corrugated Packaging Alliance (CPA), a joint venture of the American Forest & Paper Association (AF&PA), Fibre Box Association (FBA), the Association of Independent Corrugated Converters (AICC) and TAPPI. For this study, a core project team was established to direct, review, and coordinate the activities associated with the methodologies employed, data collection, modeling, presentation and dissemination of the LCI data and corresponding LCA results. The core group for this project consisted of a technical advisory group within the Fibre Box Association (FBA) Sustainability Committee along with various staff from the National Council for Air and Stream Improvement (NCASI).

## Review 
The LCA study that produced this unit process was critically reviewed per ISO 14040 and 14044 standards by Dr. Lindita Bushi, Senior Research Associate of Athena Sustainable Materials Institute.

## Sources
- NCASI (2017) LCA Average Corrugated Product
