# Concrete Bridge; USLCI to USEEIO

Dataset: openLCA process, unit process
Category: Bridge Processes/USLCI to USEEIO
Generated by: Franklin Associates, A Division of ERG
isCopyrightProtected: false

## General comment
Bridge process to transparently convert from physical units, in USLCI, to values in 2012 producer price for connecting to background data in the USEEIO repository.

## Reference product
- Concrete, at plant: 1 m3

## Inputs from technosphere
- Ready-mix concrete: 81.3 USD

## Data treatment
Conversion to USD assumes a purchaser price of $160 per yd3. Purchaser prices are in 2024 dollars. The 2023 Rho matrix values (most recent available), which reflect CPI price year ratios, for the appropriate NAICS sector are used to convert current 2024 dollars to the model year (2012) of USEEIO version 2.0. Phi matrix values, which reflect producer-to-purchaser price ratios, for the appropriate NAICS sector are used to convert purchaser price data to producer prices to reflect the basis of USEEIO version 2.0.

2012 Producer Price = 2024 purchaser price * (2023 Rho/2012 Rho) * 2012 Phi

Utilized ratios - NAICS code: 327320/US, 2023 Rho: 0.716990968007658, 2012 Rho: 1.20028939872511, 2012 Phi: 0.650361420512411
