# Transport, single unit truck, gasoline powered

Dataset: openLCA process, unit process
Category: 48-49: Transportation and Warehousing/4841: General Freight Trucking
Geography: United States
Time period: 2024-01-01 to 2024-12-31
Allocation method: physical allocation
Data quality: US EPA - Process Pedigree Matrix (2;1)
Exchange data quality scheme: US EPA - Flow Pedigree Matrix
Generated by: Franklin Associates, A Division of ERG
Published in: ERG (2025) MOVES onroad v1.0
isCopyrightProtected: false
restrictionsDescription: These U.S. LCI Database Project data ("Data") are provided by the National Renewable Energy Laboratory ("NREL"), operated by the Alliance for Sustainable Energy, LLC ("Alliance") for the US Department of Energy ("DOE") under Contract No. DE-AC36-08GO28308. The United States Government (the "Government") retains and the user acknowledges that the Government retains a non-exclusive, paid-up, irrevocable, worldwide license to publish or reproduce the published form of these data, or allow others to do so, for Government purposes.
Access to and use of these Data shall impose the following obligations on the user, as set forth in this Agreement. The user is granted the right, without any fee or cost, to use, copy, modify, alter, enhance and distribute these Data for any purpose whatsoever, provided that this entire notice appears in all copies of the Data. Any modification, alteration or enhancement of these data shall be identified and documented by the user. Further, the user agrees to credit the DOE/NREL/Alliance in any publication that results from the use of these Data. The names DOE/NREL/Alliance, however, may not be used in any advertising or publicity to endorse or promote any products or commercial entities unless specific written permission is obtained from DOE/NREL/Alliance. The user also understands that DOE/NREL/Alliance is not obligated to provide the user with any support, consulting, training or assistance of any kind with regard to the use of these Data or to provide the user with any updates, revisions or new versions of these Data.
YOU AGREE TO INDEMNIFY THE GOVERNMENT AND DOE/NREL/ALLIANCE, AND ITS SUBSIDIARIES, AFFILIATES, OFFICERS, AGENTS, AND EMPLOYEES AGAINST ANY CLAIM OR DEMAND, INCLUDING REASONABLE ATTORNEYS' FEES, RELATED TO YOUR USE OF THESE DATA. THESE DATA ARE PROVIDED BY DOE/NREL/ALLIANCE "AS IS" AND ANY EXPRESS OR IMPLIED WARRANTIES, INCLUDING BUT NOT LIMITED TO, THE IMPLIED WARRANTIES OF MERCHANTABILITY AND FITNESS FOR A PARTICULAR PURPOSE ARE DISCLAIMED. IN NO EVENT SHALL THE GOVERNMENT OR DOE/NREL/ALLIANCE BE LIABLE FOR ANY SPECIAL, INDIRECT OR CONSEQUENTIAL DAMAGES OR ANY DAMAGES WHATSOEVER, INCLUDING BUT NOT LIMITED TO CLAIMS ASSOCIATED WITH THE LOSS OF DATA OR PROFITS, WHICH MAY RESULT FROM AN ACTION IN CONTRACT, NEGLIGENCE OR OTHER TORTIOUS CLAIM THAT ARISES OUT OF OR IN CONNECTION WITH THE ACCESS, USE OR PERFORMANCE OF THESE DATA.

## General comment
This dataset represents the movement of goods via a Single Unit Truck using Gasoline as a fuel source. Emissions and fuel consumption data are calculated using EPA's Motor Vehicle Emission Simulator (MOVES), the regulatory model to determine emission inventories for highway vehicles, including cars, trucks, and buses. The reference flow is the movement of 1 metric ton of goods for a distance of 1 km.

## Technology
Single unit source types in MOVES include refuse trucks, single unit short-haul trucks, single unit long-haul trucks and motor homes. FHWA's vehicle classification specifies that single unit trucks are singleframe trucks with a gross vehicle weight rating of greater than 10,000 pounds or with two axles and at least six tires—colloquially known as "dualies". The single unit truck vehicle category is quite diverse, including (but not limited to) delivery, box, flatbed, cement mixers, and tow trucks, among other body styles and vocations.

## Geography
This process represents emissions from vehicles operating in all U.S. states.

## Time period
This process reflects the vehicle fleet as estimated in 2024. MOVES calculates an age distribution by vehicle type, where age is defined as the difference between a vehicle's model year and the year of analysis. MOVES employs a number of different age dependent factors, including deterioration of engine and emission after-treatment technology due to tampering and mal-maintenance, vehicle scrappage and fleet turnover and mileage accumulation over the lifetime of the vehicle.

## Reference product
- Transport, single unit truck, gasoline powered: 1 t*km

## Inputs from technosphere
- Gasoline, dispensed at pump: 1332.5 btu; data quality (3,1,1,1,1); provider Dispensing of gasoline, at pump

## Emissions to nature
All rows: data quality (3,1,1,1,1)
- Particulate matter, ≤ 10μm [emission, air]: 1.18134e-6 kg
  Tireware
- Particulate matter, ≤ 2.5μm [emission, air]: 1.63751e-6 kg
  Exhaust
- Potassium [emission, air]: 9.84119e-10 kg
- Magnesium [emission, air]: 1.77419e-9 kg
- Chloride [emission, air]: 1.32256e-9 kg
- Titanium [emission, air]: 3.93647e-10 kg
- Acrolein [emission, air]: 2.27549e-8 kg
- Particulate matter, ≤ 10μm [emission, air]: 1.85109e-6 kg
  Exhaust
- Formaldehyde [emission, air]: 2.85611e-7 kg
- Organic carbon, PM2.5 LC [emission, air]: 8.73711e-7 kg
- Sulfur dioxide [emission, air]: 4.86436e-7 kg
- Acetaldehyde [emission, air]: 3.37666e-7 kg
- Carbon dioxide [emission, air]: 0.102167 kg
- Methane [emission, air]: 4.11518e-6 kg
- Particulate matter, ≤ 10μm [emission, air]: 3.74034e-6 kg
  Brakeware
- Carbon monoxide [emission, air]: 0.000727191 kg
- Ammonia [emission, air]: 9.32311e-6 kg
- Nitrogen oxides [emission, air]: 3.9981e-5 kg
- Iron [emission, air]: 2.27834e-8 kg
- Calcium [emission, air]: 1.87705e-8 kg
- Silicon [emission, air]: 3.74462e-9 kg
- Particulate matter, ≤ 2.5μm [emission, air]: 4.67542e-7 kg
  Brakeware
- Ammonium [emission, air]: 3.4444e-8 kg
- Ethanol [emission, air]: 5.02094e-6 kg
- Sodium [emission, air]: 4.80211e-10 kg
- Volatile organic compounds [emission, air]: 5.97269e-5 kg
- Nitrate [emission, air]: 4.75358e-9 kg
- Aluminum [emission, air]: 3.74462e-9 kg
- Nitrous oxide [emission, air]: 3.3355e-6 kg
- Benzene [emission, air]: 1.1968e-6 kg
- 1,3-Butadiene [emission, air]: 1.23918e-7 kg
- Manganese compounds [emission, air]: 1.31265e-10 kg
- Particulate matter, ≤ 2.5μm [emission, air]: 1.77201e-7 kg
  Tireware

## Completeness
Included in the inventory are emissions from operations (i.e., tailpipe exhaust) as well as idling and truck hotelling (both extended engine idling and auxiliary power unit use). Particulate matter from brake and tire wear is also included. Evaporative emissions while the vehicle is soaking (engine off) are not included. Manufacturing of vehicles, roads, and other infrastructure are not included in this dataset.

## Data selection
MOVES runs were performed at the default settings at the state level.

## Data treatment
MOVES combines in-use emission rates and detailed fleet populations and activity, frequently in the form of vehicle miles or kilometers traveled, to calculate inventories.
Average payload estimates are required to calculate LCI data per unit of good transported. The average payloads by MOVES source type were estimated from the 2002 Vehicle Inventory and Use Survey conducted by the US Census Bureau and 2012 and 2017 Freight Analysis Framework (FAF) statistics collected by the Federal Highway Administration.
The mean of the average reported payloads across 2002, 2012, and 2017 are used. The distance-weighted payload in US short tons as applied for single unit trucks is 6.94 tons.

## Data collection
MOVES runs were performed using MOVES4.0.1 in 2024.

## Sampling procedure
Emissions and activity data for each state are combined to generate an activity-weighted average for each region. No uncertainty was assessed.

## Use advice
This process is intended to connect to fuel supply processes in the USLCI or electricity from the U.S. Electricity Baseline.

## Project
This dataset was developed by the Federal LCA Commons Data Curator Eastern Research Group, Inc. (ERG) under subcontract (SUB-2024-10066) to the National Renewable Energy Laboratory under Department of Energy (DOE) Prime Contract No. DE-AC36-08GO28308. The work is funded by DOE's Advanced Materials & Manufacturing Technologies Office (AMMTO).

## Review Independent external review
Review provided by NREL third-party; documentation and response documented in attached source.

## Sources
- USEPA (2024) MOVES4
- FHWA (2020) Freight Analysis Framework
