# Gasoline, combusted in equipment

Dataset: openLCA process, unit process
Category: 22: Utilities/2213: Water, Sewage and Other Systems
Geography: Northern America
Time period: 1995-12-31 to 2002-12-31
Allocation method: no allocation
Generated by: Franklin Associates, A Division of ERG
Published in: Franklin Associates (2003) Gasoline Equipment Combustion
isCopyrightProtected: false
restrictionsDescription: All information can be accessed by everybody.

## General comment
Important note: although most of the data in the US LCI database has
undergone some sort of review, the database as a whole has not yet
undergone a formal validation process.
Please email comments to lci@nrel.gov.

## Technology
Gasoline combustion in equipment such as mobile refrigeration units, generators, pumps, and portable well-drilling equipment.

## Geography
United States

## Reference product
- Gasoline, combusted in equipment [RNA]: 1 l

## Inputs from technosphere
- Transport, train, diesel powered [RNA]: 0.0033554 t*km
  Represents transportation from petroleum refinery to gasoline equipment.
- Transport, pipeline, unspecified petroleum products [RNA]: 0.041307 t*km
  Represents transportation from petroleum refinery to gasoline equipment.
- Gasoline, at refinery: 1 l; provider Petroleum refining, at refinery
- Transport, combination truck, average fuel mix [RNA]: 0.0052453 t*km
  Represents transportation from petroleum refinery to gasoline equipment.
- Transport, barge, average fuel mix [RNA]: 0.028425 t*km
  Represents transportation from petroleum refinery to gasoline equipment.

## Emissions to nature
- Acrolein [emission, air]: 1.3855e-6 kg
- Sulfur oxides [emission, air]: 0.00050092 kg
- Toluene [emission, air]: 6.1261e-6 kg
- Carbon dioxide [emission, air]: 2.085 kg
- Polycyclic aromatic hydrocarbons [emission, air]: 2.5164e-6 kg
- Propylene [emission, air]: 3.8644e-5 kg
- Benzene [emission, air]: 1.3975e-5 kg
- Methane [emission, air]: 0.00092063 kg
- Volatile organic compounds [emission, air]: 0.0028351 kg
- Nitrogen oxides [emission, air]: 0.033472 kg
- Formaldehyde [emission, air]: 1.7674e-5 kg
- 1,3-Butadiene [emission, air]: 5.8565e-7 kg
- Particulate matter, ≤ 10μm [emission, air]: 0.00026521 kg
- Acetaldehyde [emission, air]: 1.1488e-5 kg
- Nitrous oxide [emission, air]: 6.0969e-5 kg
- Carbon monoxide [emission, air]: 0.13535 kg
- Xylene [emission, air]: 4.2688e-6 kg

## Sources
- Center for Transportation Research, Argo
- Franklin Associates (2003) Gasoline Equipment Combustion
