# Building construction, hall, steel construction Bridge; USLCI to USEEIO

Dataset: openLCA process, unit process
Category: Bridge Processes/USLCI to USEEIO
Generated by: Franklin Associates, A Division of ERG
isCopyrightProtected: false

## General comment
Bridge process to transparently convert from physical units, in USLCI, to values in 2012 producer price for connecting to background data in the USEEIO repository.

## Reference product
- Building construction, hall, steel construction: 1 m3

## Inputs from technosphere
- Other nonresidential structures: 130.8 USD

## Data treatment
Conversion to USD assumes purchaser price of $238 per ft2. One cubic meter of building volume is converted to square meters of floor area assuming the Average height of US industrial building = 36 feet or 10.97 meters. 1 cubic meter of building volume is approximately 1 square foot of floor area. Purchaser prices are in 2024 dollars. The 2023 Rho matrix values (most recent available), which reflect CPI price year ratios, for the appropriate NAICS sector are used to convert current 2024 dollars to the model year (2012) of USEEIO version 2.0. Phi matrix values, which reflect producer-to-purchaser price ratios, for the appropriate NAICS sector are used to convert purchaser price data to producer prices to reflect the basis of USEEIO version 2.0.

2012 Producer Price = 2024 purchaser price * (2023 Rho/2012 Rho) * 2012 Phi

Utilized ratios - NAICS code: 333120/US, 2023 Rho: 0.741655936789328, 2012 Rho: 1.07673064616639, 2012 Phi: 0.813340454990679
