# Diesel, combusted in industrial equipment

Dataset: openLCA process, unit process
Category: 22: Utilities/2213: Water, Sewage and Other Systems
Geography: Northern America
Allocation method: no allocation
Generated by: Franklin Associates, A Division of ERG
Published in: Franklin Associates (2003) Diesel Combustion Equipment
isCopyrightProtected: false
restrictionsDescription: All information can be accessed by everybody.

## General comment
Important note: although most of the data in the US LCI database has
undergone some sort of review, the database as a whole has not yet
undergone a formal validation process.
Please email comments to lci@nrel.gov.

## Technology
Diesel combustion in industrial applications such as mobile refrigeration units, generators, pumps, and portable well-drilling equipment.

## Geography
United States

## Reference product
- Diesel, combusted in industrial equipment [RNA]: 1 l

## Inputs from technosphere
- Diesel, at refinery: 1 l; provider Petroleum refining, at refinery
- Transport, train, diesel powered [RNA]: 0.0033554 t*km
  Represents transportation from petroleum refinery to diesel equipment.
- Transport, combination truck, average fuel mix [RNA]: 0.0052453 t*km
  Represents transportation from petroleum refinery to diesel equipment.
- Transport, barge, average fuel mix [RNA]: 0.028425 t*km
  Represents transportation from petroleum refinery to diesel equipment.
- Transport, pipeline, unspecified petroleum products [RNA]: 0.041307 t*km
  Represents transportation from petroleum refinery to diesel equipment.

## Emissions to nature
- Particulate matter, ≤ 10μm [emission, air]: 0.0016503 kg
- Benzene [emission, air]: 1.5506e-5 kg
- Nitrogen oxides [emission, air]: 0.052813 kg
- Acrolein [emission, air]: 1.5373e-6 kg
- Toluene [emission, air]: 6.7975e-6 kg
- Nitrous oxide [emission, air]: 6.7831e-5 kg
- Carbon monoxide [emission, air]: 0.014029 kg
- Polycyclic aromatic hydrocarbons [emission, air]: 2.7921e-6 kg
- Carbon dioxide [emission, air]: 2.701 kg
- Xylene [emission, air]: 4.7367e-6 kg
- Methane [emission, air]: 0.00013363 kg
- Propylene [emission, air]: 4.2879e-5 kg
- Acetaldehyde [emission, air]: 1.2747e-5 kg
- Sulfur oxides [emission, air]: 0.0005986 kg
- 1,3-Butadiene [emission, air]: 6.4984e-7 kg
- Formaldehyde [emission, air]: 1.9612e-5 kg
- Volatile organic compounds [emission, air]: 0.0013519 kg

## Sources
- Franklin Associates (2003) Diesel Combustion Equipment
- Center for Transportation Research, Argo
