# Heat, onsite boiler, hardwood mill, average, SE

Dataset: openLCA process, unit process
Category: 22: Utilities/2213: Water, Sewage and Other Systems
Geography: United States
Time period: 2004-12-31 to 2005-12-31
Allocation method: physical allocation
Generated by: Maureen Puetmann
Published in: Richard D. Bergman
isCopyrightProtected: false
restrictionsDescription: All information can be accessed by everybody.

## General comment
Allocation on a mass basis.
Important note: although most of the data in the US LCI database has
undergone some sort of review, the database as a whole has not yet
undergone a formal validation process.
Please email comments to lci@nrel.gov.

## Technology
Average technology. Some data extrapolated from similar processes.

## Geography
SE = Southeast United States. The 8 states are Arkansas, Louisiana, Mississippi, Alabama, Tennessee, North Carolina, South Carolina, Georgia.

## Reference product
- Heat; onsite boiler; hardwood mill; average [US]: 1 MJ
  Total heat needed to dry 1.0 m^3 lumber;

## By-products
- Electricity; onsite boiler; hardwood mill; average [US]: 0.00191967 kWh
  electricity produced on-site by one mill; 10% efficiency

## Inputs from technosphere
- Natural gas, combusted in industrial boiler [RNA]: 0.000724188 m3
- Residual fuel oil, combusted in industrial boiler [RNA]: 0.000101386 l
- Liquefied petroleum gas, combusted in industrial boiler [RNA]: 0.00030209 l
  Propane combusted in boiler to provide heat
- Wood fuel; hardwood; purchased; combusted in industrial boiler [US]: 0.00655907 kg; provider Wood fuel, hardwood, purchased, combusted in industrial boiler, SE
  Weight reported on an oven dry basis
- Wood fuel; hardwood; gen at lumber mill; combusted in industrial boiler [US]: 0.0426236 kg; provider Wood fuel, hardwood, generated at lumber mill, combusted in industrial boiler, SE
  Weight reported on an oven dry basis

## Allocation factors
- causal, Electricity; onsite boiler; hardwood mill; average, for Wood fuel; hardwood; purchased; combusted in industrial boiler: 0.007
- causal, Heat; onsite boiler; hardwood mill; average, for Wood fuel; hardwood; purchased; combusted in industrial boiler: 0.993
- economic, Heat; onsite boiler; hardwood mill; average: 0.993
- causal, Heat; onsite boiler; hardwood mill; average, for Liquefied petroleum gas, combusted in industrial boiler: 0.993
- causal, Electricity; onsite boiler; hardwood mill; average, for Wood fuel; hardwood; gen at lumber mill; combusted in industrial boiler: 0.007
- physical, Electricity; onsite boiler; hardwood mill; average: 0.007
- causal, Heat; onsite boiler; hardwood mill; average, for Wood fuel; hardwood; gen at lumber mill; combusted in industrial boiler: 0.993
- causal, Heat; onsite boiler; hardwood mill; average, for Residual fuel oil, combusted in industrial boiler: 0.993
- causal, Electricity; onsite boiler; hardwood mill; average, for Natural gas, combusted in industrial boiler: 0
- causal, Heat; onsite boiler; hardwood mill; average, for Natural gas, combusted in industrial boiler: 0
- physical, Heat; onsite boiler; hardwood mill; average: 0.993
- economic, Electricity; onsite boiler; hardwood mill; average: 0.007
- causal, Electricity; onsite boiler; hardwood mill; average, for Liquefied petroleum gas, combusted in industrial boiler: 0.007
- causal, Electricity; onsite boiler; hardwood mill; average, for Residual fuel oil, combusted in industrial boiler: 0.007

## Sampling procedure
Questionnaires from 12 mills from the 8 states of southeast region. Hardwood sawmills were members of the Hardwood Manufacturer Association (HMA).

## Sources
- NHLA
- Richard D. Bergman
- Forest Products Laboratory
- Maureen Puettmann
- Forest Products Laboratory
