# Nitrogen fertilizer, production mix, at plant

Dataset: openLCA process, unit process
Category: 31-33: Manufacturing/3253: Pesticide, Fertilizer, and Other Agricultural Chemical Manufacturing
Geography: Northern America
Allocation method: no allocation
Generated by: Jamie Meil
Published in: Maureen Puetmann
isCopyrightProtected: false
restrictionsDescription: All information can be accessed by everybody.

## General comment
Base process data presented with allocations to within process co-products noted. Refer to allocation worksheet for specifics. All allocations performed using mass or volume., adapted from European data (IDEMAT 2001) in SimaPro
Important note: although most of the data in the US LCI database has undergone some sort of review, the database as a whole has not yet undergone a formal validation process.
Please email comments to lci@nrel.gov.

## Technology
Typical

## Geography
US Southeast

## Reference product
- Nitrogen fertilizer, production mix, at plant [RNA]: 1 kg

## Inputs from technosphere
- Transport, train, diesel powered [RNA]: 0.62 t*km
- Natural gas, production mixture, to material use: 0.946 m3; provider Natural gas, processed, for material use, at plant
  Used as feedstock
- Transport, combination truck, average fuel mix [RNA]: 0.204 t*km
- Electricity, AC, 120 V: 0.18252 MJ; provider Electricity; at user; consumption mix - US - US
- Bituminous coal, combusted in industrial boiler [RNA]: 0.0081 kg

## Inputs from nature
- Natural gas [resource, air, subterranean]: 0.73 MJ
  Proxy for "other fossil" fuels

## Waste to treatment
- Disposal, chemical waste, unspecified, to sanitary landfill: 9e-5 kg
- Disposal, inert solid waste, to inert material landfill: 9e-5 kg

## Emissions to nature
- Carbon monoxide [emission, air]: 3.5e-5 kg
- Methane [emission, air]: 0.000215 kg
- Particulate matter [emission, air]: 0.000265 kg
- Nitrogen oxides [emission, air]: 0.00014 kg
- Carbon dioxide [emission, air]: 0.531 kg
- Nitrous oxide [emission, air]: 0.0031 kg
- Volatile organic compounds [emission, air]: 4.5e-5 kg
- Ammonia [emission, air]: 0.000405 kg
- Zinc [emission, air]: 5e-7 kg
- Nitrogen [emission, air]: 0.00012 kg

## Sources
- Michael Milota
- Maureen Puetmann
- Leonard R. Johnson
