# Wood fuel, hardwood, purchased, combusted in industrial boiler, SE

Dataset: openLCA process, unit process
Category: 22: Utilities/2213: Water, Sewage and Other Systems
Geography: United States
Time period: 2003-12-31 to 2003-12-31
Allocation method: no allocation
Generated by: Maureen Puetmann
Published in: Franklin Associates (2004) Wood Combustion
isCopyrightProtected: false
restrictionsDescription: All information can be accessed by everybody.

## General comment
Important note: although most of the data in the US LCI database has
undergone some sort of review, the database as a whole has not yet
undergone a formal validation process.
Please email comments to lci@nrel.gov.

## Technology
This process is a copy of the FAL "Wood waste, unspecified, combusted into industrial boilers" for which (1) the wood input was changed to an adapted version of the Franklin fuel wood dataset; (2) wood weight is expressed on oven dry basis; (3) outputs to nature have been scaled to reflect 1 kg of oven dry wood input and (4) waste flow is changed to waste treatment input.

## Geography
US

## Reference product
- Wood fuel; hardwood; purchased; combusted in industrial boiler [US]: 1 kg
  Weight reported on an ovendry basis.

## Inputs from technosphere
- Wood fuel, unspecified [RNA]: 1 kg
  Weight reported on an ovendry basis.
- Transport, combination truck, diesel powered [RNA]: 0.003931 t*km
  Wood purchased from a location on average 3.64 km away from boiler; tkm= 1 kg * (1+0.08) * 3.64 kg * 1 tonne/1000 kg

## Waste to treatment
- Disposal, solid waste, unspecified, to unspecified treatment: 0.0882 kg

## Emissions to nature
- Methane [emission, air]: 0.000189 kg
- Selenium [emission, air]: 2.52e-8 kg
- Phenols [emission, air]: 4.59e-7 kg
- Carbon tetrachloride [emission, air]: 4.05e-7 kg
- Naphthalene [emission, air]: 8.73e-7 kg
- Sulfur oxides [emission, air]: 0.000225 kg
- Acetaldehyde [emission, air]: 7.47e-6 kg
- Mercury [emission, air]: 3.15e-8 kg
- Carbon monoxide [emission, air]: 0.0054 kg
- Arsenic [emission, air]: 1.98e-7 kg
- Total Organic Carbon [emission, air]: 3.681e-5 kg
- Metals [emission, air]: 0.00038494 kg
- Chromium [emission, air]: 1.89e-7 kg
- Nickel [emission, air]: 2.97e-7 kg
- Lead [emission, air]: 4.32e-7 kg
- Nitrogen oxides [emission, air]: 0.000117, 0.00198 kg (2 entries)
- Cadmium [emission, air]: 3.69e-8 kg
- Particulate matter, > 2.5μm and ≤ 10μm [emission, air]: 0.0045 kg
- Antimony [emission, air]: 7.11e-8 kg
- Cobalt [emission, air]: 5.85e-8 kg
- Biological Oxygen Demand [emission, water]: 0.0175 kg
- Acrolein [emission, air]: 3.6e-5 kg
- 2,3,7,8-Tetrachlorodibenzo-p-dioxin [emission, air]: 1.50298e-8 kg
- Methylene chloride [emission, air]: 2.61e-6 kg
- Beryllium [emission, air]: 9.9e-9 kg
- Chlorine [emission, air]: 7.11e-6 kg
- Benzene [emission, air]: 3.78e-5 kg
- Carbon dioxide [emission, air]: 1.755 kg
- Manganese [emission, air]: 1.44e-5 kg
- Hydrochloric acid [emission, air]: 0.000171 kg
- Formaldehyde [emission, air]: 3.96e-5 kg

## Sources
- Kaminski, Paul
- Combustion Engineering Inc.
- U.S. DoE
- Argonne National Laboratory
- Sassenrath, Charles P
- Franklin Associates (2004) Wood Combustion
- Maureen Puettmann
- U.S. EPA
