# Benzene, at plant

Dataset: openLCA process, unit process
Category: 31-33: Manufacturing/3251: Basic Chemical Manufacturing
Geography: Northern America
Time period: 1991-12-31 to 2002-12-31
Allocation method: no allocation
Data quality: US EPA - Process Pedigree Matrix (4;1)
Generated by: Franklin Associates, A Division of ERG
Published in: THE PLASTICS DIVISION OF THE AMERICAN C
isCopyrightProtected: false
restrictionsDescription: All information can be accessed by everybody.

## General comment
Numerous aromatic coproduct streams are produced during this process. Fuel gas and off-gas were two of the coproducts produced that were exported to another process for fuel use. Pyrolysis gas and catalytic reformate account for 70 percent of the world production of benzene. It is estimated that one-third of benzene production is from pyrolysis gasoline and two-thirds are produced from catalytic reforming. The collected datasets for benzene production were weighted using these fractions. Numerous aromatic coproduct streams are produced during this process. Fuel gas and off-gas were two of the coproducts produced that were exported to another process for fuel use. When these fuel coproducts are exported from the aromatics separation process, they carry with them the allocated share of the inputs and outputs for their production. The ratio of the mass of the exported fuel over the total mass output was removed from the total inputs and outputs, and the remaining inputs and outputs are allocated over the material aromatics products. No energy credit is applied for the exported fuels, since both the inputs and outputs for the exported fuels have been removed from the data set. Complete inventory data and metadata are available in full in the final report and appendices, Cradle-to-Gate Life Cycle Inventory of Nine Plastic Resins and Four Polyurethane Precursors. This report has been extensively reviewed within Franklin Associates and has undergone partial critical review by ACC Plastics Division members and is available at: www.americanchemistry.com. Quantities may vary slightly between the reference to main source and and this module due to rounding. Important note: although most of the data in the US LCI database has undergone some sort of review, the database as a whole has not yet undergone a formal validation process. Please email comments to lci@nrel.gov.

## Technology
Separation from pyrolysis gas using fractional distillation of the pyrolysis gas dissolved in a polar solvent and solvent extraction followed by fractional distillation of catalytic reformate

## Geography
US

## Reference product
- Benzene, at plant [RNA]: 1 kg

## Inputs from technosphere
- Petroleum refined, to energy use, at refinery: 0.016 kg; provider Petroleum refined, for energy use, at plant
  A portion of the material feed combusts within the hydrocracker and produces an offgas, which provides an internal energy source.
- Residual fuel oil, combusted in industrial boiler [RNA]: 0.0322913 l
- Transport, train, diesel powered [RNA]: 0.151283 t*km
- Transport, combination truck, diesel powered [RNA]: 0.0300011 t*km
- Transport, barge, residual fuel oil powered [RNA]: 0.124532 t*km
- Transport, pipeline, unspecified petroleum products [RNA]: 0.237245 t*km
- Natural gas, combusted in industrial boiler [RNA]: 0.0393977 m3
- Natural gas, production mixture, to energy use: 0.0221 kg; provider Natural gas, processed, for energy use, at plant
  (same comment as for Petroleum refined, to energy use, at refinery)
- Electricity, at cogen, for natural gas turbine [US]: 0.00958995 kWh
- Electricity, AC, 120 V: 0.0573016 MJ; provider Electricity; at user; consumption mix - US - US
- Diesel, combusted in industrial equipment [RNA]: 0.0033376 l
  Includes diesel fuel and distillate oil amounts.
- Pyrolysis gasoline, at plant [RNA]: 0.335 kg
- Petroleum refined, to material use, at refinery: 0.667 kg; provider Petroleum refined, for material use, at plant
- Transport, barge, diesel powered [RNA]: 0.0374531 t*km

## Waste to treatment
- Disposal, solid waste, unspecified, to sanitary landfill: 0.000425262 kg
- Disposal, solid waste, unspecified, to municipal incineration: 5.0949e-5 kg

## Emissions to nature
- Carbon monoxide [emission, air]: 1e-5 kg
  This emission was reported by fewer than three companies. To indicate known emissions while protecting the confidentiality of individual company responses, the emission is reported only by order of magnitude.
- Biological Oxygen Demand [emission, water]: 0.000467253 kg
- Total oil and grease, less total petroleum hydrocarbons (TPH) [emission, water]: 1.7805e-5 kg
- Carbon dioxide [emission, air]: 0.04521 kg
- Sulfide [emission, water]: 1e-6 kg
  (same comment as for Carbon monoxide)
- Benzene [emission, water]: 1e-9 kg
  (same comment as for Carbon monoxide)
- Particulate matter, > 2.5μm and ≤ 10μm [emission, air]: 1e-6 kg
  (same comment as for Carbon monoxide)
- Total dissolved solids [emission, water]: 0.000105404 kg
- Chlorine [emission, air]: 1e-7 kg
  (same comment as for Carbon monoxide)
- Hydrogen [emission, air]: 1.42857e-7 MJ
  (same comment as for Carbon monoxide)
- Total Organic Carbon [emission, water]: 1e-8 kg
  (same comment as for Carbon monoxide)
- Volatile organic compounds [emission, air]: 1e-5 kg
  (same comment as for Carbon monoxide)
- Particulate matter, ≤ 2.5μm [emission, air]: 1e-5 kg
  (same comment as for Carbon monoxide)
- Chemical Oxygen Demand [emission, water]: 0.00108124 kg
- Suspended solids, inorganic [emission, water]: 1e-6 kg
  (same comment as for Carbon monoxide)
- Particulate matter [emission, air]: 1.88516e-5 kg
- Sulfur oxides [emission, air]: 0.00044295 kg
- Nitrogen oxides [emission, air]: 6.233e-5 kg

## Sampling procedure
Data are from primary sources.

## Sources
- THE PLASTICS DIVISION OF THE AMERICAN C
