# Styrene; at plant

Dataset: openLCA process, unit process
Category: 31-33: Manufacturing/3251: Basic Chemical Manufacturing
Geography: Northern America
Time period: 2002-01-01 to 2015-12-29
Allocation method: physical allocation
Data quality: US EPA - Process Pedigree Matrix (4;1)
Generated by: Franklin Associates, A Division of ERG
Owner: American Chemistry Council
Published in: American Chemistry Council, 2022, HIPS
isCopyrightProtected: false
restrictionsDescription: These U.S. LCI Database Project data ("Data") are provided by the National Renewable Energy Laboratory ("NREL"), operated by the Alliance for Sustainable Energy, LLC ("Alliance") for the US Department of Energy ("DOE") under Contract No. DE-AC36-08GO28308. The United States Government (the "Government") retains and the user acknowledges that the Government retains a non-exclusive, paid-up, irrevocable, worldwide license to publish or reproduce the published form of these data, or allow others to do so, for Government purposes.
Access to and use of these Data shall impose the following obligations on the user, as set forth in this Agreement. The user is granted the right, without any fee or cost, to use, copy, modify, alter, enhance and distribute these Data for any purpose whatsoever, provided that this entire notice appears in all copies of the Data. Any modification, alteration or enhancement of these data shall be identified and documented by the user. Further, the user agrees to credit the DOE/NREL/Alliance in any publication that results from the use of these Data. The names DOE/NREL/Alliance, however, may not be used in any advertising or publicity to endorse or promote any products or commercial entities unless specific written permission is obtained from DOE/NREL/Alliance. The user also understands that DOE/NREL/Alliance is not obligated to provide the user with any support, consulting, training or assistance of any kind with regard to the use of these Data or to provide the user with any updates, revisions or new versions of these Data.
YOU AGREE TO INDEMNIFY THE GOVERNMENT AND DOE/NREL/ALLIANCE, AND ITS SUBSIDIARIES, AFFILIATES, OFFICERS, AGENTS, AND EMPLOYEES AGAINST ANY CLAIM OR DEMAND, INCLUDING REASONABLE ATTORNEYS' FEES, RELATED TO YOUR USE OF THESE DATA. THESE DATA ARE PROVIDED BY DOE/NREL/ALLIANCE "AS IS" AND ANY EXPRESS OR IMPLIED WARRANTIES, INCLUDING BUT NOT LIMITED TO, THE IMPLIED WARRANTIES OF MERCHANTABILITY AND FITNESS FOR A PARTICULAR PURPOSE ARE DISCLAIMED. IN NO EVENT SHALL THE GOVERNMENT OR DOE/NREL/ALLIANCE BE LIABLE FOR ANY SPECIAL, INDIRECT OR CONSEQUENTIAL DAMAGES OR ANY DAMAGES WHATSOEVER, INCLUDING BUT NOT LIMITED TO CLAIMS ASSOCIATED WITH THE LOSS OF DATA OR PROFITS, WHICH MAY RESULT FROM AN ACTION IN CONTRACT, NEGLIGENCE OR OTHER TORTIOUS CLAIM THAT ARISES OUT OF OR IN CONNECTION WITH THE ACCESS, USE OR PERFORMANCE OF THESE DATA.

## General comment
The functional unit for this model is one kilogram of styrene. This styrene dataset includes the production of the amount of ethylbenzene required to produce 1 kg of styrene. The system boundary includes the gate-to-gate production of ethylbenzene and styrene. Incoming transport, manufacturing, and disposal of process wastes are included within this boundary. Ethylbenzene is produced by the alkylation of benzene with ethylene. Styrene is then produced by the dehydrogenation of ethylbenzene. Toluene or a benzene/toluene mix are produced as coproduct streams during this process. A mass basis was used to partition the credit for these coproducts. Primary data were collected from an ethylbenzene/styrene manufacturer in 2015, this dataset was compared to the previously collected 2002-2003 data and the differences between the dataset were considered not significantly different statistically so the data was averaged with the 2002-2003 data to form this dataset. The styrene producer who provided 2015 data for this module verified that the characteristics of their plants are representative of North American styrene production.

## Technology
The overall technology is similar among all styrene plants that submitted data for this analysis. The production of the styrene monomer is accomplished through a series of processes including ethylbenzene production and the dehydrogenation of ethylbenzene. The first is the production of ethylbenzene by the alkylation of benzene with ethylene. In this process, benzene initially passes through a drying column. From the drying column, the benzene and ethylene are mixed in a reactor with a suitable catalyst. This reaction is exothermic and occurs at relatively low pressures and temperatures. Unreacted benzene is removed and recycled back to the process. The ethylbenzene is then separated from the solution. The heavy bottoms, tars, and vent gases are burned while the solution is recycled back to the reactor.

Styrene is produced by dehydrogenation of ethylbenzene. The ethylbenzene is mixed with steam, then allowed to come in contact with a catalyst in a reactor. This reaction is conducted at high temperature under vacuum. The heat is recovered from this reaction, and the hydrocarbon solution is sent to a series of fractionation units. The first separation removes the small amount (4 to 6 percent) of toluene and benzene produced by cracking. This toluene/benzene stream is typically sent back to the benzene plant. The second separation removes unreacted ethylbenzene and recycles it back into the system. Purified styrene monomer is recovered in the third and final phase. Bottoms or tar residue is removed from this third phase.

## Geography
This unit process data is representative of average ethylbenzene/styrene production in North America. All data collected were from 3 plants in the United States and incoming materials were modeled using North American databases such as the U.S. LCI database, ecoinvent (adapted to US conditions), and Franklin Associates’ private database. The producers who provided data for this module verified that the characteristics of their plants are representative of a majority of North American ethylbenzene/styrene production.

## Time period
This ethylbenzene/styrene unit process data was updated using one dataset collected in 2015 and averaging it with two 2002-2003 datasets used in the previous dataset and report.

## Reference product
- Styrene, at plant [RNA]: 1 kg

## Inputs from technosphere
- Electricity, AC, 120 V: 0.5976 MJ; provider Electricity; at user; consumption mix - US - US
- Transport, pipeline, unspecified petroleum products [RNA]: 0.0165 t*km
- Natural gas, combusted in industrial boiler [RNA]: 0.401 m3
- Benzene, at plant [RNA]: 0.781 kg
- Transport, barge, average fuel mix [RNA]: 0.013 t*km
- Ethylene, at plant, kg: 0.288 kg; provider Ethylene, materials production, organic compound, at plant, kg

## Inputs from nature
- Water, fresh [resource, water, fresh water body, lake]: 8.3e-6 m3

## Waste to treatment
- Disposal, solid waste, to incineration without energy recovery: 0.0001 kg
  This data was reported by fewer than three companies. To indicate known emissions while protecting the confidentiality of individual company responses, the emission is reported only by order of magnitude.
- Disposal, solid waste, process, to sanitary landfill: 0.001 kg
  (same comment as for Disposal, solid waste, to incineration without energy recovery)
- Disposal, hazardous waste, to unspecified hazardous waste landfill: 1e-5 kg
  (same comment as for Disposal, solid waste, to incineration without energy recovery)

## Emissions to nature
- Ethylbenzene [emission, water]: 1e-6 kg
- Volatile organic compounds [emission, air]: 1e-6 kg
  (same comment as for Disposal, solid waste, to incineration without energy recovery)
- Styrene [emission, water]: 1e-6 kg
  (same comment as for Disposal, solid waste, to incineration without energy recovery)
- Particulate matter, > 2.5μm and ≤ 10μm [emission, air]: 1e-6 kg
  (same comment as for Disposal, solid waste, to incineration without energy recovery)
- Carbon dioxide [emission, air]: 0.33 kg
- Methane [emission, air]: 1e-6 kg
  (same comment as for Disposal, solid waste, to incineration without energy recovery)
- Biological Oxygen Demand [emission, water]: 1e-6 kg
  (same comment as for Disposal, solid waste, to incineration without energy recovery)
- Sulfur oxides [emission, air]: 1e-7 kg
  (same comment as for Disposal, solid waste, to incineration without energy recovery)
- Particulate matter [emission, air]: 1e-6 kg
  (same comment as for Disposal, solid waste, to incineration without energy recovery)
- Suspended solids, inorganic [emission, water]: 1e-6 kg
  (same comment as for Disposal, solid waste, to incineration without energy recovery)
- Nitrous oxide [emission, air]: 1e-7 kg
  (same comment as for Disposal, solid waste, to incineration without energy recovery)
- Nitrogen oxides [emission, air]: 0.0001 kg
  (same comment as for Disposal, solid waste, to incineration without energy recovery)
- Carbon monoxide [emission, air]: 0.00033 kg
- Particulate matter, ≤ 10μm [emission, air]: 1e-5 kg
  (same comment as for Disposal, solid waste, to incineration without energy recovery)
- Salts, unspecified [emission, non-FEDEFL, water]: 1e-9 kg
  Proxy for phosphoric acid. This data was reported by fewer than three companies. To indicate known emissions while protecting the confidentiality of individual company responses, the emission is reported only by order of magnitude.

## Inventory method
Attributional and gate to gate process. Developed with the intention to be compatible with TRACI.

## Modelling constants
Primary data were used to model the production of ethylbenzene and styrene. All data received were carefully evaluated before compiling the production-weighted average data sets used to generate results. Secondary supporting background data were drawn from credible, widely used databases including the US LCI database, GREET, and Ecoinvent.

## Completeness
Treatment of Missing Environmental Data: Elementary and technosphere flows are cut-off at less than 1% based on environmental relevance.

Treatment of Missing Technosphere Data: Miscellaneous materials and additives, capital equipment, facilities and infrastructure, space conditioning, and support personnel requirements not included in this unit process. No gaps have been identified in this dataset.

Mass Balance: The mass balance for each individual plant was calculated.

## Data selection
All ethylbenzene/styrene production data was sourced from primary producers. Data evaluation procedures and criteria were applied consistently to all primary data provided by the participating producers for all data collected. All primary data obtained specifically for this study were considered the most representative available for the systems studied. Data sets were reviewed for completeness and reliable material balances, and follow-up was conducted as needed to resolve any questions about the input and output flows, process technology, etc. The aggregated averaged dataset was also reviewed by the current providing company as compared to the provided dataset. That company also reviewed whether their data were complete and commented about their or the average dataset.

## Data treatment
Only one producer provided ethylbenzene/styrene data for the year 2015. This data was compared to the previously collected 2 datasets representing 2002/2003 production data and found to be similar. A horizontal average was then calculated from these 3 datasets. To indicate known emissions while protecting the confidentiality of individual company responses, some emissions are reported only by the order of magnitude of the average.

## Data collection
Ethylbenzene/styrene data was updated using one primary dataset collected from 2015 and averaging it with the 2002-3 primary datasets used in the original average ethylbenzene/styrene LCI data.

## Sampling procedure
Boundary Conditions: The system boundary includes ethylbenzene/styrene manufacturing, and includes incoming transportation and upstream burdens for each material as well as process waste management. The following are excluded from the system boundary: miscellaneous materials and additives, capital equipment, facilities and infrastructure, space conditioning, and support personnel requirements.

Data Collection: Data were collected from ethylbenzene/styrene manufacturers.

Uncertainty Estimation: Uncertainty was not calculated.

## Intended application
Situation C1 - Accounting, with system-external interactions - The intended application is a purely descriptive accounting / documentation of the analysed system including existing interactions with other systems in the LCI model. These data are an update to a previously published dataset which is a generic unit process model. A full inventory of environmental flows are included; thus this unit process can be used for a full range of LCIA impact categories. The target audience of this model includes LCA practitioners, industry, and the general public. For use as an average dataset accepted by the North American plastics/chemical industry. An inventory of environmental emission flows are included to the extent that the producers provided; thus this unit process can be used for a full range of LCIA impact categories. The original study results were analyzed using the TRACI LCIA factors.

## Project
This project was funded by and submitted to the American Chemistry Council. These data are an update to a previously published dataset which is a generic unit process data; Cradle-to-Gate Life Cycle Analysis of High Impact Polystrene (HIPS). Submitted to the American Chemistry Council (ACC). 2022.

## Review 
The data providers reviewed their data and the average. Three ACC members reviewed the associated final report. Internal ERG review of data entry proofreading, and data documentation was also carried out.

## Sources
- American Chemistry Council, 2022, HIPS
