# Crude oil, production mixture, at extraction

Dataset: openLCA process, unit process
Category: 21: Mining, Quarrying, and Oil and Gas Extraction/2111: Oil and Gas Extraction
Geography: United States
Time period: 2014-01-01 to 2014-12-31
Allocation method: no allocation
Generated by: Franklin Associates, A Division of ERG
Published in: Franklin Associates (2020). Cradle-to-Gate Life Cycle Analysis of Olefins
isCopyrightProtected: false
restrictionsDescription: These U.S. LCI Database Project data ("Data") are provided by the National Renewable Energy Laboratory ("NREL"), operated by the Alliance for Sustainable Energy, LLC ("Alliance") for the US Department of Energy ("DOE") under Contract No. DE-AC36-08GO28308. The United States Government (the "Government") retains and the user acknowledges that the Government retains a non-exclusive, paid-up, irrevocable, worldwide license to publish or reproduce the published form of these data, or allow others to do so, for Government purposes.
Access to and use of these Data shall impose the following obligations on the user, as set forth in this Agreement. The user is granted the right, without any fee or cost, to use, copy, modify, alter, enhance and distribute these Data for any purpose whatsoever, provided that this entire notice appears in all copies of the Data. Any modification, alteration or enhancement of these data shall be identified and documented by the user. Further, the user agrees to credit the DOE/NREL/Alliance in any publication that results from the use of these Data. The names DOE/NREL/Alliance, however, may not be used in any advertising or publicity to endorse or promote any products or commercial entities unless specific written permission is obtained from DOE/NREL/Alliance. The user also understands that DOE/NREL/Alliance is not obligated to provide the user with any support, consulting, training or assistance of any kind with regard to the use of these Data or to provide the user with any updates, revisions or new versions of these Data.
YOU AGREE TO INDEMNIFY THE GOVERNMENT AND DOE/NREL/ALLIANCE, AND ITS SUBSIDIARIES, AFFILIATES, OFFICERS, AGENTS, AND EMPLOYEES AGAINST ANY CLAIM OR DEMAND, INCLUDING REASONABLE ATTORNEYS' FEES, RELATED TO YOUR USE OF THESE DATA. THESE DATA ARE PROVIDED BY DOE/NREL/ALLIANCE "AS IS" AND ANY EXPRESS OR IMPLIED WARRANTIES, INCLUDING BUT NOT LIMITED TO, THE IMPLIED WARRANTIES OF MERCHANTABILITY AND FITNESS FOR A PARTICULAR PURPOSE ARE DISCLAIMED. IN NO EVENT SHALL THE GOVERNMENT OR DOE/NREL/ALLIANCE BE LIABLE FOR ANY SPECIAL, INDIRECT OR CONSEQUENTIAL DAMAGES OR ANY DAMAGES WHATSOEVER, INCLUDING BUT NOT LIMITED TO CLAIMS ASSOCIATED WITH THE LOSS OF DATA OR PROFITS, WHICH MAY RESULT FROM AN ACTION IN CONTRACT, NEGLIGENCE OR OTHER TORTIOUS CLAIM THAT ARISES OUT OF OR IN CONNECTION WITH THE ACCESS, USE OR PERFORMANCE OF THESE DATA.

## General comment
This unit process combines the U.S. crude oil production sources based on their percentage share in the U.S. crude oil production mix. The mix is made up of domestic on-shore, domestic off-shore, imported on-shore and imported off-shore sources. The process is for 1kg of crude oil to consumer. The crude oil mix is based on 2014 data from US Energy Information Administration (EIA), as well as data from National Oceanic and Atmospheric (NOAA), Sheridan 2006, and Bureau of Ocean Energy Management.

## Technology
Crude oil extraction by percentage source. Includes onshore and offshore drilling into underground porous rock structures. Natural pressure or an automated pump bring oil to the surface. Once surfaced, oil is separated from water.

## Geography
This process is representative of the U.S. crude oil production mix.

## Time period
This process is representative of the 2014 aggregate crude oil production mix based on percentages from EIA, 2017.

## Reference product
- Crude oil, production mixture, at extraction [RNA]: 1 kg

## Inputs from technosphere
- Crude oil, at extraction: 0.3855 kg; provider Crude oil, on-shore import, at extraction
- Crude oil, at extraction: 0.0875 kg; provider Crude oil, off-shore domestic, at extraction
- Crude oil, at extraction: 0.4236 kg; provider Crude oil, on-shore domestic, at extraction
- Crude oil, at extraction: 0.1033 kg; provider Crude oil, off-shore import, at extraction

## Inventory method
Attributional; gate to gate process. Compatible with TRACI.

## Modelling constants
Secondary data were used to determine the U.S. mix of crude oil.

## Completeness
TREATMENT OF MISSING ENVIRONMENTAL DATA: Elementary flows are cut-off at less than 1% based on environmental relevance.
TREATMENT OF MISSING TECHNOSPHERE DATA: Miscellaneous materials and additives, capital equipment, facilities and infrastructure, space conditioning, and support personnel requirements are not included in this system process. No gaps have been identified in this dataset.
MASS BALANCE: The mass balance was calculated by a straight comparison of inputs and outputs

## Data treatment
This dataset was used to model the aggregate crude oil extraction production mix process based on percentages from EIA, 2017.

## Data collection
Data collected from EIA 2017.

## Sampling procedure
BOUNDARY CONDITIONS
The system boundary includes upstream burdens from incoming crude oil extraction sources and represents a consolidation of four extraction sources into one production mix. The following are excluded from the unit process boundary: miscellaneous materials and additives, capital equipment, facilities and infrastructure, space conditioning, and support personnel requirements.

DATA COLLECTION
Secondary data were collected from EIA, 2023.

UNCERTAINTY ESTIMATION
No uncertainty analysis was carried out due to the lack of uncertainty data or probability distributions for key parameters, which are often only available as single point estimates from NETL.

## Intended application
The intended application for this process is for accounting purposes as described in Goal Situation C1 from the ILCD Handbook's Detailed Guidance. LCA studies with this intended application offer "purely descriptive documentation of the system under analysis (e.g., a product, sector or country), without being interested in any potential consequences on other parts of the economy.” The studies categorized under Goal Situation C1 do consider existing benefits outside the analyzed system such as recycling. A full inventory of environmental flows are included; thus this unit process can be used for a full range of LCIA impact categories. The target audience of this model includes LCA practitioners, industry, and the general public. For use as an average dataset accepted by the North American plastics/chemical industry. An inventory of environmental emission flows are included to the extent that the producers provided; thus this unit process can be used for a full range of LCIA impact categories. The original study results were analyzed using the TRACI LCIA factors.

## Project
This project was funded by and submitted to the American Chemistry Council. These data are a background dataset used in the Cradle-to-Gate Life Cycle Analysis of Olefins report. Submitted to the American Chemistry Council (ACC). 2020.

## Review 
Internal review of data entry proofreading, mass balance verification and data documentation.

## Sources
- Franklin Associates (2020). Cradle-to-Gate Life Cycle Analysis of Olefins
