# Switchgrass, harvested, wet

Dataset: openLCA process, unit process
Category: 11: Agriculture, Forestry, Fishing and Hunting/1151: Support Activities for Crop Production
Geography: Northern America
Time period: 2009-12-31 to 2009-12-31
Allocation method: no allocation
Generated by: Daniel Inman
Published in: Hsu, D.
isCopyrightProtected: false
restrictionsDescription: All information can be accessed by everybody.

## General comment
mass of switchgrass at 34% moisture with 20% harvest loss.

## Technology
current

## Geography
North America

## Time period
2010

## Reference product
- Switchgrass, harvested, wet [RNA]: 1.07 kg

## Inputs from technosphere
- Switchgrass, production [RNA]: 1 kg; provider Switchgrass, production, US, 2022
  Previous module was based on 15% moisture.
- Baling: 0.933 m2; = 9.33E-5*10000
- Mowing, by rotary mower: 0.933 m2; = 9.33E-5*10000
  occupation based on 10 years of production. Mowed directly to a cart. No windrower needed.

## Emissions to nature
- Carbon dioxide [emission, air]: 0.295 kg
  carbon dioxide going to the air from biomass that is not harvested. This carbon dioxide was previously taken up by the biomass.

## Sources
- Hess, J.
- Hsu, D.
