# Propylene oxide, at plant

Dataset: openLCA process, unit process
Category: 31-33: Manufacturing/3251: Basic Chemical Manufacturing
Geography: Northern America
Time period: 1992-01-01 to 1992-12-31
Allocation method: no allocation
Data quality: US EPA - Process Pedigree Matrix (4;1)
Generated by: Franklin Associates, A Division of ERG
Owner: American Chemistry Council
Published in: American Chemistry Council, 2022, Polyether Polyol for Flexible Foam Polyurethanes
isCopyrightProtected: false
restrictionsDescription: These U.S. LCI Database Project data ("Data") are provided by the National Renewable Energy Laboratory ("NREL"), operated by the Alliance for Sustainable Energy, LLC ("Alliance") for the US Department of Energy ("DOE") under Contract No. DE-AC36-08GO28308. The United States Government (the "Government") retains and the user acknowledges that the Government retains a non-exclusive, paid-up, irrevocable, worldwide license to publish or reproduce the published form of these data, or allow others to do so, for Government purposes.
Access to and use of these Data shall impose the following obligations on the user, as set forth in this Agreement. The user is granted the right, without any fee or cost, to use, copy, modify, alter, enhance and distribute these Data for any purpose whatsoever, provided that this entire notice appears in all copies of the Data. Any modification, alteration or enhancement of these data shall be identified and documented by the user. Further, the user agrees to credit the DOE/NREL/Alliance in any publication that results from the use of these Data. The names DOE/NREL/Alliance, however, may not be used in any advertising or publicity to endorse or promote any products or commercial entities unless specific written permission is obtained from DOE/NREL/Alliance. The user also understands that DOE/NREL/Alliance is not obligated to provide the user with any support, consulting, training or assistance of any kind with regard to the use of these Data or to provide the user with any updates, revisions or new versions of these Data.
YOU AGREE TO INDEMNIFY THE GOVERNMENT AND DOE/NREL/ALLIANCE, AND ITS SUBSIDIARIES, AFFILIATES, OFFICERS, AGENTS, AND EMPLOYEES AGAINST ANY CLAIM OR DEMAND, INCLUDING REASONABLE ATTORNEYS' FEES, RELATED TO YOUR USE OF THESE DATA. THESE DATA ARE PROVIDED BY DOE/NREL/ALLIANCE "AS IS" AND ANY EXPRESS OR IMPLIED WARRANTIES, INCLUDING BUT NOT LIMITED TO, THE IMPLIED WARRANTIES OF MERCHANTABILITY AND FITNESS FOR A PARTICULAR PURPOSE ARE DISCLAIMED. IN NO EVENT SHALL THE GOVERNMENT OR DOE/NREL/ALLIANCE BE LIABLE FOR ANY SPECIAL, INDIRECT OR CONSEQUENTIAL DAMAGES OR ANY DAMAGES WHATSOEVER, INCLUDING BUT NOT LIMITED TO CLAIMS ASSOCIATED WITH THE LOSS OF DATA OR PROFITS, WHICH MAY RESULT FROM AN ACTION IN CONTRACT, NEGLIGENCE OR OTHER TORTIOUS CLAIM THAT ARISES OUT OF OR IN CONNECTION WITH THE ACCESS, USE OR PERFORMANCE OF THESE DATA.

## General comment
This gate-to-gate unit process represents the production of one kilogram of propylene oxide produced in North America. The studied system boundary includes elementary flows associated with upstream raw material extraction and processing, incoming transport, manufacturing of propylene oxide, and disposal of process wastes. This dataset is a weighted average of three technologies based on an estimated 2020 production capacity: chlorohydrin (50 percent), isobutene hydroperoxidation (33.9 percent), and ethylbenzene hydroperoxidation (16.1 percent). Newer technologies such as hyperoxidation using cumene hydroperoxide or hydrogen peroxide make up approximately 10 percent of the technology use but data was unavailable for these processes so these were excluded from this dataset. The energy, environmental emissions and raw materials for all three technologies included are based on datasets from a confidential secondary source from 1992. Energy requirement data for the two peroxidation technologies from a Department of Energy (DOE) report (US DOE, 2000) were used to check the older data. This unit process includes a cutoff flow that represents process waste disposal. In the two hydroperoxidation datasets, coproduct credit was given on a mass basis.

An excess amount of brine water is produced during one of the technologies but is not presented as an output to nature; these output amounts would likely explain the inconsistency in the mass balance shown for this hybrid technology inventory.

## Technology
Three propylene oxide production technologies are included in this dataset: chlorohydrin, isobutene hydroperoxidation, and ethylbenzene.

The chlorohydrin process begins with an equal molar mixture of propylene and chlorine in water, which forms the solution propylene chlorohydrin. The chlorohydrin solution is treated with a base, usually cell liquor from a chlorine plant, to form the oxide. Propylene oxide is then stripped from the alkaline solution and purified by distilling the light ends, then the oxide.

In the isobutene hydroperoxide process, propylene oxide and tert-butyl alcohol are formed from isobutene, oxygen, and propylene. Isobutane is first oxidized to the intermediate, tert-butyl hydroperoxide. This intermediate and an alcohol mixture coproduct is combined with propylene. This is reacted to nearly 100 percent conversion of the hydroperoxide over a catalyst. The products stream contains propylene oxide and tert-butyl alcohol. The products are separated in distillation columns.

In the ethylbenzene hydroperoxide reaction, propylene oxide and styrene are produced. Ethylbenzene and oxygen are reacted to form ethylbenzene hydroperoxide and small amounts of methylbenzyl alcohol and acetophenone. This solution and propylene are fed to the epoxidation reactor. The products stream contains propylene oxide, propylene, methylbenzyl alcohol, and small amounts of several other hydrocarbons. Propylene oxide is purified by a multi-tower distillation scheme.

## Geography
This unit process is representative of propylene oxide produced in the United States.

## Time period
The energy, environmental emissions and raw materials data for the three technologies used for propylene oxide production in this dataset are representative of production from 1992. Energy data from a 2000 DOE report which is based on 1997 data were used to validate the older data.

## Reference product
- Propylene oxide, at plant [RNA]: 1 kg
  This data module is a weighted average of the inventory for several technologies. An excess amount of brine water is produced during one of the technologies but is not presented as an output to nature; these output amounts would likely explain the upset in the mass balance shown for this hybrid inventory.

## Inputs from technosphere
- Transport, pipeline, unspecified petroleum products: 0.39 t*km
- Oxygen, liquid, at plant [RNA]: 0.046 kg
- Chlorine; chlor-alkali electrolysis; at plant: 0.68 kg
- Electricity, AC, 120 V: 0.9036 MJ; provider Electricity; at user; consumption mix - US - US
- Sodium hydroxide; chlor-alkali electrolysis; at plant: 0.791 kg; provider Chlorine; chlor-alkali electrolysis; at plant
- Transport, pipeline, natural gas [RNA]: 0.00016 t*km
- Sodium chloride, at plant [RNA]: 1.117 kg
- Transport, combination truck, diesel powered: 0.27 t*km
- Transport, barge, average fuel mix: 0.00376 t*km
- Transport, train, diesel powered: 0.087 t*km
- Natural gas, combusted in industrial boiler [RNA]: 0.2623 m3
  Steam is assumed to be produced by natural gas
- Propylene, at plant [RNA]: 0.787 kg; provider Propylene, materials production, organic compound, at plant, kg

## Waste to treatment
- Disposal, solid waste, process, to sanitary landfill: 0.00022 kg

## Emissions to nature
- Chlorine [emission, air]: 1.5e-7 kg
- Hydrocarbons [emission, water]: 0.0033 kg
- Ethylbenzene [emission, air]: 0.0014 kg
- Isobutane [emission, air]: 0.00096 kg
- Volatile organic compounds [emission, air]: 0.0034 kg
- Acetic acid [emission, air]: 4e-6 kg
- Propylene oxide [emission, air]: 0.00069 kg
- Formic acid [emission, air]: 6.2e-5 kg
- Acetic acid [emission, water]: 0.0031 kg
- Acid compounds [emission, water]: 0.0023 kg
- Sodium hydroxide [emission, water]: 0.0021 kg
- Formic acid [emission, water]: 0.0027 kg
- Propylene [emission, air]: 0.00018 kg
- Ammonia [emission, air]: 7.2e-5 kg
- Carbon dioxide [emission, air]: 0.014 kg
- Phenols [emission, water]: 0.0019 kg

## Inventory method
Attributional and gate to gate process. Developed with the intention to be compatible with TRACI.

## Modelling constants
Confidential secondary data were used to model the production of propylene oxide. The propylene oxide data is an average of three different technologies from the 1990s. The technologies are all still in use in North America, and the weightings of each dataset have been updated to reflect recent use of these technologies. All data collected were carefully evaluated and reviewed.

## Completeness
TREATMENT OF MISSING ENVIRONMENTAL DATA: Elementary and technosphere flows are cut-off at less than 1% based on environmental relevance.

TREATMENT OF MISSING TECHNOSPHERE DATA: Miscellaneous materials and additives, capital equipment, facilities and infrastructure, space conditioning, and support personnel requirements are not included in this unit process. No gaps have been identified in this dataset.

MASS BALANCE: The mass balance for this process was calculated. An excess amount of brine water is produced during one of the technologies but is not presented as an output to nature; these output amounts would likely explain the inconsistency in the mass balance shown for this hybrid inventory.

## Data selection
All propylene oxide production data was sourced from a confidential secondary source and reviewed. All data obtained specifically for this study were considered the most representative available for the systems studied. Datasets were reviewed for completeness and material balances.

## Data treatment
This dataset is a weighted average of three propylene oxide technologies based on an estimated 2020 production capacity. The chlorohydrin process generates 50 percent of the propylene oxide, the isobutene hydroperoxidation (including MTBE hydroperoxidation) 33.9 percent, and the ethylbenzene hydroperoxidation 16.1 percent (ECHEMI, 2021 and Nexant, 2009). Newer technologies such as hyperoxidation using cumene hydroperoxide or hydrogen peroxide make up approximately 10 percent of the technology use but data was unavailable for these processes so these were excluded from this dataset. In the two included hydroperoxidation datasets, coproduct credit was given on a mass basis.

## Data collection
The environmental emissions and raw materials data for the three technologies used for propylene oxide production in this dataset are representative of production from 1992. Energy data were collected from a 2000 DOE report which is based on 1997 data.

## Sampling procedure
BOUNDARY CONDITIONS: The system boundary includes propylene oxide manufacturing, upstream material manufacturing, and incoming transportation for each material. The following are excluded from the system boundary: miscellaneous materials and additives, capital equipment, facilities and infrastructure, space conditioning, and support personnel requirements.

DATA COLLECTION: Data were collected from secondary sources.

UNCERTAINTY ESTIMATION: Uncertainty was not calculated.

## Intended application
Situation C1 - Accounting, with system-external interactions - The intended application is a purely descriptive accounting / documentation of the analysed system including existing interactions with other systems in the LCI model. These data are an update to a previously published dataset which is a generic unit process model. The target audience of this model includes LCA practitioners, industry, and the general public. This dataset has been accepted by the North American plastics/chemical industry and is intended for use as an industry average. An inventory of environmental emission flows are included to the extent that the producers provided; thus this unit process can be used for a full range of LCIA impact categories. The original study results were analyzed using the TRACI LCIA factors.

## Project
This project was funded by and submitted to the American Chemistry Council (ACC). These data are an update to a previously published ACC dataset.

## Review 
The data was reviewed internally and by two ACC members and an ACC consultant. Internal ERG review of data entry proofreading and data documentation were also carried out.

## Sources
- DOE
- American Chemistry Council, 2022, Polyether Polyol for Flexible Foam Polyurethanes
