# Pulpwood, softwd, avg, state or private moist forest, at forest rd, INW

Dataset: openLCA process, unit process
Category: 11: Agriculture, Forestry, Fishing and Hunting/1133: Logging
Geography: United States
Time period: 1988-12-31 to 1995-12-31
Allocation method: no allocation
Generated by: Maureen Puetmann
Published in: Leonard R. Johnson
isCopyrightProtected: false
restrictionsDescription: All information can be accessed by everybody.

## General comment
1. FIA inventory were from 1989 to 1996 depending on jurisdiction
2. Important note: although most of the data in the US LCI database has undergone some sort of review, the database as a whole has not yet undergone a formal validation process. Please email comments to lci@nrel.gov.

## Technology
Average technology. Some data extrapolated from similar processes.

## Geography
US Inland West including Montana, Idaho, and eastern Washington

## Reference product
- Pulpwood; softwd; avg; state or private moist forest; at forest rd [US]: 1 m3

## Inputs from technosphere
- Pulpwood; sftwd; state-private moist cold forest; steep slope; at forest rd [US]: 0.3 m3
- Pulpwood; sftwd; state-private moist cold forest; gentle slope; at frst rd [US]: 0.7 m3

## Sampling procedure
Analysis of the FIA data about average slopes by forest type and owner

## Sources
- Leonard R. Johnson
- Maureen Puettmann
