# Polybutadiene, butadiene rubber; at plant

Dataset: openLCA process, unit process
Category: 31-33: Manufacturing/3252: Resin, Synthetic Rubber, and Artificial and Synthetic Fibers and Filaments Manufacturing
Geography: Northern America
Time period: 1990-01-01 to 2003-12-31
Allocation method: physical allocation
Data quality: US EPA - Process Pedigree Matrix (4;5)
Generated by: Franklin Associates, A Division of ERG
Owner: American Chemistry Council
Published in: American Chemistry Council, 2022, HIPS
isCopyrightProtected: false
restrictionsDescription: These U.S. LCI Database Project data ("Data") are provided by the National Renewable Energy Laboratory ("NREL"), operated by the Alliance for Sustainable Energy, LLC ("Alliance") for the US Department of Energy ("DOE") under Contract No. DE-AC36-08GO28308. The United States Government (the "Government") retains and the user acknowledges that the Government retains a non-exclusive, paid-up, irrevocable, worldwide license to publish or reproduce the published form of these data, or allow others to do so, for Government purposes.
Access to and use of these Data shall impose the following obligations on the user, as set forth in this Agreement. The user is granted the right, without any fee or cost, to use, copy, modify, alter, enhance and distribute these Data for any purpose whatsoever, provided that this entire notice appears in all copies of the Data. Any modification, alteration or enhancement of these data shall be identified and documented by the user. Further, the user agrees to credit the DOE/NREL/Alliance in any publication that results from the use of these Data. The names DOE/NREL/Alliance, however, may not be used in any advertising or publicity to endorse or promote any products or commercial entities unless specific written permission is obtained from DOE/NREL/Alliance. The user also understands that DOE/NREL/Alliance is not obligated to provide the user with any support, consulting, training or assistance of any kind with regard to the use of these Data or to provide the user with any updates, revisions or new versions of these Data.
YOU AGREE TO INDEMNIFY THE GOVERNMENT AND DOE/NREL/ALLIANCE, AND ITS SUBSIDIARIES, AFFILIATES, OFFICERS, AGENTS, AND EMPLOYEES AGAINST ANY CLAIM OR DEMAND, INCLUDING REASONABLE ATTORNEYS' FEES, RELATED TO YOUR USE OF THESE DATA. THESE DATA ARE PROVIDED BY DOE/NREL/ALLIANCE "AS IS" AND ANY EXPRESS OR IMPLIED WARRANTIES, INCLUDING BUT NOT LIMITED TO, THE IMPLIED WARRANTIES OF MERCHANTABILITY AND FITNESS FOR A PARTICULAR PURPOSE ARE DISCLAIMED. IN NO EVENT SHALL THE GOVERNMENT OR DOE/NREL/ALLIANCE BE LIABLE FOR ANY SPECIAL, INDIRECT OR CONSEQUENTIAL DAMAGES OR ANY DAMAGES WHATSOEVER, INCLUDING BUT NOT LIMITED TO CLAIMS ASSOCIATED WITH THE LOSS OF DATA OR PROFITS, WHICH MAY RESULT FROM AN ACTION IN CONTRACT, NEGLIGENCE OR OTHER TORTIOUS CLAIM THAT ARISES OUT OF OR IN CONNECTION WITH THE ACCESS, USE OR PERFORMANCE OF THESE DATA.

## General comment
The functional unit for this model is one kilogram of polybutadiene. The technical scope of this study is gate-to-gate and the system boundary includes incoming transport, manufacturing, and disposal of process wastes. Polybutadiene production can vary based on the source of butadiene, the modeled production pathway is through the dehydrogenation of n-butane or mixture of n-butanes and butenes followed by purification of butadiene and polymerization into polybutadiene using Ziegler-Natta catalysts. This dataset is from secondary sources, but it was reviewed and determined to be representative of polybutadiene production by a polybutadiene producer in 2006 and reviewed internally for the current study.

## Geography
This unit process is representative of average polybutadiene production in North America.

## Time period
Butadiene input amount and air emissions/waterborne release data are from a 1996 EPA source (ERG 1996, Locating and Estimating Air Emissions from Sources of 1,3-Butadiene, EPA-454/R-96-008). Energy data was originally from 1970s but reviewed and updated in 2006 by a polybutadiene producer and reviewed internally for the current study. Transportation is based on a 2003 source based on information and data collected from ACC member and non-member companies producing HIPS resin.

## Reference product
- Polybutadiene, butadiene rubber, BR, at plant [RNA]: 1 kg

## Inputs from technosphere
- Transport, combination truck, diesel powered [RNA]: 0.310296 t*km
- Transport, train, diesel powered [RNA]: 0.310296 t*km
- Transport, pipeline, unspecified petroleum products [RNA]: 0.146982 t*km
- Butadiene, at plant [RNA]: 1.003 kg
- Natural gas, combusted in industrial boiler [RNA]: 0.145455, 0.145455 m3 (2 entries)

## Emissions to nature
- 1,3-Butadiene [emission, air]: 0.00307 kg
- 1,3-Butadiene [emission, water]: 0.00012 kg

## Inventory method
Attributional and gate to gate process. Developed with the intention to be compatible with TRACI.

## Modelling constants
Secondary data were used to model the production of polybutadiene. All data collected were carefully evaluated and reviewed.

## Completeness
Treatment of Missing Environmental Data: Elementary and technosphere flows are cut-off at less than 1% based on environmental relevance. Other water discharges (e.g. BOD, COD, suspended solids), water consumption, and solid waste from the production of polybutadiene are possible but there were no data found for these, so they are not included in this model.

Treatment of Missing Technosphere Data: Miscellaneous materials and additives, capital equipment, facilities and infrastructure, space conditioning, and support personnel requirements not included in this unit process.

Mass Balance: The mass balance for this process was not calculated.

## Data selection
All polybutadiene production data was sourced from secondary sources and reviewed by a polybutadiene producer. All data obtained specifically for this study were considered the most representative available for the systems studied. Datasets were reviewed for completeness and material balances; however, no sources were found nor estimates made for water consumption and solid waste.

## Data treatment
No data treatment was completed.

## Data collection
Data sources from 1990 to 2003 were used with review in 2006.

## Sampling procedure
Boundary Conditions: The system boundary includes polybutadiene manufacturing, upstream butadiene manufacturing, and incoming transportation for each material. The following are excluded from the system boundary: process wastes, miscellaneous materials and additives, capital equipment, facilities and infrastructure, space conditioning, and support personnel requirements.

Data Collection: Data were collected from secondary sources and reviewed by a primary producer.

Uncertainty Estimation: Uncertainty was not calculated.

## Intended application
Situation C1 - Accounting, with system-external interactions - The intended application is a purely descriptive accounting / documentation of the analysed system including existing interactions with other systems in the LCI model. These data are an update to a previously published dataset which is a generic unit process model. The target audience of this model includes LCA practitioners, industry, and the general public. For use as an average dataset accepted by the North American plastics/chemical industry. An inventory of environmental emission flows are included to the extent that the producers provided; thus this unit process can be used for a full range of LCIA impact categories. The original study results were analyzed using the TRACI LCIA factors.

## Project
This project was funded by and submitted to the American Chemistry Council. These data are an update to a previously published dataset which is a generic unit process data; Cradle-to-Gate Life Cycle Analysis of High Impact Polystyrene (HIPS). Submitted to the American Chemistry Council (ACC). 2022.

## Review 
One polybutadiene producer reviewed the data in 2006 and verified that the data used are representative of production at that time. The data was reviewed internally only for the current study. Internal ERG review of data entry proofreading and data documentation were also carried out.

## Sources
- American Chemistry Council, 2022, HIPS
